// SBML level 3 version 1
// Exported by VCell 7.3

model Falkenberg_PodocyteStability_non_spatial()
  // Falkenberg_PodocyteStability_non-spatial
  // model units - substance: molecules, time: s, volume: um3, area: um2, length: um, extent: molecules

  // Compartments:
  compartment c0 = 50000 um3;
  compartment c1 = 5000 um3;
  compartment Membrane0 = 1414 um2;  // 2-D

  // Species:
  substanceOnly species $C2 in c1 = 3011071;
  substanceOnly species $Loc in c1 = 3011071;
  substanceOnly species Ga in c1 = 3011071;
  substanceOnly species Fa in c1 = 0;
  substanceOnly species skeleton2 in c1 = 0;
  substanceOnly species skeleton in c1 = 0;
  substanceOnly species Bundle in c1 = 0;
  substanceOnly species Loc1 in c1 = 0;
  substanceOnly species perturb2 in c1 = 0;
  substanceOnly species perturb1 in c1 = 3011071;
  substanceOnly species locCorrection in c1 = 0;
  substanceOnly species $C1 in c1 = 3011071;
  substanceOnly species $C0 in c1 = 3011071;

  // Parameters:
  k = 0.22;
  betaT has s_1;
  beta2T has s_1;
  gamma2T has s_1_uM_1;
  alpha0 = 0.3;
  tau = 50;
  tau2 = 10;
  on = 1;
  coef_alpha_p1 = 0;
  coef_alpha_p2 = 0;
  coef_alpha2_p1 = 0;
  coef_alpha2_p2 = 0;
  coef_beta_p1 = 0;
  coef_beta_p2 = 0;
  coef_beta2_p1 = 0;
  coef_beta2_p2 = 0;
  coef_gamma_p1 = 0;
  coef_gamma_p2 = 0;
  coef_gamma2_p1 = 0;
  coef_gamma2_p2 = 0;
  gamma0 = 0.001;
  tt1 = 100;
  tt2 = 50;
  amp1_1 = 1;
  amp1_2 = 0;
  amp2_1 = 1;
  amp2_2 = 0;
  trigger1 = 200;
  trigger2 = 300;
  beta = 0.3;
  gamma2 = 0.0005;
  beta2 = 0.015;
  alpha2 = 0.03;
  Amp_SpatLocPert = 0.1;
  _T_ = 300 K;
  _PI_ = 3.141593 _one_;
  _F_ = 9.64853321e4 C_mol_1;
  _F_nmol_ = 9.64853321e-5 C_nmol_1;
  _N_pmol_ = 6.02214179e11 molecules_pmol_1;
  _K_GHK_ = 1e-9 _one_000000000;
  _R_ = 8314.463 mV_C_K_1_mol_1;
  K_millivolts_per_volt = 1000 mV_V_1;
  KMOLE = 0.001660539 uM_um3_molecules_1;
  Kr_basalSF = 0 s_1;
  Kf_basalSF has um3_s_1_molecules_1;
  Kr_basalFS_corr = 0 s_1;
  Kf_basalFS_corr has s_1;
  Kr_posFeed = 0 s_1;
  Kf_posFeed has s_1;
  Kr_nuclS = 0 s_1;
  Kf_nuclS has um3_s_1_molecules_1;
  Kr_r2 = 0 s_1;
  Kf_r2 has s_1;
  Kr_basal = 0 s_1;
  Kf_basal has um3_s_1_molecules_1;
  Kr_nucl_corr = 0 s_1;
  Kf_nucl_corr has s_1;
  Kr_nuclS_corr = 0 s_1;
  Kf_nuclS_corr has s_1;
  Kr_basal_corr = 0 s_1;
  Kf_basal_corr has s_1;
  Kr_basalSF_corr = 0 s_1;
  Kf_basalSF_corr has s_1;
  Kr_nucl = 0 s_1;
  Kf_nucl has um3_s_1_molecules_1;
  Kr_dep = 0 s_1;
  Kf_dep has s_1;
  Kr_basalFS = 0 s_1;
  Kf_basalFS has um3_s_1_molecules_1;

  // Assignment rules:
  gammaT := gamma0 + 0.001660539*perturb1*coef_gamma_p1*funcoftime1 + 0.001660539*perturb2*coef_gamma_p2*funcoftime2;
  alphaT := alpha0 + 0.001660539*perturb1*coef_alpha_p1*funcoftime1 + 0.001660539*perturb2*coef_alpha_p2*funcoftime2;
  betaT := beta + 0.001660539*perturb1*coef_beta_p1*funcoftime1 + 0.001660539*perturb2*coef_beta_p2*funcoftime2;
  beta2T := beta2 + 0.001660539*perturb1*coef_beta2_p1*funcoftime1 + 0.001660539*perturb2*coef_beta2_p2*funcoftime2;
  alpha2T := alpha2 + 0.001660539*perturb1*coef_alpha2_p1*funcoftime1 + 0.001660539*perturb2*coef_alpha2_p2*funcoftime2;
  gamma2T := gamma2 + 0.001660539*perturb1*coef_gamma2_p1*funcoftime1 + 0.001660539*perturb2*coef_gamma2_p2*funcoftime2;
  funcoftime := 1 + on*(0.2 + exp(-(0.01*(-1000 + t)))*sin(0.01*(-1000 + t)))*(t > 1000);
  funcoftime1 := (t > trigger1)*(exp(-(5*(t - trigger1)/tt1))*amp1_1*sin((t - trigger1)*_PI_/tt1) + amp1_2*(1 - exp(-(5*(t - trigger1)/tt1))));
  funcoftime2 := (t > trigger2)*(exp(-(5*(t - trigger2)/tt2))*amp2_1*sin((t - trigger2)*_PI_/tt2) + amp2_2*(1 - exp(-(5*(t - trigger2)/tt2))));
  Kf_basalSF := 0.001660539*gamma2T;
  Kf_basalFS_corr := 2.757389e-6*alpha2T*Fa*Bundle;
  Kf_posFeed := 0.001660539*alphaT*Loc*(0.001660539*Fa)^2/(k^2 + (0.001660539*Fa)^2);
  Kf_nuclS := 0.001660539*alpha2T;
  Kf_r2 := beta2T;
  Kf_basal := 0.001660539*gammaT;
  Kf_nucl_corr := gammaT*(0.001660539*Ga)^2;
  Kf_nuclS_corr := alpha2T*(0.001660539*Fa)^2;
  Kf_basal_corr := 2.757389e-6*gammaT*Ga*Fa;
  Kf_basalSF_corr := 2.757389e-6*Ga*Bundle*gamma2T;
  Kf_nucl := 0.001660539*gammaT;
  Kf_dep := betaT;
  Kf_basalFS := 0.001660539*alpha2T;

  // Reactions:
  basalSF: Ga + Bundle -> Bundle; (Bundle*Ga*Kf_basalSF - Bundle*Kr_basalSF)*c1;
  basalFS_corr: $C2 -> Bundle; (C2*Kf_basalFS_corr - Bundle*Kr_basalFS_corr)*c1;  // modifiers: Fa
  posFeed: Ga -> Fa; (Ga*Kf_posFeed - Fa*Kr_posFeed)*c1;  // modifiers: Loc
  nuclS: 2 Fa -> Bundle; (-(Bundle*Kr_nuclS) + 362661.9*Kf_nuclS*(0.001660539*Fa)^2)*c1;
  r2: Bundle -> Ga; (Bundle*Kf_r2 - Ga*Kr_r2)*c1;
  basal: Ga + Fa -> Fa; (Fa*Ga*Kf_basal - Fa*Kr_basal)*c1;
  nucl_corr: $C1 -> Fa; (C1*Kf_nucl_corr - Fa*Kr_nucl_corr)*c1;  // modifiers: Ga
  nuclS_corr: $C2 -> Bundle; (C2*Kf_nuclS_corr - Bundle*Kr_nuclS_corr)*c1;  // modifiers: Fa
  basal_corr: $C1 -> Fa; (C1*Kf_basal_corr - Fa*Kr_basal_corr)*c1;  // modifiers: Ga
  basalSF_corr: $C0 -> Bundle; (C0*Kf_basalSF_corr - Bundle*Kr_basalSF_corr)*c1;  // modifiers: Ga
  nucl: 2 Ga -> Fa; (-(Fa*Kr_nucl) + 362661.9*Kf_nucl*(0.001660539*Ga)^2)*c1;
  dep: Fa -> Ga; (Fa*Kf_dep - Ga*Kr_dep)*c1;
  basalFS: Fa + Bundle -> Bundle; (Bundle*Fa*Kf_basalFS - Bundle*Kr_basalFS)*c1;

  // Unit definitions:
  unit molecules = item;
  unit um3 = (1e-6 metre)^3;
  unit um2 = (1e-6 metre)^2;
  unit um = 1e-6 metre;
  unit s = second;
  unit s_1 = 1 / second;
  unit s_1_uM_1 = litre / (second * 1e-6 mole);
  unit K = kelvin;
  unit _one_ = dimensionless;
  unit C_mol_1 = coulomb / mole;
  unit C_nmol_1 = coulomb / (1e-9 mole);
  unit molecules_pmol_1 = item / (1e-12 mole);
  unit _one_000000000 = 1e9 dimensionless;
  unit mV_C_K_1_mol_1 = 1e-3 volt * coulomb / (kelvin * mole);
  unit mV_V_1 = dimensionless;
  unit uM_um3_molecules_1 = 1e-6 mole * (1e-6 metre)^3 / (litre * item);
  unit um3_s_1_molecules_1 = (1e-6 metre)^3 / (second * item);
end
