// SBML level 3 version 1
// Exported by VCell 7.3

model Spine_Model_Final_Rangamani_et_al_PNAS_2016__Application0()
  // model units - substance: molecules, time: s, volume: um3, area: um2, length: um, extent: molecules

  // Compartments:
  compartment c0 = 50000 um3;
  compartment Cytoplasm = 500 um3;
  compartment plasma_membrane = 1414 um2;  // 2-D

  // Species:
  substanceOnly species F_actin in Cytoplasm = 0;
  substanceOnly species CaMKII_F_actin in Cytoplasm = 3011071;
  substanceOnly species Il1_act in Cytoplasm = 0;
  substanceOnly species Myoppase in Cytoplasm = 301107.1;
  substanceOnly species Myoppase_act in Cytoplasm = 30110.71;
  substanceOnly species ROCK in Cytoplasm = 301107.1;
  substanceOnly species Il1 in Cytoplasm = 541992.8;
  substanceOnly species RhoGTP in Cytoplasm = 0;
  substanceOnly species ROCK_act in Cytoplasm = 0;
  substanceOnly species LIMK in Cytoplasm = 602214.2;
  substanceOnly species LIMK_P in Cytoplasm = 0;
  substanceOnly species RhoGAP_act in Cytoplasm = 0;
  substanceOnly species RhoGDP in Cytoplasm = 301107.1;
  substanceOnly species RhoGEF in Cytoplasm = 30110.71;
  substanceOnly species RhoGEF_act in Cytoplasm = 0;
  substanceOnly species RhoGAP in Cytoplasm = 30110.71;
  substanceOnly species Ng in Cytoplasm = 6.02214179e6;
  substanceOnly species CaM_Ng in Cytoplasm = 0;
  substanceOnly species SSH1_act in Cytoplasm = 0;
  substanceOnly species cdc42GTP in Cytoplasm = 0;
  substanceOnly species WASP in Cytoplasm = 301107.1;
  substanceOnly species PP1 in Cytoplasm = 108398.6;
  substanceOnly species PP1_act in Cytoplasm = 0;
  substanceOnly species MLC in Cytoplasm = 301107.1;
  substanceOnly species MLC_p in Cytoplasm = 0;
  substanceOnly species arp23 in Cytoplasm = 301107.1;
  substanceOnly species WASP_act in Cytoplasm = 0;
  substanceOnly species B in Cytoplasm = 9033213;
  substanceOnly species R in Cytoplasm = 0;
  substanceOnly species cdc42GDP in Cytoplasm = 301107.1;
  substanceOnly species Ca_CaM in Cytoplasm = 0;
  substanceOnly species Bp in Cytoplasm = 301107.1;
  substanceOnly species CaM in Cytoplasm = 3011071;
  substanceOnly species arp23_act in Cytoplasm = 0;
  substanceOnly species SSH1 in Cytoplasm = 602214.2;
  substanceOnly species $Ca in Cytoplasm = 301107.1*(12*(t > 1) && (t < 5));
  substanceOnly species CaMKII in Cytoplasm = 0;
  substanceOnly species CaMKIIp in Cytoplasm = 0;
  substanceOnly species G_actin in Cytoplasm = 0;
  substanceOnly species CaMKII_G_actin in Cytoplasm = 3011071;
  substanceOnly species Calcineurin_act in Cytoplasm = 0;
  substanceOnly species Cdc42GEF in Cytoplasm = 30110.71;
  substanceOnly species cdc42GEF_act in Cytoplasm = 0;
  substanceOnly species Cofilin_p in Cytoplasm = 602214.2;
  substanceOnly species Calcineurin in Cytoplasm = 301107.1;
  substanceOnly species cofilin_act in Cytoplasm = 0;

  // Parameters:
  k_sev = 0.01;
  C0 = 0.5;
  l = 0.255;
  k_nuc = 60;
  Km = 2 uM;
  V0 = 0.07;
  w = 25;
  phi = 10;
  k_cap = 0.04 s_1;
  k_shrink = 0.01 uM_1_s_1;
  Vmb has s_1;
  _T_ = 300 K;
  _PI_ = 3.141593 _one_;
  _F_ = 9.64853321e4 C_mol_1;
  _F_nmol_ = 9.64853321e-5 C_nmol_1;
  _N_pmol_ = 6.02214179e11 molecules_pmol_1;
  _K_GHK_ = 1e-9 _one_000000000;
  _R_ = 8314.463 mV_C_K_1_mol_1;
  K_millivolts_per_volt = 1000 mV_V_1;
  KMOLE = 0.001660539 uM_um3_molecules_1;
  Km_Myoppase_inactivation_by_ROCK = 60.2214179 molecules_um_3;
  kcat_Myoppase_inactivation_by_ROCK = 2.357 s_1;
  Vmax_Myoppase_inactivation_by_ROCK has molecules_um_3_s_1;
  kcat_Cofilin_inactivation_by_LIMK = 0.1 s_1;
  Km_PP1_inactivation_by_CaMKII = 2993.004 molecules_um_3;
  kcat_PP1_inactivation_by_CaMKII = 0.07166 s_1;
  Vmax_PP1_inactivation_by_CaMKII has molecules_um_3_s_1;
  kr_calcium_binding_calmodulin = 1;
  kf_calcium_binding_calmodulin = 7.75;
  n_calcium_binding_calmodulin = 1;
  Km_calcinuerin_inactivation = 76481.2 molecules_um_3;
  Vmax_calcinuerin_inactivation has molecules_um_3_s_1;
  Km_Cofilin_activation_through_SSH1_dephosphorylation = 2408.857 molecules_um_3;
  kcat_Cofilin_activation_through_SSH1_dephosphorylation = 0.34 s_1;
  Vmax_Cofilin_activation_through_SSH1_dephosphorylation has molecules_um_3_s_1;
  Km_RhoGTP_hydrolysis = 602.214179 molecules_um_3;
  Vmax_RhoGTP_hydrolysis has molecules_um_3_s_1;
  Km_SSH1_dephosphorylation_by_CaN = 2993.004 molecules_um_3;
  Vmax_SSH1_dephosphorylation_by_CaN has molecules_um_3_s_1;
  Kf_cdc42_activates_WASP = 3.321078e-5 um3_s_1_molecules_1;
  Kr_cdc42_activates_WASP = 0.001 s_1;
  Km_cdc42_hydrolysis = 602.214179 molecules_um_3;
  kcat_cdc42_hydrolysis = 0.1 s_1;
  Vmax_cdc42_hydrolysis has molecules_um_3_s_1;
  Km_LIMK_activation_by_ROCK = 180.6643 molecules_um_3;
  kcat_LIMK_activation_by_ROCK = 0.9 s_1;
  Vmax_LIMK_activation_by_ROCK has molecules_um_3_s_1;
  Km_MLC_Phosphorylation_by_ROCK = 1487.469 molecules_um_3;
  kcat_MLC_Phosphorylation_by_ROCK = 1.8 s_1;
  Vmax_MLC_Phosphorylation_by_ROCK has molecules_um_3_s_1;
  Km_Cdc42_GEF_inactivation = 602.214179 molecules_um_3;
  kcat_Cdc42_GEF_inactivation = 0.01 s_1;
  Vmax_Cdc42_GEF_inactivation has molecules_um_3_s_1;
  k_Arp23_inactivation = 0.1 s_1;
  kappa_Barbed_ends = 106;
  n1_Barbed_ends = 4 _one_;
  Km_RhoGEF_activation_by_CaMKII = 602.214179 molecules_um_3;
  kcat_RhoGEF_activation_by_CaMKII = 0.1 s_1;
  Vmax_RhoGEF_activation_by_CaMKII has molecules_um_3_s_1;
  Km_Il1_inactivation = 76481.2 molecules_um_3;
  kcat_Il1_inactivation = 0.0688 s_1;
  Vmax_Il1_inactivation has molecules_um_3_s_1;
  Km_Il1_activation_by_CaN = 2993.004 molecules_um_3;
  Vmax_Il1_activation_by_CaN has molecules_um_3_s_1;
  Kf_Arp23_activation = 3.321078e-5 um3_s_1_molecules_1;
  Kr_Arp23_activation = 0.01 s_1;
  k_deg_severing = 0.1;
  k_age_severing = 0.001;
  kcat_CaMKII_activation_by_CaM = 1 s_1;
  kcat3_CaMKII_activation_by_CaM = 120;
  Km1_CaMKII_activation_by_CaM = 10 uM;
  Km_CaMKII_activation_by_CaM = 4 uM;
  Km2_PP1_activation_by_IL1 = 10 uM;
  kcat1_PP1_activation_by_IL1 = 50 s_1;
  kcat2_PP1_activation_by_IL1 = 2 s_1;
  Km1_PP1_activation_by_IL1 = 80 uM;
  Km_cdc42_activation = 602.214179 molecules_um_3;
  kcat_cdc42_activation = 0.75 s_1;
  Vmax_cdc42_activation has molecules_um_3_s_1;
  Kf_CaMKII_sequestration_of_G_actin = 0.001660539 um3_s_1_molecules_1;
  Kr_CaMKII_sequestration_of_G_actin = 4 s_1;
  Kf_Calmodulin_binding_neurogranin = 0.008302694 um3_s_1_molecules_1;
  Kr_Calmodulin_binding_neurogranin = 1 s_1;
  Km_RhoGAP_inactivation_by_PP1 = 602.214179 molecules_um_3;
  Vmax_RhoGAP_inactivation_by_PP1 has molecules_um_3_s_1;
  Km_RhoGTP_activation_by_RhoGEF = 602.214179 molecules_um_3;
  kcat_RhoGTP_activation_by_RhoGEF = 0.5 s_1;
  Vmax_RhoGTP_activation_by_RhoGEF has molecules_um_3_s_1;
  Km_Myoppase_activation_by_autodephosphorylation = 9635.427 molecules_um_3;
  kcat_Myoppase_activation_by_autodephosphorylation = 3 s_1;
  Vmax_Myoppase_activation_by_autodephosphorylation has molecules_um_3_s_1;
  Km_Rho_GEF_inactivation = 602.214179 molecules_um_3;
  Vmax_Rho_GEF_inactivation has molecules_um_3_s_1;
  k_Calcineurin_activation__by_CaM = 127 s_1;
  Km_Calcineurin_activation__by_CaM = 0.34 uM;
  Km_LIMK_inactivation_by_ROCK = 2408.857 molecules_um_3;
  Vmax_LIMK_inactivation_by_ROCK has molecules_um_3_s_1;
  Km_MLC_dephosphorylation = 9635.427 molecules_um_3;
  kcat_MLC_dephosphorylation = 1 s_1;
  Vmax_MLC_dephosphorylation has molecules_um_3_s_1;
  Km_CaMKII_inactivation = 1806.643 molecules_um_3;
  kcat_CaMKII_inactivation = 15 s_1;
  Vmax_CaMKII_inactivation has molecules_um_3_s_1;
  Kf_ROCK_activation_by_Rho = 6.642155e-5 um3_s_1_molecules_1;
  Kr_ROCK_activation_by_Rho = 0.001 s_1;
  Km_cdc42_GEF_activation = 602.214179 molecules_um_3;
  kcat_cdc42_GEF_activation = 0.01 s_1;
  Vmax_cdc42_GEF_activation has molecules_um_3_s_1;
  Kf_myosin_phosphatase_activation_basal = 0.01 s_1;
  Kr_myosin_phosphatase_activation_basal = 0 s_1;
  Kf_MLC_phosphorylation_basal = 0.01 s_1;
  Kr_MLC_phosphorylation_basal = 0 s_1;
  Kf_ROCK_inactivation_1 = 0.1 s_1;
  Km_RhoGAP_activation_by_CaMKII = 602.214179 molecules_um_3;
  kcat_RhoGAP_activation_by_CaMKII = 0.01 s_1;
  Vmax_RhoGAP_activation_by_CaMKII has molecules_um_3_s_1;
  Kf_CaMKII_sequestration_of_F_actin = 0.001660539 um3_s_1_molecules_1;
  Kr_CaMKII_sequestration_of_F_actin = 4 s_1;
  Km_SSH1_phosphorylation_by_CaMKIIp = 76481.2 molecules_um_3;
  Vmax_SSH1_phosphorylation_by_CaMKIIp has molecules_um_3_s_1;

  // Assignment rules:
  Vmb := 0.001660539*V0*Bp/(0.001660539*Bp + phi*exp(w/(0.001660539*Bp)));
  f_nuc := 4.578751e-9*k_nuc*arp23_act*l*F_actin*G_actin/(Km + 0.001660539*arp23_act);
  Vmax_Myoppase_inactivation_by_ROCK := kcat_Myoppase_inactivation_by_ROCK*ROCK_act;
  Vmax_PP1_inactivation_by_CaMKII := kcat_PP1_inactivation_by_CaMKII*CaMKIIp;
  Vmax_calcinuerin_inactivation := 0.34*CaMKIIp;
  Vmax_Cofilin_activation_through_SSH1_dephosphorylation := kcat_Cofilin_activation_through_SSH1_dephosphorylation*SSH1_act;
  Vmax_RhoGTP_hydrolysis := 0.1*RhoGAP_act;
  Vmax_SSH1_dephosphorylation_by_CaN := 0.34*Calcineurin_act;
  Vmax_cdc42_hydrolysis := kcat_cdc42_hydrolysis*RhoGAP_act;
  Vmax_LIMK_activation_by_ROCK := kcat_LIMK_activation_by_ROCK*ROCK_act;
  Vmax_MLC_Phosphorylation_by_ROCK := kcat_MLC_Phosphorylation_by_ROCK*ROCK_act;
  Vmax_Cdc42_GEF_inactivation := kcat_Cdc42_GEF_inactivation*PP1_act;
  f_sev_Barbed_ends := 0.001660539*C0*k_sev*(0.001660539*cofilin_act/C0)^n1_Barbed_ends*l*F_actin;
  Vmax_RhoGEF_activation_by_CaMKII := kcat_RhoGEF_activation_by_CaMKII*CaMKIIp;
  Vmax_Il1_inactivation := kcat_Il1_inactivation*CaMKIIp;
  Vmax_Il1_activation_by_CaN := 0.034*Calcineurin_act;
  Vmax_cdc42_activation := kcat_cdc42_activation*cdc42GEF_act;
  Vmax_RhoGAP_inactivation_by_PP1 := 0.1*PP1_act;
  Vmax_RhoGTP_activation_by_RhoGEF := kcat_RhoGTP_activation_by_RhoGEF*RhoGEF_act;
  Vmax_Myoppase_activation_by_autodephosphorylation := kcat_Myoppase_activation_by_autodephosphorylation*Myoppase_act;
  Vmax_Rho_GEF_inactivation := 0.1*PP1_act;
  Vmax_LIMK_inactivation_by_ROCK := 0.34*SSH1_act;
  Vmax_MLC_dephosphorylation := kcat_MLC_dephosphorylation*Myoppase_act;
  Vmax_CaMKII_inactivation := kcat_CaMKII_inactivation*PP1_act;
  Vmax_cdc42_GEF_activation := kcat_cdc42_GEF_activation*CaMKIIp;
  Vmax_RhoGAP_activation_by_CaMKII := kcat_RhoGAP_activation_by_CaMKII*CaMKIIp;
  Vmax_SSH1_phosphorylation_by_CaMKIIp := 0.34*CaMKIIp;

  // Reactions:
  Myoppase_inactivation_by_ROCK: Myoppase_act -> Myoppase; 0.001660539*Myoppase_act*Vmax_Myoppase_inactivation_by_ROCK/(0.001660539*Km_Myoppase_inactivation_by_ROCK + 0.001660539*Myoppase_act)*Cytoplasm;  // modifiers: ROCK_act
  Cofilin_inactivation_by_LIMK: cofilin_act -> Cofilin_p; 0.001660539*LIMK_P*cofilin_act*kcat_Cofilin_inactivation_by_LIMK/(Km + 0.001660539*cofilin_act)*Cytoplasm;  // modifiers: LIMK_P
  PP1_inactivation_by_CaMKII: PP1_act -> PP1; 0.001660539*PP1_act*Vmax_PP1_inactivation_by_CaMKII/(0.001660539*Km_PP1_inactivation_by_CaMKII + 0.001660539*PP1_act)*Cytoplasm;  // modifiers: CaMKIIp
  calcium_binding_calmodulin: 3 $Ca + CaM -> Ca_CaM; (-(Ca_CaM*kr_calcium_binding_calmodulin) + CaM*kf_calcium_binding_calmodulin*n_calcium_binding_calmodulin*(0.001660539*Ca)^3)*Cytoplasm;
  calcinuerin_inactivation: Calcineurin_act -> Calcineurin; 0.001660539*Calcineurin_act*Vmax_calcinuerin_inactivation/(0.001660539*Calcineurin_act + 0.001660539*Km_calcinuerin_inactivation)*Cytoplasm;  // modifiers: CaMKIIp
  Cofilin_activation_through_SSH1_dephosphorylation: Cofilin_p -> cofilin_act; 0.001660539*Cofilin_p*Vmax_Cofilin_activation_through_SSH1_dephosphorylation/(0.001660539*Cofilin_p + 0.001660539*Km_Cofilin_activation_through_SSH1_dephosphorylation)*Cytoplasm;  // modifiers: SSH1_act
  RhoGTP_hydrolysis: RhoGTP -> RhoGDP; 0.001660539*RhoGTP*Vmax_RhoGTP_hydrolysis/(0.001660539*Km_RhoGTP_hydrolysis + 0.001660539*RhoGTP)*Cytoplasm;  // modifiers: RhoGAP_act
  SSH1_dephosphorylation_by_CaN: SSH1 -> SSH1_act; 0.001660539*SSH1*Vmax_SSH1_dephosphorylation_by_CaN/(0.001660539*Km_SSH1_dephosphorylation_by_CaN + 0.001660539*SSH1)*Cytoplasm;  // modifiers: Calcineurin_act
  cdc42_activates_WASP: cdc42GTP + WASP -> WASP_act; (-(Kr_cdc42_activates_WASP*WASP_act) + Kf_cdc42_activates_WASP*WASP*cdc42GTP)*Cytoplasm;
  cdc42_hydrolysis: cdc42GTP -> cdc42GDP; 0.001660539*Vmax_cdc42_hydrolysis*cdc42GTP/(0.001660539*Km_cdc42_hydrolysis + 0.001660539*cdc42GTP)*Cytoplasm;  // modifiers: RhoGAP_act
  LIMK_activation_by_ROCK: LIMK -> LIMK_P; 0.001660539*LIMK*Vmax_LIMK_activation_by_ROCK/(0.001660539*Km_LIMK_activation_by_ROCK + 0.001660539*LIMK)*Cytoplasm;  // modifiers: ROCK_act
  MLC_Phosphorylation_by_ROCK: MLC -> MLC_p; 0.001660539*MLC*Vmax_MLC_Phosphorylation_by_ROCK/(0.001660539*Km_MLC_Phosphorylation_by_ROCK + 0.001660539*MLC)*Cytoplasm;  // modifiers: ROCK_act
  Cdc42_GEF_inactivation: cdc42GEF_act -> Cdc42GEF; 0.001660539*Vmax_Cdc42_GEF_inactivation*cdc42GEF_act/(0.001660539*Km_Cdc42_GEF_inactivation + 0.001660539*cdc42GEF_act)*Cytoplasm;  // modifiers: PP1_act
  Arp23_inactivation: arp23_act -> arp23; arp23_act*k_Arp23_inactivation*Cytoplasm;
  Barbed_ends: -> B; (602.214179*f_nuc*kappa_Barbed_ends + 602.214179*f_sev_Barbed_ends*kappa_Barbed_ends - B*k_cap)*Cytoplasm;  // modifiers: cofilin_act, F_actin
  RhoGEF_activation_by_CaMKII: RhoGEF -> RhoGEF_act; 0.001660539*RhoGEF*Vmax_RhoGEF_activation_by_CaMKII/(0.001660539*Km_RhoGEF_activation_by_CaMKII + 0.001660539*RhoGEF)*Cytoplasm;  // modifiers: CaMKIIp
  Il1_inactivation: Il1_act -> Il1; 0.001660539*Il1_act*Vmax_Il1_inactivation/(0.001660539*Il1_act + 0.001660539*Km_Il1_inactivation)*Cytoplasm;  // modifiers: CaMKIIp
  Il1_activation_by_CaN: Il1 -> Il1_act; 0.001660539*Il1*Vmax_Il1_activation_by_CaN/(0.001660539*Il1 + 0.001660539*Km_Il1_activation_by_CaN)*Cytoplasm;  // modifiers: Calcineurin_act
  Arp23_activation: arp23 + WASP_act -> arp23_act; (Kf_Arp23_activation*WASP_act*arp23 - Kr_Arp23_activation*arp23_act)*Cytoplasm;
  severing: F_actin -> G_actin; (F_actin*k_age_severing + F_actin*k_deg_severing + C0*F_actin*k_sev*l*(0.001660539*cofilin_act/C0)^4)*Cytoplasm;  // modifiers: cofilin_act
  CaMKII_activation_by_CaM: CaMKII -> CaMKIIp; (0.001660539*CaMKII*CaMKIIp*kcat_CaMKII_activation_by_CaM*(0.001660539*Ca_CaM)^4 + 0.001660539*CaMKII^2*kcat3_CaMKII_activation_by_CaM*(0.001660539*Ca_CaM)^4 + CaMKII*Km1_CaMKII_activation_by_CaM*kcat3_CaMKII_activation_by_CaM*(0.001660539*Ca_CaM)^4 + 0.001660539*CaMKII*CaMKIIp*kcat_CaMKII_activation_by_CaM*Km_CaMKII_activation_by_CaM^4)/(0.001660539*CaMKII*(0.001660539*Ca_CaM)^4 + Km1_CaMKII_activation_by_CaM*(0.001660539*Ca_CaM)^4 + 0.001660539*CaMKII*Km_CaMKII_activation_by_CaM^4 + Km1_CaMKII_activation_by_CaM*Km_CaMKII_activation_by_CaM^4)*Cytoplasm;  // modifiers: Ca_CaM
  PP1_activation_by_IL1: PP1 -> PP1_act; (0.001660539*Il1_act*Km2_PP1_activation_by_IL1*PP1*kcat1_PP1_activation_by_IL1 + 2.757389e-6*Il1_act*PP1^2*kcat1_PP1_activation_by_IL1 + 0.001660539*Km1_PP1_activation_by_IL1*PP1*PP1_act*kcat2_PP1_activation_by_IL1 + 2.757389e-6*PP1^2*PP1_act*kcat2_PP1_activation_by_IL1)/(Km1_PP1_activation_by_IL1*Km2_PP1_activation_by_IL1 + 0.001660539*Km1_PP1_activation_by_IL1*PP1 + 0.001660539*Km2_PP1_activation_by_IL1*PP1 + 2.757389e-6*PP1^2)*Cytoplasm;  // modifiers: Il1_act
  cdc42_activation: cdc42GDP -> cdc42GTP; 0.001660539*Vmax_cdc42_activation*cdc42GDP/(0.001660539*Km_cdc42_activation + 0.001660539*cdc42GDP)*Cytoplasm;  // modifiers: cdc42GEF_act
  pushing_barbed_ends: -> Bp; (B*V0 - B*Vmb - Bp*k_cap)*Cytoplasm;  // modifiers: B
  CaMKII_sequestration_of_G_actin: CaMKII + G_actin -> CaMKII_G_actin; (CaMKII*G_actin*Kf_CaMKII_sequestration_of_G_actin - CaMKII_G_actin*Kr_CaMKII_sequestration_of_G_actin)*Cytoplasm; CaMKII_sequestration_of_G_actin is "CaMKII sequestration of G-actin";
  Calmodulin_binding_neurogranin: Ng + CaM -> CaM_Ng; (-(CaM_Ng*Kr_Calmodulin_binding_neurogranin) + CaM*Kf_Calmodulin_binding_neurogranin*Ng)*Cytoplasm;
  Radius: -> R; (602.214179*Vmb - 0.001660539*MLC_p*R*k_shrink)*Cytoplasm;  // modifiers: MLC_p
  RhoGAP_inactivation_by_PP1: RhoGAP_act -> RhoGAP; 0.001660539*RhoGAP_act*Vmax_RhoGAP_inactivation_by_PP1/(0.001660539*Km_RhoGAP_inactivation_by_PP1 + 0.001660539*RhoGAP_act)*Cytoplasm;  // modifiers: PP1_act
  RhoGTP_activation_by_RhoGEF: RhoGDP -> RhoGTP; 0.001660539*RhoGDP*Vmax_RhoGTP_activation_by_RhoGEF/(0.001660539*Km_RhoGTP_activation_by_RhoGEF + 0.001660539*RhoGDP)*Cytoplasm;  // modifiers: RhoGEF_act
  Myoppase_activation_by_autodephosphorylation: Myoppase -> Myoppase_act; 0.001660539*Myoppase*Vmax_Myoppase_activation_by_autodephosphorylation/(0.001660539*Km_Myoppase_activation_by_autodephosphorylation + 0.001660539*Myoppase)*Cytoplasm;
  Rho_GEF_inactivation: RhoGEF_act -> RhoGEF; 0.001660539*RhoGEF_act*Vmax_Rho_GEF_inactivation/(0.001660539*Km_Rho_GEF_inactivation + 0.001660539*RhoGEF_act)*Cytoplasm;  // modifiers: PP1_act
  Calcineurin_activation__by_CaM: Calcineurin -> Calcineurin_act; Calcineurin*k_Calcineurin_activation__by_CaM*(0.001660539*Ca_CaM)^4/((0.001660539*Ca_CaM)^4 + Km_Calcineurin_activation__by_CaM^4)*Cytoplasm; Calcineurin_activation__by_CaM is "Calcineurin activation by CaM";  // modifiers: Ca_CaM
  LIMK_inactivation_by_ROCK: LIMK_P -> LIMK; 0.001660539*LIMK_P*Vmax_LIMK_inactivation_by_ROCK/(0.001660539*Km_LIMK_inactivation_by_ROCK + 0.001660539*LIMK_P)*Cytoplasm;  // modifiers: SSH1_act
  MLC_dephosphorylation: MLC_p -> MLC; 0.001660539*MLC_p*Vmax_MLC_dephosphorylation/(0.001660539*Km_MLC_dephosphorylation + 0.001660539*MLC_p)*Cytoplasm;  // modifiers: Myoppase_act
  CaMKII_inactivation: CaMKIIp -> CaMKII; 0.001660539*CaMKIIp*Vmax_CaMKII_inactivation/(0.001660539*CaMKIIp + 0.001660539*Km_CaMKII_inactivation)*Cytoplasm;  // modifiers: PP1_act
  ROCK_activation_by_Rho: ROCK + RhoGTP -> ROCK_act; (-(Kr_ROCK_activation_by_Rho*ROCK_act) + Kf_ROCK_activation_by_Rho*ROCK*RhoGTP)*Cytoplasm;
  cdc42_GEF_activation: Cdc42GEF -> cdc42GEF_act; 0.001660539*Cdc42GEF*Vmax_cdc42_GEF_activation/(0.001660539*Cdc42GEF + 0.001660539*Km_cdc42_GEF_activation)*Cytoplasm;  // modifiers: CaMKIIp
  myosin_phosphatase_activation_basal: Myoppase -> Myoppase_act; (Kf_myosin_phosphatase_activation_basal*Myoppase - Kr_myosin_phosphatase_activation_basal*Myoppase_act)*Cytoplasm;
  MLC_phosphorylation_basal: MLC -> MLC_p; (Kf_MLC_phosphorylation_basal*MLC - Kr_MLC_phosphorylation_basal*MLC_p)*Cytoplasm;
  ROCK_inactivation_1: ROCK_act -> ; Kf_ROCK_inactivation_1*ROCK_act*Cytoplasm;
    Kr = 0 molecules_um_3_s_1;
  RhoGAP_activation_by_CaMKII: RhoGAP -> RhoGAP_act; 0.001660539*RhoGAP*Vmax_RhoGAP_activation_by_CaMKII/(0.001660539*Km_RhoGAP_activation_by_CaMKII + 0.001660539*RhoGAP)*Cytoplasm;  // modifiers: CaMKIIp
  CaMKII_sequestration_of_F_actin: CaMKII + F_actin -> CaMKII_F_actin; (CaMKII*F_actin*Kf_CaMKII_sequestration_of_F_actin - CaMKII_F_actin*Kr_CaMKII_sequestration_of_F_actin)*Cytoplasm; CaMKII_sequestration_of_F_actin is "CaMKII sequestration of F-actin";
  SSH1_phosphorylation_by_CaMKIIp: SSH1_act -> SSH1; 0.001660539*SSH1_act*Vmax_SSH1_phosphorylation_by_CaMKIIp/(0.001660539*Km_SSH1_phosphorylation_by_CaMKIIp + 0.001660539*SSH1_act)*Cytoplasm;  // modifiers: CaMKIIp
  Actin_growth: F_actin + arp23_act + G_actin -> F_actin; 602.214179*f_nuc*Cytoplasm;

  // Unit definitions:
  unit molecules = item;
  unit um3 = (1e-6 metre)^3;
  unit um2 = (1e-6 metre)^2;
  unit um = 1e-6 metre;
  unit s = second;
  unit uM = 1e-6 mole / litre;
  unit s_1 = 1 / second;
  unit uM_1_s_1 = litre / (1e-6 mole * second);
  unit K = kelvin;
  unit _one_ = dimensionless;
  unit C_mol_1 = coulomb / mole;
  unit C_nmol_1 = coulomb / (1e-9 mole);
  unit molecules_pmol_1 = item / (1e-12 mole);
  unit _one_000000000 = 1e9 dimensionless;
  unit mV_C_K_1_mol_1 = 1e-3 volt * coulomb / (kelvin * mole);
  unit mV_V_1 = dimensionless;
  unit uM_um3_molecules_1 = 1e-6 mole * (1e-6 metre)^3 / (litre * item);
  unit molecules_um_3 = item / (1e-6 metre)^3;
  unit molecules_um_3_s_1 = item / ((1e-6 metre)^3 * second);
  unit um3_s_1_molecules_1 = (1e-6 metre)^3 / (second * item);
end
