// SBML level 3 version 1
// Exported by VCell 7.3

model RS_JBC2016_Application0()
  // model units - substance: molecules, time: s, volume: um3, area: um2, length: um, extent: molecules

  // Compartments:
  compartment IC = 7000 um3;
  compartment EC = 7100 um3;
  compartment PM = 21000 um2;  // 2-D

  // Species:
  substanceOnly species PDE2_cGMP in IC = 0;
  substanceOnly species PDE2_inhibited in IC = 0;
  substanceOnly species Bay60 in IC = 0;
  substanceOnly species PDEbg_cGMP in IC = 421549.9;
  substanceOnly species GMP in IC = 0;
  substanceOnly species PDE2_cAMP in IC = 0;
  substanceOnly species $GTP in IC = 2.10775e9;
  substanceOnly species sGC_basal in IC = 632324.9;
  substanceOnly species R2C2_cAMP in IC = 0;
  substanceOnly species R2C2 in IC = 2107750;
  substanceOnly species R2C2_cAMP2 in IC = 0;
  substanceOnly species PKA in IC = 0;
  substanceOnly species R2C_cAMP4 in IC = 0;
  substanceOnly species R2_cAMP4 in IC = 0;
  substanceOnly species R2C2_cAMP4 in IC = 0;
  substanceOnly species GluA1_845 in IC = 0;
  substanceOnly species Four1N in IC = 42154.99;
  substanceOnly species AMPAR in PM = 0;
  substanceOnly species GluA1_dephos in PM = 0;
  substanceOnly species Ga_GTP in PM = 0;
  substanceOnly species PDE1 in IC = 2107750;
  substanceOnly species D1R in PM = 420000;
  substanceOnly species Gaby in PM = 420000;
  substanceOnly species $GluA1 in IC = 42154.99;
  substanceOnly species cAMP in IC = 0;
  substanceOnly species DA_D1R_Gaby in PM = 0;
  substanceOnly species PDE1_cGMP in IC = 0;
  substanceOnly species R2C2_cAMP3 in IC = 0;
  substanceOnly species PDE2 in IC = 2107750;
  substanceOnly species cGMP in IC = 0;
  substanceOnly species PDE2_active_cAMP in IC = 0;
  substanceOnly species AMP in IC = 0;
  substanceOnly species PDE2_active_cGMP in IC = 0;
  substanceOnly species Gby in PM = 0;
  substanceOnly species Ga_GDP in PM = 0;
  substanceOnly species D1R_Gaby in PM = 0;
  substanceOnly species DA_D1R in PM = 0;
  substanceOnly species PDEbg_cAMP in IC = 421549.9;
  substanceOnly species ACbg in PM = 315000;
  substanceOnly species PDE1_cAMP in IC = 0;
  substanceOnly species DA in EC = 0;
  substanceOnly species DARPP32 in IC = 2107750;
  substanceOnly species DARPP32_Pi in IC = 0;
  substanceOnly species AC5 in PM = 1155000;
  substanceOnly species AC5_Ga in PM = 0;
  substanceOnly species DARPP32_Pi_PP1 in IC = 0;
  substanceOnly species PP2A in IC = 421549.9;
  substanceOnly species MMPX in IC = 0;
  substanceOnly species PP1 in IC = 463704.9;
  substanceOnly species ERK_active in IC = 0;
  substanceOnly species PDE4_ERK in IC = 0;
  substanceOnly species PDE4 in IC = 421549.9;
  substanceOnly species PDE4_PKA in IC = 0;
  substanceOnly species PDE4_ERK_PKA in IC = 0;
  substanceOnly species PDE1_inhibited in IC = 0;
  substanceOnly species $ATP in IC = 2.10775e10;
  substanceOnly species BRaf in IC = 758789.9;
  substanceOnly species BRaf_PKA in IC = 0;
  substanceOnly species MEK_active in IC = 0;
  substanceOnly species MEK_Ser in IC = 0;
  substanceOnly species MEK in IC = 758789.9;
  substanceOnly species ERK_Tyr in IC = 0;
  substanceOnly species ERK in IC = 1517580;
  substanceOnly species STEP in IC = 843099.9;
  substanceOnly species STEP_PKA in IC = 0;
  substanceOnly species PDE2_active in IC = 0;
  substanceOnly species SNAP in IC = 0;
  substanceOnly species sGC_inactive in IC = 632324.9;
  substanceOnly species sGC_active in IC = 0;

  // Parameters:
  _T_ = 300 K;
  _PI_ = 3.141593 _one_;
  _F_ = 9.64853321e4 C_mol_1;
  _F_nmol_ = 9.64853321e-5 C_nmol_1;
  _N_pmol_ = 6.02214179e11 molecules_pmol_1;
  _K_GHK_ = 1e-9 _one_000000000;
  _R_ = 8314.463 mV_C_K_1_mol_1;
  K_millivolts_per_volt = 1000 mV_V_1;
  KMOLE = 0.001660539 uM_um3_molecules_1;
  Km_r097 = 3613.285 molecules_um_3;
  Kcat_r097 = 5 s_1;
  Vmax_r097 has molecules_um_3_s_1;
  Km_r096 = 15441.37 molecules_um_3;
  Kcat_r096 = 1 s_1;
  Vmax_r096 has molecules_um_3_s_1;
  Km_r010 = 189697.5 molecules_um_3;
  Kcat_r010 = 8.5 s_1;
  Vmax_r010 has molecules_um_2_s_1;
  Km_r093 = 463.7049 molecules_um_3;
  Kcat_r093 = 0.636 s_1;
  Vmax_r093 has molecules_um_3_s_1;
  Km_r094 = 277.0185 molecules_um_3;
  Kcat_r094 = 1.06 s_1;
  Vmax_r094 has molecules_um_3_s_1;
  Kf_r027 = 4.73 s_1;
  Kr_r027 = 0 um3_s_1_molecules_1;
  Kf_r044 = 0.05 s_1;
  Kr_r044 = 0.0001411458 um3_s_1_molecules_1;
  Kf_r073 = 10 s_1;
  Kr_r073 = 0 um3_s_1_molecules_1;
  Kf_r051 = 0.001660539 um3_s_1_molecules_1;
  Kr_r051 = 1.2 s_1;
  Km_r070 = 1445.314 molecules_um_3;
  Kcat_r070 = 2.7 s_1;
  Vmax_r070 has molecules_um_3_s_1;
  Kf_r071 = 0.1660539 um3_s_1_molecules_1;
  Kr_r071 = 0.2 s_1;
  Kf_r019 = 0.01776776 um3_s_1_molecules_1;
  Kr_r019 = 86 s_1;
  Kf_r054 = 0.001660539 um3_s_1_molecules_1;
  Kr_r054 = 0.01 s_1;
  Kf_r058 = 0.001660539 um3_s_1_molecules_1;
  Kr_r058 = 0.01 s_1;
  Kf_r001 = 0.06 um2_s_1_molecules_1;
  Kr_r001 = 0.0003 s_1;
  Kf_r029 = 8.4 s_1;
  Kr_r029 = 0 um3_s_1_molecules_1;
  Kf_r059 = 0.001660539 um3_s_1_molecules_1;
  Kr_r059 = 0.01 s_1;
  Km_r060 = 15055.35 molecules_um_3;
  Kcat_r060 = 25 s_1;
  Vmax_r060 has molecules_um_3_s_1;
  Kf_r048 = 3.694901e-6 um4_s_1_molecules_1;
  Kr_r048 = 0.008 s_1;
  Kf_r017 = 21.5 s_1;
  Kr_r017 = 0 um3_s_1_molecules_1;
  Kf_r016 = 21 s_1;
  Kr_r016 = 0 um3_s_1_molecules_1;
  Kf_r018 = 0.005811886 um3_s_1_molecules_1;
  Kr_r018 = 84 s_1;
  Kf_r028 = 0.01162377 um3_s_1_molecules_1;
  Kr_r028 = 33.6 s_1;
  Kf_r005 = 20 s_1;
  Kr_r005 = 0 um4_s_1_molecules_2;
  Kf_r053 = 0.001660539 um3_s_1_molecules_1;
  Kr_r053 = 1.2 s_1;
  Km_r072 = 222.8192 molecules_um_3;
  Kcat_r072 = 6.7 s_1;
  Vmax_r072 has molecules_um_3_s_1;
  Kf_r002 = 0.005529594 um3_s_1_molecules_1;
  Kr_r002 = 10 s_1;
  Kf_r026 = 0.000597794 um3_s_1_molecules_1;
  Kr_r026 = 18.9 s_1;
  Kf_r052 = 0.001660539 um3_s_1_molecules_1;
  Kr_r052 = 1.2 s_1;
  Kf_r011 = 0.006808209 um3_s_1_molecules_1;
  Kr_r011 = 0.9 s_1;
  Kf_r042 = 0.0004483455 um3_s_1_molecules_1;
  Kr_r042 = 0.28 s_1;
  Km_r085 = 4516.606 molecules_um_3;
  Kcat_r085 = 3 s_1;
  Vmax_r085 has molecules_um_3_s_1;
  Km_r086 = 9428.867 molecules_um_3;
  Kcat_r086 = 6 s_1;
  Vmax_r086 has molecules_um_3_s_1;
  Km_r087 = 95.80625 molecules_um_3;
  Kcat_r087 = 0.18 s_1;
  Vmax_r087 has molecules_um_3_s_1;
  Km_r088 = 95.80625 molecules_um_3;
  Kcat_r088 = 0.18 s_1;
  Vmax_r088 has molecules_um_3_s_1;
  Km_r091 = 27.88011 molecules_um_3;
  Kcat_r091 = 0.15 s_1;
  Vmax_r091 has molecules_um_3_s_1;
  Km_r089 = 9428.867 molecules_um_3;
  Kcat_r089 = 6 s_1;
  Vmax_r089 has molecules_um_3_s_1;
  Km_r090 = 9428.867 molecules_um_3;
  Kcat_r090 = 6 s_1;
  Vmax_r090 has molecules_um_3_s_1;
  Km_r092 = 27.88011 molecules_um_3;
  Kcat_r092 = 0.15 s_1;
  Vmax_r092 has molecules_um_3_s_1;
  Km_r095 = 5419.928 molecules_um_3;
  Kcat_r095 = 0.1 s_1;
  Vmax_r095 has molecules_um_3_s_1;
  Km_r025 = 620280.6 molecules_um_3;
  Kcat_r025 = 0.9 s_1;
  Vmax_r025 has molecules_um_2_s_1;
  Kf_r000 = 0.001843198 um3_s_1_molecules_1;
  Kr_r000 = 10 s_1;
  Km_r047 = 585.021 molecules_um_3;
  Kcat_r047 = 0.17 s_1;
  Vmax_r047 has molecules_um_3_s_1;
  Km_r049 = 121 molecules_um_2;
  Kcat_r049 = 0.17 molecules_uM_1_um_2_s_1;
  Vmax_r049 has molecules_um_2_s_1;
  Kf_r050 = 0.0008 s_1;
  Kr_r050 = 0 um4_s_1_molecules_1;
  Km_r075 = 4516.606 molecules_um_3;
  Kcat_r075 = 3 s_1;
  Vmax_r075 has molecules_um_3_s_1;
  Kf_r007 = 38.5 um2_s_1_molecules_1;
  Kr_r007 = 50 s_1;
  Kf_r006 = 10 s_1;
  Kr_r006 = 0 s_1;
  Km_r077 = 4516.606 molecules_um_3;
  Kcat_r077 = 0.1 s_1;
  Vmax_r077 has molecules_um_3_s_1;
  Km_r078 = 4817.713 molecules_um_3;
  Kcat_r078 = 1 s_1;
  Vmax_r078 has molecules_um_3_s_1;
  Km_r080 = 15441.37 molecules_um_3;
  Kcat_r080 = 0.1 s_1;
  Vmax_r080 has molecules_um_3_s_1;
  Km_r076 = 4817.713 molecules_um_3;
  Kcat_r076 = 5 s_1;
  Vmax_r076 has molecules_um_3_s_1;
  Km_r079 = 4817.713 molecules_um_3;
  Kcat_r079 = 5 s_1;
  Vmax_r079 has molecules_um_3_s_1;
  Km_r083 = 1083.986 molecules_um_3;
  Kcat_r083 = 27 s_1;
  Vmax_r083 has molecules_um_3_s_1;
  Km_r084 = 1083.986 molecules_um_3;
  Kcat_r084 = 0.01 s_1;
  Vmax_r084 has molecules_um_3_s_1;
  Km_r024 = 6022.14179 molecules_um_3;
  Kcat_r024 = 25 s_1;
  Vmax_r024 has molecules_um_3_s_1;
  Kf_r056 = 0.001660539 um3_s_1_molecules_1;
  Kr_r056 = 0.01 s_1;
  Km_r074 = 283.0407 molecules_um_3;
  Kcat_r074 = 10 s_1;
  Vmax_r074 has molecules_um_3_s_1;
  Km_r081 = 1083.986 molecules_um_3;
  Kcat_r081 = 10 s_1;
  Vmax_r081 has molecules_um_3_s_1;
  Kf_r012 = 0.01776776 um3_s_1_molecules_1;
  Kr_r012 = 86 s_1;
  Km_r046 = 4516.606 molecules_um_3;
  Kcat_r046 = 6 s_1;
  Vmax_r046 has molecules_um_3_s_1;
  Km_r082 = 1083.986 molecules_um_3;
  Kcat_r082 = 8 s_1;
  Vmax_r082 has molecules_um_3_s_1;
  Kf_r057 = 0.001660539 um3_s_1_molecules_1;
  Kr_r057 = 0.01 s_1;
  Kf_r055 = 0.001660539 um3_s_1_molecules_1;
  Kr_r055 = 0.01 s_1;
  Kf_r015 = 21.5 s_1;
  Kr_r015 = 0 um3_s_1_molecules_1;
  Km_r009 = 620280.6 molecules_um_3;
  Kcat_r009 = 0.2 s_1;
  Vmax_r009 has molecules_um_2_s_1;
  Kf_r014 = 84 s_1;
  Kr_r014 = 0 um3_s_1_molecules_1;
  Km_r039 = 60221.42 molecules_um_3;
  Kcat_r039 = 0.18 s_1;
  Vmax_r039 has molecules_um_3_s_1;
  Kf_r041 = 5.811886e-5 um3_s_1_molecules_1;
  Kr_r041 = 0.06 s_1;
  Kf_r045 = 0.05 s_1;
  Kr_r045 = 0.0001411458 um3_s_1_molecules_1;
  Kf_r013 = 0.02324754 um3_s_1_molecules_1;
  Kr_r013 = 84 s_1;
  Kf_r043 = 0.0004483455 um3_s_1_molecules_1;
  Kr_r043 = 0.28 s_1;
  Kf_r004 = 100 um2_s_1_molecules_1;
  Kr_r004 = 0 s_1;
  Kf_r003 = 0.6 um2_s_1_molecules_1;
  Kr_r003 = 0.001 s_1;
  Kf_r040 = 5.811886e-5 um3_s_1_molecules_1;
  Kr_r040 = 0.06 s_1;
  Kf_r098 = 0.001660539 um3_s_1_molecules_1;
  Kr_r098 = 0.25 s_1;
  Km_r099 = 27099.64 molecules_um_3;
  Kcat_r099 = 7.35 s_1;
  Vmax_r099 has molecules_um_3_s_1;

  // Assignment rules:
  Vmax_r097 := Kcat_r097*PP1;
  Vmax_r096 := Kcat_r096*PKA;
  Vmax_r010 := Kcat_r010*AC5_Ga;
  Vmax_r093 := Kcat_r093*PP2A;
  Vmax_r094 := Kcat_r094*STEP;
  Vmax_r070 := Kcat_r070*PKA;
  Vmax_r060 := Kcat_r060*PDEbg_cGMP;
  Vmax_r072 := Kcat_r072*PP2A;
  Vmax_r085 := Kcat_r085*PKA;
  Vmax_r086 := Kcat_r086*PP2A;
  Vmax_r087 := Kcat_r087*BRaf_PKA;
  Vmax_r088 := Kcat_r088*BRaf_PKA;
  Vmax_r091 := Kcat_r091*MEK_active;
  Vmax_r089 := Kcat_r089*PP2A;
  Vmax_r090 := Kcat_r090*PP2A;
  Vmax_r092 := Kcat_r092*MEK_active;
  Vmax_r095 := Kcat_r095*STEP_PKA;
  Vmax_r025 := Kcat_r025*ACbg;
  Vmax_r047 := Kcat_r047*PP1;
  Vmax_r049 := 0.001660539*Kcat_r049*PP1;
  Vmax_r075 := Kcat_r075*PKA;
  Vmax_r077 := Kcat_r077*PKA;
  Vmax_r078 := Kcat_r078*PP1;
  Vmax_r080 := Kcat_r080*ERK_active;
  Vmax_r076 := Kcat_r076*PP1;
  Vmax_r079 := Kcat_r079*PP1;
  Vmax_r083 := Kcat_r083*PDE4_PKA;
  Vmax_r084 := Kcat_r084*PDE4_ERK;
  Vmax_r024 := Kcat_r024*PDEbg_cAMP;
  Vmax_r074 := Kcat_r074*ERK_active;
  Vmax_r081 := Kcat_r081*PDE4;
  Vmax_r046 := Kcat_r046*PKA;
  Vmax_r082 := Kcat_r082*PDE4_ERK_PKA;
  Vmax_r009 := Kcat_r009*AC5;
  Vmax_r039 := Kcat_r039*sGC_basal;
  Vmax_r099 := Kcat_r099*sGC_active;

  // Reactions:
  r097: STEP_PKA -> STEP; 0.001660539*STEP_PKA*Vmax_r097/(0.001660539*Km_r097 + 0.001660539*STEP_PKA)*IC;  // modifiers: PP1
  r096: STEP -> STEP_PKA; 0.001660539*STEP*Vmax_r096/(0.001660539*Km_r096 + 0.001660539*STEP)*IC;  // modifiers: PKA
  r010: $ATP -> cAMP; ATP*Vmax_r010/(ATP + Km_r010)*PM;  // modifiers: AC5_Ga
    r010_I = 0 pA_um_2; r010_netValence = 1 _one_;
  r093: ERK_active -> ERK_Tyr; 0.001660539*ERK_active*Vmax_r093/(0.001660539*ERK_active + 0.001660539*Km_r093)*IC;  // modifiers: PP2A
  r094: ERK_Tyr -> ERK; 0.001660539*ERK_Tyr*Vmax_r094/(0.001660539*ERK_Tyr + 0.001660539*Km_r094)*IC;  // modifiers: STEP
  r027: PDE1_cAMP -> PDE1 + AMP; (-(AMP*Kr_r027*PDE1) + Kf_r027*PDE1_cAMP)*IC;
  r044: R2C2_cAMP4 -> PKA + R2C_cAMP4; (Kf_r044*R2C2_cAMP4 - Kr_r044*PKA*R2C_cAMP4)*IC;
  r073: DARPP32_Pi_PP1 -> PP1 + DARPP32; (DARPP32_Pi_PP1*Kf_r073 - DARPP32*Kr_r073*PP1)*IC;
  r051: PDE1 + MMPX -> PDE1_inhibited; (Kf_r051*MMPX*PDE1 - Kr_r051*PDE1_inhibited)*IC;
  r070: DARPP32 -> DARPP32_Pi; 0.001660539*DARPP32*Vmax_r070/(0.001660539*DARPP32 + 0.001660539*Km_r070)*IC;  // modifiers: PKA
  r071: DARPP32_Pi + PP1 -> DARPP32_Pi_PP1; (-(DARPP32_Pi_PP1*Kr_r071) + DARPP32_Pi*Kf_r071*PP1)*IC;
  r019: PDE2_active + cGMP -> PDE2_active_cGMP; (-(Kr_r019*PDE2_active_cGMP) + Kf_r019*PDE2_active*cGMP)*IC;
  r054: PDE2 + Bay60 -> PDE2_inhibited; (Bay60*Kf_r054*PDE2 - Kr_r054*PDE2_inhibited)*IC;
  r058: PDE2_active_cAMP + Bay60 -> PDE2_inhibited; (Bay60*Kf_r058*PDE2_active_cAMP - Kr_r058*PDE2_inhibited)*IC;
  r001: Gaby + D1R -> D1R_Gaby; (D1R*Gaby*Kf_r001 - D1R_Gaby*Kr_r001)*PM;
    r001_I = 0 pA_um_2; r001_netValence = 1 _one_;
  r029: PDE1_cGMP -> GMP + PDE1; (-(GMP*Kr_r029*PDE1) + Kf_r029*PDE1_cGMP)*IC;
  r059: PDE2_active_cGMP + Bay60 -> PDE2_inhibited; (Bay60*Kf_r059*PDE2_active_cGMP - Kr_r059*PDE2_inhibited)*IC;
  r060: cGMP -> GMP; 0.001660539*Vmax_r060*cGMP/(0.001660539*Km_r060 + 0.001660539*cGMP)*IC;  // modifiers: PDEbg_cGMP
  r048: Four1N + GluA1_845 -> AMPAR; (Four1N*GluA1_845*Kf_r048 - AMPAR*Kr_r048)*PM;
    r048_I = 0 pA_um_2; r048_netValence = 1 _one_;
  r017: PDE2_cGMP -> GMP + PDE2; (-(GMP*Kr_r017*PDE2) + Kf_r017*PDE2_cGMP)*IC;
  r016: PDE2_cAMP -> AMP + PDE2; (-(AMP*Kr_r016*PDE2) + Kf_r016*PDE2_cAMP)*IC;
  r018: PDE2 + cAMP -> PDE2_cAMP; (-(Kr_r018*PDE2_cAMP) + Kf_r018*PDE2*cAMP)*IC;
  r028: PDE1 + cGMP -> PDE1_cGMP; (-(Kr_r028*PDE1_cGMP) + Kf_r028*PDE1*cGMP)*IC;
  r005: DA_D1R_Gaby -> Gby + Ga_GTP + DA_D1R; (DA_D1R_Gaby*Kf_r005 - DA_D1R*Ga_GTP*Gby*Kr_r005)*PM;
    r005_I = 0 pA_um_2; r005_netValence = 1 _one_;
  r053: PDE1_cGMP + MMPX -> PDE1_inhibited; (Kf_r053*MMPX*PDE1_cGMP - Kr_r053*PDE1_inhibited)*IC;
  r072: DARPP32_Pi -> DARPP32; 0.001660539*DARPP32_Pi*Vmax_r072/(0.001660539*DARPP32_Pi + 0.001660539*Km_r072)*IC;  // modifiers: PP2A
  r002: D1R_Gaby + DA -> DA_D1R_Gaby; (D1R_Gaby*DA*Kf_r002 - DA_D1R_Gaby*Kr_r002)*PM;
    r002_I = 0 pA_um_2; r002_netValence = 1 _one_;
  r026: PDE1 + cAMP -> PDE1_cAMP; (-(Kr_r026*PDE1_cAMP) + Kf_r026*PDE1*cAMP)*IC;
  r052: PDE1_cAMP + MMPX -> PDE1_inhibited; (Kf_r052*MMPX*PDE1_cAMP - Kr_r052*PDE1_inhibited)*IC;
  r011: PDE2 + cGMP -> PDE2_active; (-(Kr_r011*PDE2_active) + Kf_r011*PDE2*cGMP)*IC;
  r042: R2C2_cAMP2 + cAMP -> R2C2_cAMP3; (-(Kr_r042*R2C2_cAMP3) + Kf_r042*R2C2_cAMP2*cAMP)*IC;
  r085: BRaf -> BRaf_PKA; 0.001660539*BRaf*Vmax_r085/(0.001660539*BRaf + 0.001660539*Km_r085)*IC;  // modifiers: PKA
  r086: BRaf_PKA -> BRaf; 0.001660539*BRaf_PKA*Vmax_r086/(0.001660539*BRaf_PKA + 0.001660539*Km_r086)*IC;  // modifiers: PP2A
  r087: MEK -> MEK_Ser; 0.001660539*MEK*Vmax_r087/(0.001660539*Km_r087 + 0.001660539*MEK)*IC;  // modifiers: BRaf_PKA
  r088: MEK_Ser -> MEK_active; 0.001660539*MEK_Ser*Vmax_r088/(0.001660539*Km_r088 + 0.001660539*MEK_Ser)*IC;  // modifiers: BRaf_PKA
  r091: ERK -> ERK_Tyr; 0.001660539*ERK*Vmax_r091/(0.001660539*ERK + 0.001660539*Km_r091)*IC;  // modifiers: MEK_active
  r089: MEK_active -> MEK_Ser; 0.001660539*MEK_active*Vmax_r089/(0.001660539*Km_r089 + 0.001660539*MEK_active)*IC;  // modifiers: PP2A
  r090: MEK_Ser -> MEK; 0.001660539*MEK_Ser*Vmax_r090/(0.001660539*Km_r090 + 0.001660539*MEK_Ser)*IC;  // modifiers: PP2A
  r092: ERK_Tyr -> ERK_active; 0.001660539*ERK_Tyr*Vmax_r092/(0.001660539*ERK_Tyr + 0.001660539*Km_r092)*IC;  // modifiers: MEK_active
  r095: ERK_Tyr -> ERK; 0.001660539*ERK_Tyr*Vmax_r095/(0.001660539*ERK_Tyr + 0.001660539*Km_r095)*IC;  // modifiers: STEP_PKA
  r025: $ATP -> cAMP; ATP*Vmax_r025/(ATP + Km_r025)*PM;  // modifiers: ACbg
    r025_I = 0 pA_um_2; r025_netValence = 1 _one_;
  r000: D1R + DA -> DA_D1R; (D1R*DA*Kf_r000 - DA_D1R*Kr_r000)*PM;
    r000_I = 0 pA_um_2; r000_netValence = 1 _one_;
  r047: GluA1_845 -> $GluA1; 0.001660539*GluA1_845*Vmax_r047/(0.001660539*GluA1_845 + 0.001660539*Km_r047)*IC;  // modifiers: PP1
  r049: AMPAR -> GluA1_dephos; AMPAR*Vmax_r049/(AMPAR + Km_r049)*PM;  // modifiers: PP1
    r049_I = 0 pA_um_2; r049_netValence = 1 _one_;
  r050: GluA1_dephos -> $GluA1 + Four1N; (GluA1_dephos*Kf_r050 - Four1N*GluA1*Kr_r050)*PM;
    r050_I = 0 pA_um_2; r050_netValence = 1 _one_;
  r075: PDE4 -> PDE4_PKA; 0.001660539*PDE4*Vmax_r075/(0.001660539*Km_r075 + 0.001660539*PDE4)*IC;  // modifiers: PKA
  r007: Ga_GTP + AC5 -> AC5_Ga; (AC5*Ga_GTP*Kf_r007 - AC5_Ga*Kr_r007)*PM;
    r007_I = 0 pA_um_2; r007_netValence = 1 _one_;
  r006: Ga_GTP -> Ga_GDP; (Ga_GTP*Kf_r006 - Ga_GDP*Kr_r006)*PM;
    r006_I = 0 pA_um_2; r006_netValence = 1 _one_;
  r077: PDE4_ERK -> PDE4_ERK_PKA; 0.001660539*PDE4_ERK*Vmax_r077/(0.001660539*Km_r077 + 0.001660539*PDE4_ERK)*IC;  // modifiers: PKA
  r078: PDE4_ERK_PKA -> PDE4; 0.001660539*PDE4_ERK_PKA*Vmax_r078/(0.001660539*Km_r078 + 0.001660539*PDE4_ERK_PKA)*IC;  // modifiers: PP1
  r080: PDE4_PKA -> PDE4_ERK_PKA; 0.001660539*PDE4_PKA*Vmax_r080/(0.001660539*Km_r080 + 0.001660539*PDE4_PKA)*IC;  // modifiers: ERK_active
  r076: PDE4_ERK -> PDE4; 0.001660539*PDE4_ERK*Vmax_r076/(0.001660539*Km_r076 + 0.001660539*PDE4_ERK)*IC;  // modifiers: PP1
  r079: PDE4_PKA -> PDE4; 0.001660539*PDE4_PKA*Vmax_r079/(0.001660539*Km_r079 + 0.001660539*PDE4_PKA)*IC;  // modifiers: PP1
  r083: cAMP -> AMP; 0.001660539*Vmax_r083*cAMP/(0.001660539*Km_r083 + 0.001660539*cAMP)*IC;  // modifiers: PDE4_PKA
  r084: cAMP -> AMP; 0.001660539*Vmax_r084*cAMP/(0.001660539*Km_r084 + 0.001660539*cAMP)*IC;  // modifiers: PDE4_ERK
  r024: cAMP -> AMP; 0.001660539*Vmax_r024*cAMP/(0.001660539*Km_r024 + 0.001660539*cAMP)*IC;  // modifiers: PDEbg_cAMP
  r056: Bay60 + PDE2_cGMP -> PDE2_inhibited; (Bay60*Kf_r056*PDE2_cGMP - Kr_r056*PDE2_inhibited)*IC;
  r074: PDE4 -> PDE4_ERK; 0.001660539*PDE4*Vmax_r074/(0.001660539*Km_r074 + 0.001660539*PDE4)*IC;  // modifiers: ERK_active
  r081: cAMP -> AMP; 0.001660539*Vmax_r081*cAMP/(0.001660539*Km_r081 + 0.001660539*cAMP)*IC;  // modifiers: PDE4
  r012: cGMP + PDE2 -> PDE2_cGMP; (-(Kr_r012*PDE2_cGMP) + Kf_r012*PDE2*cGMP)*IC;
  r046: $GluA1 -> GluA1_845; 0.001660539*GluA1*Vmax_r046/(0.001660539*GluA1 + 0.001660539*Km_r046)*IC;  // modifiers: PKA
  r082: cAMP -> AMP; 0.001660539*Vmax_r082*cAMP/(0.001660539*Km_r082 + 0.001660539*cAMP)*IC;  // modifiers: PDE4_ERK_PKA
  r057: PDE2_active + Bay60 -> PDE2_inhibited; (Bay60*Kf_r057*PDE2_active - Kr_r057*PDE2_inhibited)*IC;
  r055: Bay60 + PDE2_cAMP -> PDE2_inhibited; (Bay60*Kf_r055*PDE2_cAMP - Kr_r055*PDE2_inhibited)*IC;
  r015: PDE2_active_cGMP -> GMP + PDE2_active; (-(GMP*Kr_r015*PDE2_active) + Kf_r015*PDE2_active_cGMP)*IC;
  r009: $ATP -> cAMP; ATP*Vmax_r009/(ATP + Km_r009)*PM;  // modifiers: AC5
    r009_I = 0 pA_um_2; r009_netValence = 1 _one_;
  r014: PDE2_active_cAMP -> AMP + PDE2_active; (-(AMP*Kr_r014*PDE2_active) + Kf_r014*PDE2_active_cAMP)*IC;
  r039: $GTP -> cGMP; 0.001660539*GTP*Vmax_r039/(0.001660539*GTP + 0.001660539*Km_r039)*IC;  // modifiers: sGC_basal
  r041: R2C2_cAMP + cAMP -> R2C2_cAMP2; (-(Kr_r041*R2C2_cAMP2) + Kf_r041*R2C2_cAMP*cAMP)*IC;
  r045: R2C_cAMP4 -> R2_cAMP4 + PKA; (Kf_r045*R2C_cAMP4 - Kr_r045*PKA*R2_cAMP4)*IC;
  r013: PDE2_active + cAMP -> PDE2_active_cAMP; (-(Kr_r013*PDE2_active_cAMP) + Kf_r013*PDE2_active*cAMP)*IC;
  r043: R2C2_cAMP3 + cAMP -> R2C2_cAMP4; (-(Kr_r043*R2C2_cAMP4) + Kf_r043*R2C2_cAMP3*cAMP)*IC;
  r004: Ga_GDP + Gby -> Gaby; (Ga_GDP*Gby*Kf_r004 - Gaby*Kr_r004)*PM;
    r004_I = 0 pA_um_2; r004_netValence = 1 _one_;
  r003: DA_D1R + Gaby -> DA_D1R_Gaby; (DA_D1R*Gaby*Kf_r003 - DA_D1R_Gaby*Kr_r003)*PM;
    r003_I = 0 pA_um_2; r003_netValence = 1 _one_;
  r040: cAMP + R2C2 -> R2C2_cAMP; (-(Kr_r040*R2C2_cAMP) + Kf_r040*R2C2*cAMP)*IC;
  r098: sGC_inactive + SNAP -> sGC_active; (-(Kr_r098*sGC_active) + Kf_r098*SNAP*sGC_inactive)*IC;
  r099: $GTP -> cGMP; 0.001660539*GTP*Vmax_r099/(0.001660539*GTP + 0.001660539*Km_r099)*IC;  // modifiers: sGC_active

  // Events:
  dopamine: at (61200) after (0 != 61200), t0=false: DA = 60.2214179;
  drug: at (61800) after (0 != 61800), t0=false: MMPX = 0, Bay60 = 0, SNAP = 0;

  // Unit definitions:
  unit molecules = item;
  unit um3 = (1e-6 metre)^3;
  unit um2 = (1e-6 metre)^2;
  unit um = 1e-6 metre;
  unit s = second;
  unit K = kelvin;
  unit _one_ = dimensionless;
  unit C_mol_1 = coulomb / mole;
  unit C_nmol_1 = coulomb / (1e-9 mole);
  unit molecules_pmol_1 = item / (1e-12 mole);
  unit _one_000000000 = 1e9 dimensionless;
  unit mV_C_K_1_mol_1 = 1e-3 volt * coulomb / (kelvin * mole);
  unit mV_V_1 = dimensionless;
  unit uM_um3_molecules_1 = 1e-6 mole * (1e-6 metre)^3 / (litre * item);
  unit molecules_um_3 = item / (1e-6 metre)^3;
  unit s_1 = 1 / second;
  unit molecules_um_3_s_1 = item / ((1e-6 metre)^3 * second);
  unit pA_um_2 = 1e-12 ampere / (1e-6 metre)^2;
  unit molecules_um_2_s_1 = item / ((1e-6 metre)^2 * second);
  unit um3_s_1_molecules_1 = (1e-6 metre)^3 / (second * item);
  unit um2_s_1_molecules_1 = (1e-6 metre)^2 / (second * item);
  unit um4_s_1_molecules_1 = (1e-6 metre)^4 / (second * item);
  unit um4_s_1_molecules_2 = (1e-6 metre)^4 / (second * item^2);
  unit molecules_um_2 = item / (1e-6 metre)^2;
  unit molecules_uM_1_um_2_s_1 = item * litre / (1e-6 mole * (1e-6 metre)^2 * second);
end
