// SBML level 3 version 1
// Exported by VCell 7.3

model Pin1_2domain_diffKds__w_Bivalentligand_diffKds__Application0()
  // Pin1_2domain(diffKds)_w_Bivalentligand(diffKds)_Application0
  // model units - substance: molecules, time: s, volume: um3, area: um2, length: um, extent: molecules

  // Compartments:
  compartment c0 = 50000 um3;

  // Species:
  substanceOnly species Pin1AA in c0 = 0;
  substanceOnly species Pin1BB in c0 = 0;
  substanceOnly species Pin1AB in c0 = 0;
  substanceOnly species Pin1BA in c0 = 0;
  substanceOnly species Lig in c0 = 1.324871e9;
  substanceOnly species Pin1 in c0 = 5.901699e9;
  substanceOnly species Pin1_B in c0 = 0;
  substanceOnly species Pin1BivAB in c0 = 0;
  substanceOnly species Pin1A_ in c0 = 0;
  substanceOnly species Pin1_A in c0 = 0;
  substanceOnly species Pin1B_ in c0 = 0;
  substanceOnly species Pin1BivBA in c0 = 0;
  substanceOnly species Pin1B_Pin1A_ in c0 = 0;
  substanceOnly species Pin1_APin1B_ in c0 = 0;
  substanceOnly species Pin1A_Pin1_B in c0 = 0;
  substanceOnly species Pin1_BPin1_A in c0 = 0;

  // Parameters:
  _T_ = 300 K;
  _PI_ = 3.141593 _one_;
  _F_ = 9.64853321e4 C_mol_1;
  _F_nmol_ = 9.64853321e-5 C_nmol_1;
  _N_pmol_ = 6.02214179e11 molecules_pmol_1;
  _K_GHK_ = 1e-9 _one_000000000;
  _R_ = 8314.463 mV_C_K_1_mol_1;
  K_millivolts_per_volt = 1000 mV_V_1;
  KMOLE = 0.001660539 uM_um3_molecules_1;
  Kf_r4 = 100 s_1;
  Kr_r4 = 18.5 s_1;
  Kf_r0 = 0.1660539 um3_s_1_molecules_1;
  Kr_r0 = 68100 s_1;
  Kf_r1 = 0.1660539 um3_s_1_molecules_1;
  Kr_r1 = 23100 s_1;
  Kf_r6 = 100 s_1;
  Kr_r6 = 23.1 s_1;
  Kf_r7 = 100 s_1;
  Kr_r7 = 68.1 s_1;
  Kf_r8 = 0.1660539 um3_s_1_molecules_1;
  Kr_r8 = 21500 s_1;
  Kf_r9 = 0.1660539 um3_s_1_molecules_1;
  Kr_r9 = 68100 s_1;
  Kf_r12 = 0.1660539 um3_s_1_molecules_1;
  Kr_r12 = 18500 s_1;
  Kf_r13 = 0.1660539 um3_s_1_molecules_1;
  Kr_r13 = 23100 s_1;
  Kf_r16 = 0.1660539 um3_s_1_molecules_1;
  Kr_r16 = 23100 s_1;
  Kf_r17 = 0.1660539 um3_s_1_molecules_1;
  Kr_r17 = 68100 s_1;
  Kf_r5 = 100 s_1;
  Kr_r5 = 21.5 s_1;
  Kf_r20 = 0.1660539 um3_s_1_molecules_1;
  Kr_r20 = 21500 s_1;
  Kf_r21 = 0.1660539 um3_s_1_molecules_1;
  Kr_r21 = 18500 s_1;
  Kf_r2 = 0.1660539 um3_s_1_molecules_1;
  Kr_r2 = 21500 s_1;
  Kf_r3 = 0.1660539 um3_s_1_molecules_1;
  Kr_r3 = 18500 s_1;
  Kf_r10 = 0.1660539 um3_s_1_molecules_1;
  Kr_r10 = 21500 s_1;
  Kf_r15 = 0.1660539 um3_s_1_molecules_1;
  Kr_r15 = 68100 s_1;
  Kf_r18 = 0.1660539 um3_s_1_molecules_1;
  Kr_r18 = 18500 s_1;
  Kf_r22 = 0.1660539 um3_s_1_molecules_1;
  Kr_r22 = 23100 s_1;
  Kf_r24 = 0.1660539 um3_s_1_molecules_1;
  Kr_r24 = 21500 s_1;
  Kf_r14 = 0.1660539 um3_s_1_molecules_1;
  Kr_r14 = 18500 s_1;
  Kf_r23 = 0.1660539 um3_s_1_molecules_1;
  Kr_r23 = 68100 s_1;
  Kf_r11 = 0.1660539 um3_s_1_molecules_1;
  Kr_r11 = 23100 s_1;

  // Reactions:
  r4: Pin1A_ -> Pin1BivAB; (Kf_r4*Pin1A_ - Kr_r4*Pin1BivAB)*c0;
  r0: Pin1 + Lig -> Pin1_A; (Kf_r0*Lig*Pin1 - Kr_r0*Pin1_A)*c0;
  r1: Pin1 + Lig -> Pin1B_; (Kf_r1*Lig*Pin1 - Kr_r1*Pin1B_)*c0;
  r6: Pin1_A -> Pin1BivBA; (-(Kr_r6*Pin1BivBA) + Kf_r6*Pin1_A)*c0;
  r7: Pin1B_ -> Pin1BivBA; (-(Kr_r7*Pin1BivBA) + Kf_r7*Pin1B_)*c0;
  r8: Pin1_A + Lig -> Pin1AA; (-(Kr_r8*Pin1AA) + Kf_r8*Lig*Pin1_A)*c0;
  r9: Lig + Pin1A_ -> Pin1AA; (-(Kr_r9*Pin1AA) + Kf_r9*Lig*Pin1A_)*c0;
  r12: Pin1B_ + Lig -> Pin1BB; (-(Kr_r12*Pin1BB) + Kf_r12*Lig*Pin1B_)*c0;
  r13: Pin1_B + Lig -> Pin1BB; (-(Kr_r13*Pin1BB) + Kf_r13*Lig*Pin1_B)*c0;
  r16: Pin1_A + Lig -> Pin1BA; (-(Kr_r16*Pin1BA) + Kf_r16*Lig*Pin1_A)*c0;
  r17: Pin1B_ + Lig -> Pin1BA; (-(Kr_r17*Pin1BA) + Kf_r17*Lig*Pin1B_)*c0;
  r5: Pin1_B -> Pin1BivAB; (-(Kr_r5*Pin1BivAB) + Kf_r5*Pin1_B)*c0;
  r20: Pin1_B + Lig -> Pin1AB; (-(Kr_r20*Pin1AB) + Kf_r20*Lig*Pin1_B)*c0;
  r21: Pin1A_ + Lig -> Pin1AB; (-(Kr_r21*Pin1AB) + Kf_r21*Lig*Pin1A_)*c0;
  r2: Pin1 + Lig -> Pin1A_; (Kf_r2*Lig*Pin1 - Kr_r2*Pin1A_)*c0;
  r3: Pin1 + Lig -> Pin1_B; (Kf_r3*Lig*Pin1 - Kr_r3*Pin1_B)*c0;
  r10: Pin1 + Pin1B_ -> Pin1B_Pin1A_; (Kf_r10*Pin1*Pin1B_ - Kr_r10*Pin1B_Pin1A_)*c0;
  r15: Pin1 + Pin1_B -> Pin1_BPin1_A; (Kf_r15*Pin1*Pin1_B - Kr_r15*Pin1_BPin1_A)*c0;
  r18: Pin1 + Pin1A_ -> Pin1A_Pin1_B; (Kf_r18*Pin1*Pin1A_ - Kr_r18*Pin1A_Pin1_B)*c0;
  r22: Pin1 + Pin1_A -> Pin1_APin1B_; (Kf_r22*Pin1*Pin1_A - Kr_r22*Pin1_APin1B_)*c0;
  r24: Pin1_B + Pin1 -> Pin1A_Pin1_B; (-(Kr_r24*Pin1A_Pin1_B) + Kf_r24*Pin1*Pin1_B)*c0;
  r14: Pin1_A + Pin1 -> Pin1_BPin1_A; (Kf_r14*Pin1*Pin1_A - Kr_r14*Pin1_BPin1_A)*c0;
  r23: Pin1B_ + Pin1 -> Pin1_APin1B_; (Kf_r23*Pin1*Pin1B_ - Kr_r23*Pin1_APin1B_)*c0;
  r11: Pin1A_ + Pin1 -> Pin1B_Pin1A_; (Kf_r11*Pin1*Pin1A_ - Kr_r11*Pin1B_Pin1A_)*c0;

  // Unit definitions:
  unit molecules = item;
  unit um3 = (1e-6 metre)^3;
  unit um2 = (1e-6 metre)^2;
  unit um = 1e-6 metre;
  unit s = second;
  unit K = kelvin;
  unit _one_ = dimensionless;
  unit C_mol_1 = coulomb / mole;
  unit C_nmol_1 = coulomb / (1e-9 mole);
  unit molecules_pmol_1 = item / (1e-12 mole);
  unit _one_000000000 = 1e9 dimensionless;
  unit mV_C_K_1_mol_1 = 1e-3 volt * coulomb / (kelvin * mole);
  unit mV_V_1 = dimensionless;
  unit uM_um3_molecules_1 = 1e-6 mole * (1e-6 metre)^3 / (litre * item);
  unit s_1 = 1 / second;
  unit um3_s_1_molecules_1 = (1e-6 metre)^3 / (second * item);
end
