// SBML level 3 version 1
// Exported by VCell 7.3

model Pin1_2Domains_diffKds__monovalentligand_Application0()
  // Pin1_2Domains(diffKds)_monovalentligand_Application0
  // model units - substance: molecules, time: s, volume: um3, area: um2, length: um, extent: molecules

  // Compartments:
  compartment c0 = 50000 um3;

  // Species:
  substanceOnly species P_A in c0 = 0;
  substanceOnly species A in c0 = 1.234539e9;
  substanceOnly species PAA in c0 = 0;
  substanceOnly species P in c0 = 5.163987e9;
  substanceOnly species PA_ in c0 = 0;

  // Parameters:
  _T_ = 300 K;
  _PI_ = 3.141593 _one_;
  _F_ = 9.64853321e4 C_mol_1;
  _F_nmol_ = 9.64853321e-5 C_nmol_1;
  _N_pmol_ = 6.02214179e11 molecules_pmol_1;
  _K_GHK_ = 1e-9 _one_000000000;
  _R_ = 8314.463 mV_C_K_1_mol_1;
  K_millivolts_per_volt = 1000 mV_V_1;
  KMOLE = 0.001660539 uM_um3_molecules_1;
  Kf_r0 = 0.1660539 um3_s_1_molecules_1;
  Kr_r0 = 14500 s_1;
  Kf_r1 = 0.1660539 um3_s_1_molecules_1;
  Kr_r1 = 42400 s_1;
  Kf_r2 = 0.1660539 um3_s_1_molecules_1;
  Kr_r2 = 14500 s_1;
  Kf_r3 = 0 um3_s_1_molecules_1;
  Kr_r3 = 42400 s_1;

  // Reactions:
  r0: A + P -> PA_; (A*Kf_r0*P - Kr_r0*PA_)*c0;
  r1: P + A -> P_A; (A*Kf_r1*P - Kr_r1*P_A)*c0;
  r2: P_A + A -> PAA; (-(Kr_r2*PAA) + A*Kf_r2*P_A)*c0;
  r3: PA_ + A -> PAA; (-(Kr_r3*PAA) + A*Kf_r3*PA_)*c0;

  // Unit definitions:
  unit molecules = item;
  unit um3 = (1e-6 metre)^3;
  unit um2 = (1e-6 metre)^2;
  unit um = 1e-6 metre;
  unit s = second;
  unit K = kelvin;
  unit _one_ = dimensionless;
  unit C_mol_1 = coulomb / mole;
  unit C_nmol_1 = coulomb / (1e-9 mole);
  unit molecules_pmol_1 = item / (1e-12 mole);
  unit _one_000000000 = 1e9 dimensionless;
  unit mV_C_K_1_mol_1 = 1e-3 volt * coulomb / (kelvin * mole);
  unit mV_V_1 = dimensionless;
  unit uM_um3_molecules_1 = 1e-6 mole * (1e-6 metre)^3 / (litre * item);
  unit um3_s_1_molecules_1 = (1e-6 metre)^3 / (second * item);
  unit s_1 = 1 / second;
end
