// SBML level 3 version 1
// Exported by VCell 7.3

model spatial_protection_test__two_way_competition_orginal___paper_model_shared_Application2()
  // spatial protection test- two way competition orginal - paper model shared_Application2
  // model units - substance: molecules, time: s, volume: um3, area: um2, length: um, extent: molecules

  // Compartments:
  compartment nuclear_membrane = 51 um3;
  compartment cytoplasm = 2585 um3;
  compartment extracellular = 4e13 um3;
  compartment membrane = 205 um3;
  compartment nucleus = 347 um3;

  // Species:
  substanceOnly species SH2A in cytoplasm = 373613.7;
  substanceOnly species pYA in membrane = 0;
  substanceOnly species YA in membrane = 999976.6;
  substanceOnly species pYASH2A in membrane = 0;
  substanceOnly species pYASH2B in membrane = 0;
  substanceOnly species SH2B in cytoplasm = 0;
  substanceOnly species Kinase_EGF in membrane = 0;
  substanceOnly species kinase in membrane = 99997.66;
  substanceOnly species EGF in extracellular = 9.635427e12;

  // Parameters:
  _T_ = 300 K;
  _PI_ = 3.141593 _one_;
  _F_ = 9.64853321e4 C_mol_1;
  _F_nmol_ = 9.64853321e-5 C_nmol_1;
  _N_pmol_ = 6.02214179e11 molecules_pmol_1;
  _K_GHK_ = 1e-9 _one_000000000;
  _R_ = 8314.463 mV_C_K_1_mol_1;
  K_millivolts_per_volt = 1000 mV_V_1;
  KMOLE = 0.001660539 uM_um3_molecules_1;
  Kf_r4 = 0.001660539 um3_s_1_molecules_1;
  Kr_r4 = 1.5 s_1;
  Kf_r7 = 0.0008966909 um3_s_1_molecules_1;
  Kr_r7 = 0 um3_s_1_molecules_1;
  Kf_r6 = 0.1046139 um3_s_1_molecules_1;
  Kr_r6 = 0.16 s_1;
  Km_r0 = 198.7307 molecules_um_3;
  Vmax_r0 = 560.0592 molecules_um_3_s_1;
  Kf_r1 = 0.001660539 um3_s_1_molecules_1;
  Kr_r1 = 1.5 s_1;

  // Reactions:
  r4: pYA + SH2A -> pYASH2A; (Kf_r4*SH2A*pYA - Kr_r4*pYASH2A)*membrane;
  r7: YA + Kinase_EGF -> pYA + Kinase_EGF; (Kf_r7*Kinase_EGF*YA - Kinase_EGF*Kr_r7*pYA)*membrane;
  r6: kinase + EGF -> Kinase_EGF; (-(Kinase_EGF*Kr_r6) + EGF*Kf_r6*kinase)*membrane;
  r0: pYA -> YA; 0.001660539*Vmax_r0*pYA/(0.001660539*Km_r0 + 0.001660539*pYA)*membrane;
  r1: pYA + SH2B -> pYASH2B; (Kf_r1*SH2B*pYA - Kr_r1*pYASH2B)*membrane;

  // Unit definitions:
  unit molecules = item;
  unit um3 = (1e-6 metre)^3;
  unit um2 = (1e-6 metre)^2;
  unit um = 1e-6 metre;
  unit s = second;
  unit K = kelvin;
  unit _one_ = dimensionless;
  unit C_mol_1 = coulomb / mole;
  unit C_nmol_1 = coulomb / (1e-9 mole);
  unit molecules_pmol_1 = item / (1e-12 mole);
  unit _one_000000000 = 1e9 dimensionless;
  unit mV_C_K_1_mol_1 = 1e-3 volt * coulomb / (kelvin * mole);
  unit mV_V_1 = dimensionless;
  unit uM_um3_molecules_1 = 1e-6 mole * (1e-6 metre)^3 / (litre * item);
  unit um3_s_1_molecules_1 = (1e-6 metre)^3 / (second * item);
  unit s_1 = 1 / second;
  unit molecules_um_3 = item / (1e-6 metre)^3;
  unit molecules_um_3_s_1 = item / ((1e-6 metre)^3 * second);
end
