// SBML level 3 version 1
// Exported by VCell 7.3

model Surve_et_al_RAF1__sorafenib_after_30_min_EGF_pretreatment()
  // Surve_et_al_RAF1_+sorafenib after 30 min EGF pretreatment
  // model units - substance: molecules, time: min, volume: um3, area: um2, length: um, extent: molecules

  // Compartments:
  compartment cytoplasm = 1 um3;
  compartment pm = 1;  // 2-D

  // Species:
  substanceOnly species $sorafenib in cytoplasm = 6022.14179*(t > 30);
  substanceOnly species $GTP_Ras in pm = A*t*exp(-(t/B)) + C*t/(t + D);
  substanceOnly species Raf1 in cytoplasm = 7226570;
  substanceOnly species pRaf1 in cytoplasm = 0;
  substanceOnly species Ras_Raf1 in pm = 0;
  substanceOnly species Ras_iRaf1 in pm = 0;
  substanceOnly species Ras_pRaf1_Raf1_tetramer in pm = 0;
  substanceOnly species Ras_BRaf in pm = 0;
  substanceOnly species Ras_pRaf1 in pm = 0;
  substanceOnly species Ras_BRaf_Raf1_tetramer in pm = 0;
  substanceOnly species Ras_iRaf1_tetramer in pm = 0;
  substanceOnly species iRaf1 in cytoplasm = 0;
  substanceOnly species BRaf in cytoplasm = 602214.2;
  substanceOnly species Ras_Braf_iRaf1_tetramer in pm = 0;
  substanceOnly species Ras_pRaf1_tetramer in pm = 0;
  substanceOnly species Ras_BRaf_pRaf1_tetramer in pm = 0;
  substanceOnly species MEK in cytoplasm = 3.011071e8;
  substanceOnly species pMEK in cytoplasm = 0;
  substanceOnly species ERK in cytoplasm = 3.613285e8;
  substanceOnly species iBRaf in cytoplasm = 0;
  substanceOnly species Ras_Raf1_iBRaf_tetramer in pm = 0;
  substanceOnly species Ras_pRaf1_iBRaf_tetramer in pm = 0;
  substanceOnly species pERK in cytoplasm = 0;
  substanceOnly species iBRaf_dimer in pm = 0;
  substanceOnly species BRaf_dimer in pm = 0;
  substanceOnly species Ras_iBRaf in pm = 0;
  substanceOnly species Ras_nfpRaf1 in pm = 0;
  substanceOnly species nfpRaf1 in cytoplasm = 0;
  substanceOnly species Ras_nfpBRaf in pm = 0;
  substanceOnly species nfpBRaf in cytoplasm = 0;
  substanceOnly species BRaf_iBRaf_dimer in pm = 0;
  substanceOnly species Ras_nfpiBRaf in pm = 0;
  substanceOnly species nfpiBRaf in cytoplasm = 0;
  substanceOnly species Ras_nfpiRaf1 in pm = 0;
  substanceOnly species nfpiRaf1 in cytoplasm = 0;
  substanceOnly species Ras_iRaf1_iBRaf1_tetramer in pm = 0;

  // Parameters:
  kSon = 100000 uM_1_min_1;
  kSoff = 420 min_1;
  kpR1 = 186 min_1;
  kdR1f = 0.0191 molecules_1_min_1;
  kR1f = 1.84e-7 molecules_min_1;
  kR1r = 0.212 min_1;
  kBf = 2.47e-7 min_1_molecules_1;
  kBr = 0.0367 min_1;
  kdR1r = 111 min_1;
  kdpR1 = 0.6 min_1;
  A = 20671;
  B = 3.6724;
  C = 6.7089e16;
  kiR1f = 1.84e-7 min_1_molecules_1;
  kiR1r = 0.212 min_1;
  kMEKp = 6e-6 molecules_1_min_1;
  kERKp = 6e-5 min_1_molecules_1;
  kERKdp = 0.6 min_1;
  kMEKdp = 0.6 min_1;
  kiBf = 2.47e-7 molecules_1_min_1;
  kiBr = 0.0367 min_1;
  kfpR1r = 2.12 min_1;
  kfpBr = 0.367 min_1;
  knfpBR1 = 6e-7 min_1_molecules_1;
  D = 1.1735e15;
  As = 21930.67;
  Bs = 3.30082;
  Cs = 5.377558e16;
  Ds = 1.422628e15;
  _T_ = 300 K;
  _PI_ = 3.141593 _one_;
  _F_ = 9.64853321e4 C_mol_1;
  _F_nmol_ = 9.64853321e-5 C_nmol_1;
  _N_pmol_ = 6.02214179e11 molecules_pmol_1;
  _K_GHK_ = 1e-9 _one_000000000;
  _R_ = 8314.463 mV_C_K_1_mol_1;
  K_millivolts_per_volt = 1000 mV_V_1;
  KMOLE = 0.001660539 uM_um3_molecules_1;
  Kf_Ras_Raf1_bind has um3_min_1_molecules_1;
  Kr_Ras_Raf1_bind has min_1;
  Kf_BRaf_Raf1_bind has um2_min_1_molecules_1;
  Kr_BRaf_Raf1_bind has min_1;
  Kr_BRaf_Raf1_phosph = 0 min_1;
  Kf_BRaf_Raf1_phosph has min_1;
  Kf_Ras_pRaf1_unbind has min_1;
  Kr_Ras_pRaf1_unbind has um3_min_1_molecules_1;
  Kf_Ras_BRaf_bind has um3_min_1_molecules_1;
  Kr_Ras_BRaf_bind has min_1;
  Kf_pRaf1_Raf1_bind has um2_min_1_molecules_1;
  Kr_pRaf1_Raf1_bind has min_1;
  Kr_pRaf1_Raf1_phosph = 0 min_1;
  Kf_pRaf1_Raf1_phosph has min_1;
  Kf_sorafenib_Raf1_bind_cyt has um3_min_1_molecules_1;
  Kr_sorafenib_Raf1_bind_cyt has min_1;
  Kf_Ras_iRaf1_bind has um3_min_1_molecules_1;
  Kr_Ras_iRaf1_bind has min_1;
  Kf_iRaf1_iRaf1_bind has um2_min_1_molecules_1;
  Kr_iRaf1_iRaf1_bind has min_1;
  Kf_BRaf_iRaf1_bind has um2_min_1_molecules_1;
  Kr_BRaf_iRaf1_bind has min_1;
  Kr_pRaf1_dephosph = 0 min_1;
  Kf_pRaf1_dephosph has min_1;
  Kf_pRaf1_pRaf1_unbind has min_1;
  Kr_pRaf1_pRaf1_unbind has um2_min_1_molecules_1;
  Kf_BRaf_pRaf1_unbind has min_1;
  Kr_BRaf_pRaf1_unbind has um2_min_1_molecules_1;
  Kf_sorafenib_BRaf_bind_cyt has um3_min_1_molecules_1;
  Kr_sorafenib_BRaf_bind_cyt has min_1;
  Kr_MEK_p = 0 min_1;
  Kf_MEK_p has min_1;
  Kr_MEK_dp = 0 min_1;
  Kf_MEK_dp has min_1;
  Kr_ERK_p = 0 min_1;
  Kf_ERK_p has min_1;
  Kr_ERK_dp = 0 min_1;
  Kf_ERK_dp has min_1;
  Kf_Ras_iBRaf_b has um_min_1;
  Kr_Ras_iBRaf_b has min_1;
  Kf_iBRaf_dim has min_1;
  Kr_iBRaf_dim has min_1;
  Kf_iBRaf_Raf1_bind has um2_min_1_molecules_1;
  Kr_iBRaf_Raf1_bind has min_1;
  Kr_Raf1_iBRaf_p = 0 min_1;
  Kf_Raf1_iBRaf_p has min_1;
  Kf_pRaf1_iBRaf_ub has min_1;
  Kr_pRaf1_iBRaf_ub has um2_min_1_molecules_1;
  Kf_BRaf_dim has min_1;
  Kr_BRaf_dim has min_1;
  Kr_Ras_pRaf1_dp = 0 min_1;
  Kf_Ras_pRaf1_dp has min_1;
  Kr_Ras_Raf1_nfp = 0 min_1;
  Kf_Ras_Raf1_nfp has min_1;
  Kr_nfpRaf1_ub = 0 um3_min_1_molecules_1;
  Kf_nfpRaf1_ub has min_1;
  Kr_nfpRaf1_dp = 0 min_1;
  Kf_nfpRaf1_dp has min_1;
  Kr_BRaf_nfp = 0 min_1;
  Kf_BRaf_nfp has min_1;
  Kr_nfpBRaf_ub = 0 um3_min_1_molecules_1;
  Kf_nfpBRaf_ub has min_1;
  Kr_nfpBRaf_dp = 0 min_1;
  Kf_nfpBRaf_dp has min_1;
  Kf_BRaf_iBRaf_dim has um2_min_1_molecules_1;
  Kr_BRaf_iBRaf_dim has min_1;
  Kr_Ras_iRaf_nfp = 0 min_1;
  Kf_Ras_iRaf_nfp has min_1;
  Kr_nfpiRaf1_ub = 0 um3_min_1_molecules_1;
  Kf_nfpiRaf1_ub has min_1;
  Kr_nfpiRaf_dp = 0 min_1;
  Kf_nfpiRaf_dp has min_1;
  Kr_Ras_iBRaf_nfp = 0 min_1;
  Kf_Ras_iBRaf_nfp has min_1;
  Kr_nfpiBRaf_ub = 0 um3_min_1_molecules_1;
  Kf_nfpiBRaf_ub has min_1;
  Kr_nfpiBRaf_dp = 0 min_1;
  Kf_nfpiBRaf_dp has min_1;
  Kf_iRaf_iBRaf_dim has um2_min_1_molecules_1;
  Kr_iRaf_iBRaf_dim has min_1;

  // Assignment rules:
  boundRaf_frac_parameter := Raf1_pm_param/(Raf1_cyt_param + Raf1_pm_param);
  RasGTP_parameter := GTP_Ras + 2*(Ras_iRaf1_tetramer + Ras_Braf_iRaf1_tetramer + Ras_BRaf_Raf1_tetramer + Ras_pRaf1_Raf1_tetramer + Ras_BRaf_pRaf1_tetramer + Ras_pRaf1_tetramer + BRaf_dimer + BRaf_iBRaf_dimer + iBRaf_dimer + Ras_iRaf1_iBRaf1_tetramer + Ras_Raf1_iBRaf_tetramer + Ras_pRaf1_iBRaf_tetramer) + Ras_BRaf + Ras_iRaf1 + Ras_pRaf1 + Ras_Raf1 + Ras_nfpRaf1 + Ras_nfpiRaf1 + Ras_iBRaf + Ras_nfpiBRaf + Ras_nfpBRaf;
  Raf1_pm_param := Ras_pRaf1 + 2*Ras_pRaf1_Raf1_tetramer + Ras_BRaf_Raf1_tetramer + Ras_iRaf1 + Ras_Raf1 + 2*Ras_iRaf1_tetramer + Ras_Braf_iRaf1_tetramer + Ras_BRaf_pRaf1_tetramer + 2*Ras_pRaf1_tetramer + Ras_nfpiRaf1 + Ras_nfpRaf1 + Ras_iRaf1_iBRaf1_tetramer + Ras_Raf1_iBRaf_tetramer + Ras_pRaf1_iBRaf_tetramer;
  Raf1_cyt_param := 0.001660539*Raf1 + 0.001660539*pRaf1 + 0.001660539*iRaf1 + 0.001660539*nfpRaf1 + 0.001660539*nfpiRaf1;
  active_Raf := 2*BRaf_dimer + Ras_BRaf_Raf1_tetramer + 2*Ras_BRaf_pRaf1_tetramer + Ras_pRaf1_iBRaf_tetramer + Ras_pRaf1 + Ras_pRaf1_Raf1_tetramer + 2*Ras_pRaf1_tetramer + 0.001660539*pRaf1 + BRaf_iBRaf_dimer + Ras_Braf_iRaf1_tetramer;
  Kf_Ras_Raf1_bind := 0.001660539*kR1f;
  Kr_Ras_Raf1_bind := kR1r;
  Kf_BRaf_Raf1_bind := kdR1f;
  Kr_BRaf_Raf1_bind := kdR1r;
  Kf_BRaf_Raf1_phosph := kpR1;
  Kf_Ras_pRaf1_unbind := kR1r;
  Kr_Ras_pRaf1_unbind := 0.001660539*kR1f;
  Kf_Ras_BRaf_bind := 0.001660539*kBf;
  Kr_Ras_BRaf_bind := kBr;
  Kf_pRaf1_Raf1_bind := kdR1f;
  Kr_pRaf1_Raf1_bind := kdR1r;
  Kf_pRaf1_Raf1_phosph := kpR1;
  Kf_sorafenib_Raf1_bind_cyt := 0.001660539*kSon;
  Kr_sorafenib_Raf1_bind_cyt := kSoff;
  Kf_Ras_iRaf1_bind := 0.001660539*kiR1f;
  Kr_Ras_iRaf1_bind := kiR1r;
  Kf_iRaf1_iRaf1_bind := kdR1f;
  Kr_iRaf1_iRaf1_bind := kdR1r;
  Kf_BRaf_iRaf1_bind := kdR1f;
  Kr_BRaf_iRaf1_bind := kdR1r;
  Kf_pRaf1_dephosph := kdpR1;
  Kf_pRaf1_pRaf1_unbind := kdR1r;
  Kr_pRaf1_pRaf1_unbind := kdR1f;
  Kf_BRaf_pRaf1_unbind := kdR1r;
  Kr_BRaf_pRaf1_unbind := kdR1f;
  Kf_sorafenib_BRaf_bind_cyt := 0.001660539*kSon;
  Kr_sorafenib_BRaf_bind_cyt := kSoff;
  Kf_MEK_p := kMEKp*active_Raf;
  Kf_MEK_dp := kMEKdp;
  Kf_ERK_p := 0.001660539*kERKp*pMEK;
  Kf_ERK_dp := kERKdp;
  Kf_Ras_iBRaf_b := 0.001660539*kiBf;
  Kr_Ras_iBRaf_b := kiBr;
  Kf_iBRaf_dim := kdR1f;
  Kr_iBRaf_dim := kdR1r;
  Kf_iBRaf_Raf1_bind := kdR1f;
  Kr_iBRaf_Raf1_bind := kdR1r;
  Kf_Raf1_iBRaf_p := kpR1;
  Kf_pRaf1_iBRaf_ub := kdR1r;
  Kr_pRaf1_iBRaf_ub := kdR1f;
  Kf_BRaf_dim := kdR1f;
  Kr_BRaf_dim := kdR1r;
  Kf_Ras_pRaf1_dp := kdpR1;
  Kf_Ras_Raf1_nfp := 0.001660539*knfpBR1*pERK;
  Kf_nfpRaf1_ub := kfpR1r;
  Kf_nfpRaf1_dp := kdpR1;
  Kf_BRaf_nfp := 0.001660539*knfpBR1*pERK;
  Kf_nfpBRaf_ub := kfpBr;
  Kf_nfpBRaf_dp := kdpR1;
  Kf_BRaf_iBRaf_dim := kdR1f;
  Kr_BRaf_iBRaf_dim := kdR1r;
  Kf_Ras_iRaf_nfp := 0.001660539*kpR1*pERK;
  Kf_nfpiRaf1_ub := kfpR1r;
  Kf_nfpiRaf_dp := kdpR1;
  Kf_Ras_iBRaf_nfp := 0.001660539*knfpBR1*pERK;
  Kf_nfpiBRaf_ub := kfpBr;
  Kf_nfpiBRaf_dp := kdpR1;
  Kf_iRaf_iBRaf_dim := kdR1f;
  Kr_iRaf_iBRaf_dim := kdR1r;

  // Reactions:
  Ras_Raf1_bind: Raf1 + $GTP_Ras -> Ras_Raf1; (GTP_Ras*Kf_Ras_Raf1_bind*Raf1 - Kr_Ras_Raf1_bind*Ras_Raf1)*pm;
    Ras_Raf1_bind_I = 0 pA_um_2; Ras_Raf1_bind_netValence = 1 _one_;
  BRaf_Raf1_bind: Ras_BRaf + Ras_Raf1 -> Ras_BRaf_Raf1_tetramer; (-(Ras_BRaf_Raf1_tetramer*Kr_BRaf_Raf1_bind) + Kf_BRaf_Raf1_bind*Ras_BRaf*Ras_Raf1)*pm;
    BRaf_Raf1_bind_I = 0 pA_um_2; BRaf_Raf1_bind_netValence = 1 _one_;
  BRaf_Raf1_phosph: Ras_BRaf_Raf1_tetramer -> Ras_BRaf_pRaf1_tetramer; (Kf_BRaf_Raf1_phosph*Ras_BRaf_Raf1_tetramer - Kr_BRaf_Raf1_phosph*Ras_BRaf_pRaf1_tetramer)*pm;
    BRaf_Raf1_phosph_I = 0 pA_um_2; BRaf_Raf1_phosph_netValence = 1 _one_;
  Ras_pRaf1_unbind: Ras_pRaf1 -> pRaf1 + $GTP_Ras; (Kf_Ras_pRaf1_unbind*Ras_pRaf1 - GTP_Ras*Kr_Ras_pRaf1_unbind*pRaf1)*pm;
    Ras_pRaf1_unbind_I = 0 pA_um_2; Ras_pRaf1_unbind_netValence = 1 _one_;
  Ras_BRaf_bind: BRaf + $GTP_Ras -> Ras_BRaf; (BRaf*GTP_Ras*Kf_Ras_BRaf_bind - Kr_Ras_BRaf_bind*Ras_BRaf)*pm;
    Ras_BRaf_bind_I = 0 pA_um_2; Ras_BRaf_bind_netValence = 1 _one_;
  pRaf1_Raf1_bind: Ras_pRaf1 + Ras_Raf1 -> Ras_pRaf1_Raf1_tetramer; (Kf_pRaf1_Raf1_bind*Ras_Raf1*Ras_pRaf1 - Kr_pRaf1_Raf1_bind*Ras_pRaf1_Raf1_tetramer)*pm;
    pRaf1_Raf1_bind_I = 0 pA_um_2; pRaf1_Raf1_bind_netValence = 1 _one_;
  pRaf1_Raf1_phosph: Ras_pRaf1_Raf1_tetramer -> Ras_pRaf1_tetramer; (Kf_pRaf1_Raf1_phosph*Ras_pRaf1_Raf1_tetramer - Kr_pRaf1_Raf1_phosph*Ras_pRaf1_tetramer)*pm;
    pRaf1_Raf1_phosph_I = 0 pA_um_2; pRaf1_Raf1_phosph_netValence = 1 _one_;
  sorafenib_Raf1_bind_cyt: $sorafenib + Raf1 -> iRaf1; (-(Kr_sorafenib_Raf1_bind_cyt*iRaf1) + Kf_sorafenib_Raf1_bind_cyt*Raf1*sorafenib)*cytoplasm;
  Ras_iRaf1_bind: iRaf1 + $GTP_Ras -> Ras_iRaf1; (-(Ras_iRaf1*Kr_Ras_iRaf1_bind) + GTP_Ras*Kf_Ras_iRaf1_bind*iRaf1)*pm;
    Ras_iRaf1_bind_I = 0 pA_um_2; Ras_iRaf1_bind_netValence = 1 _one_;
  iRaf1_iRaf1_bind: 2 Ras_iRaf1 -> Ras_iRaf1_tetramer; (-(Ras_iRaf1_tetramer*Kr_iRaf1_iRaf1_bind) + Kf_iRaf1_iRaf1_bind*Ras_iRaf1^2)*pm;
    iRaf1_iRaf1_bind_I = 0 pA_um_2; iRaf1_iRaf1_bind_netValence = 1 _one_;
  BRaf_iRaf1_bind: Ras_BRaf + Ras_iRaf1 -> Ras_Braf_iRaf1_tetramer; (-(Ras_Braf_iRaf1_tetramer*Kr_BRaf_iRaf1_bind) + Kf_BRaf_iRaf1_bind*Ras_BRaf*Ras_iRaf1)*pm;
    BRaf_iRaf1_bind_I = 0 pA_um_2; BRaf_iRaf1_bind_netValence = 1 _one_;
  pRaf1_dephosph: pRaf1 -> Raf1; (-(Kr_pRaf1_dephosph*Raf1) + Kf_pRaf1_dephosph*pRaf1)*cytoplasm;
  pRaf1_pRaf1_unbind: Ras_pRaf1_tetramer -> 2 Ras_pRaf1; (Kf_pRaf1_pRaf1_unbind*Ras_pRaf1_tetramer - Kr_pRaf1_pRaf1_unbind*Ras_pRaf1^2)*pm;
    pRaf1_pRaf1_unbind_I = 0 pA_um_2; pRaf1_pRaf1_unbind_netValence = 1 _one_;
  BRaf_pRaf1_unbind: Ras_BRaf_pRaf1_tetramer -> Ras_BRaf + Ras_pRaf1; (Kf_BRaf_pRaf1_unbind*Ras_BRaf_pRaf1_tetramer - Kr_BRaf_pRaf1_unbind*Ras_BRaf*Ras_pRaf1)*pm;
    BRaf_pRaf1_unbind_I = 0 pA_um_2; BRaf_pRaf1_unbind_netValence = 1 _one_;
  sorafenib_BRaf_bind_cyt: $sorafenib + BRaf -> iBRaf; (-(Kr_sorafenib_BRaf_bind_cyt*iBRaf) + BRaf*Kf_sorafenib_BRaf_bind_cyt*sorafenib)*cytoplasm;
  MEK_p: MEK -> pMEK; (Kf_MEK_p*MEK - Kr_MEK_p*pMEK)*cytoplasm;
  MEK_dp: pMEK -> MEK; (-(Kr_MEK_dp*MEK) + Kf_MEK_dp*pMEK)*cytoplasm;
  ERK_p: ERK -> pERK; (ERK*Kf_ERK_p - Kr_ERK_p*pERK)*cytoplasm;  // modifiers: pMEK
  ERK_dp: pERK -> ERK; (-(ERK*Kr_ERK_dp) + Kf_ERK_dp*pERK)*cytoplasm;
  Ras_iBRaf_b: iBRaf -> Ras_iBRaf; (-(Ras_iBRaf*Kr_Ras_iBRaf_b) + Kf_Ras_iBRaf_b*iBRaf)*pm;
    Ras_iBRaf_b_I = 0 pA_um_2; Ras_iBRaf_b_netValence = 1 _one_;
  iBRaf_dim: Ras_iBRaf -> iBRaf_dimer; (Kf_iBRaf_dim*Ras_iBRaf - Kr_iBRaf_dim*iBRaf_dimer)*pm;
    iBRaf_dim_I = 0 pA_um_2; iBRaf_dim_netValence = 1 _one_;
  iBRaf_Raf1_bind: Ras_Raf1 + Ras_iBRaf -> Ras_Raf1_iBRaf_tetramer; (-(Ras_Raf1_iBRaf_tetramer*Kr_iBRaf_Raf1_bind) + Kf_iBRaf_Raf1_bind*Ras_Raf1*Ras_iBRaf)*pm;
    iBRaf_Raf1_bind_I = 0 pA_um_2; iBRaf_Raf1_bind_netValence = 1 _one_;
  Raf1_iBRaf_p: Ras_Raf1_iBRaf_tetramer -> Ras_pRaf1_iBRaf_tetramer; (Kf_Raf1_iBRaf_p*Ras_Raf1_iBRaf_tetramer - Kr_Raf1_iBRaf_p*Ras_pRaf1_iBRaf_tetramer)*pm;
    Raf1_iBRaf_p_I = 0 pA_um_2; Raf1_iBRaf_p_netValence = 1 _one_;
  pRaf1_iBRaf_ub: Ras_pRaf1_iBRaf_tetramer -> Ras_iBRaf + Ras_pRaf1; (-(Ras_iBRaf*Ras_pRaf1*Kr_pRaf1_iBRaf_ub) + Kf_pRaf1_iBRaf_ub*Ras_pRaf1_iBRaf_tetramer)*pm;
    pRaf1_iBRaf_ub_I = 0 pA_um_2; pRaf1_iBRaf_ub_netValence = 1 _one_;
  BRaf_dim: Ras_BRaf -> BRaf_dimer; (-(Kr_BRaf_dim*BRaf_dimer) + Kf_BRaf_dim*Ras_BRaf)*pm;
    BRaf_dim_I = 0 pA_um_2; BRaf_dim_netValence = 1 _one_;
  Ras_pRaf1_dp: Ras_pRaf1 -> Ras_Raf1; (-(Ras_Raf1*Kr_Ras_pRaf1_dp) + Kf_Ras_pRaf1_dp*Ras_pRaf1)*pm;
    Ras_pRaf1_dp_I = 0 pA_um_2; Ras_pRaf1_dp_netValence = 1 _one_;
  Ras_Raf1_nfp: Ras_Raf1 -> Ras_nfpRaf1; (Kf_Ras_Raf1_nfp*Ras_Raf1 - Kr_Ras_Raf1_nfp*Ras_nfpRaf1)*pm;  // modifiers: pERK
    Ras_Raf1_nfp_I = 0 pA_um_2; Ras_Raf1_nfp_netValence = 1 _one_;
  nfpRaf1_ub: Ras_nfpRaf1 -> $GTP_Ras + nfpRaf1; (Kf_nfpRaf1_ub*Ras_nfpRaf1 - GTP_Ras*Kr_nfpRaf1_ub*nfpRaf1)*pm;
    nfpRaf1_ub_I = 0 pA_um_2; nfpRaf1_ub_netValence = 1 _one_;
  nfpRaf1_dp: nfpRaf1 -> Raf1; (-(Kr_nfpRaf1_dp*Raf1) + Kf_nfpRaf1_dp*nfpRaf1)*cytoplasm;
  BRaf_nfp: Ras_BRaf -> Ras_nfpBRaf; (Kf_BRaf_nfp*Ras_BRaf - Kr_BRaf_nfp*Ras_nfpBRaf)*pm;  // modifiers: pERK
    BRaf_nfp_I = 0 pA_um_2; BRaf_nfp_netValence = 1 _one_;
  nfpBRaf_ub: Ras_nfpBRaf -> $GTP_Ras + nfpBRaf; (Kf_nfpBRaf_ub*Ras_nfpBRaf - GTP_Ras*Kr_nfpBRaf_ub*nfpBRaf)*pm;
    nfpBRaf_ub_I = 0 pA_um_2; nfpBRaf_ub_netValence = 1 _one_;
  nfpBRaf_dp: nfpBRaf -> BRaf; (-(BRaf*Kr_nfpBRaf_dp) + Kf_nfpBRaf_dp*nfpBRaf)*cytoplasm;
  BRaf_iBRaf_dim: Ras_iBRaf + Ras_BRaf -> BRaf_iBRaf_dimer; (-(Kr_BRaf_iBRaf_dim*BRaf_iBRaf_dimer) + Kf_BRaf_iBRaf_dim*Ras_BRaf*Ras_iBRaf)*pm;
    BRaf_iBRaf_dim_I = 0 pA_um_2; BRaf_iBRaf_dim_netValence = 1 _one_;
  Ras_iRaf_nfp: Ras_iRaf1 -> Ras_nfpiRaf1; (Kf_Ras_iRaf_nfp*Ras_iRaf1 - Kr_Ras_iRaf_nfp*Ras_nfpiRaf1)*pm;  // modifiers: pERK
    Ras_iRaf_nfp_I = 0 pA_um_2; Ras_iRaf_nfp_netValence = 1 _one_;
  nfpiRaf1_ub: Ras_nfpiRaf1 -> nfpiRaf1 + $GTP_Ras; (Kf_nfpiRaf1_ub*Ras_nfpiRaf1 - GTP_Ras*Kr_nfpiRaf1_ub*nfpiRaf1)*pm;
    nfpiRaf1_ub_I = 0 pA_um_2; nfpiRaf1_ub_netValence = 1 _one_;
  nfpiRaf_dp: nfpiRaf1 -> iRaf1; (-(Kr_nfpiRaf_dp*iRaf1) + Kf_nfpiRaf_dp*nfpiRaf1)*cytoplasm;
  Ras_iBRaf_nfp: Ras_iBRaf -> Ras_nfpiBRaf; (Kf_Ras_iBRaf_nfp*Ras_iBRaf - Kr_Ras_iBRaf_nfp*Ras_nfpiBRaf)*pm;  // modifiers: pERK
    Ras_iBRaf_nfp_I = 0 pA_um_2; Ras_iBRaf_nfp_netValence = 1 _one_;
  nfpiBRaf_ub: Ras_nfpiBRaf -> nfpiBRaf + $GTP_Ras; (Kf_nfpiBRaf_ub*Ras_nfpiBRaf - GTP_Ras*Kr_nfpiBRaf_ub*nfpiBRaf)*pm;
    nfpiBRaf_ub_I = 0 pA_um_2; nfpiBRaf_ub_netValence = 1 _one_;
  nfpiBRaf_dp: nfpiBRaf -> iBRaf; (-(Kr_nfpiBRaf_dp*iBRaf) + Kf_nfpiBRaf_dp*nfpiBRaf)*cytoplasm;
  iRaf_iBRaf_dim: Ras_iRaf1 + Ras_iBRaf -> Ras_iRaf1_iBRaf1_tetramer; (Kf_iRaf_iBRaf_dim*Ras_iBRaf*Ras_iRaf1 - Kr_iRaf_iBRaf_dim*Ras_iRaf1_iBRaf1_tetramer)*pm;
    iRaf_iBRaf_dim_I = 0 pA_um_2; iRaf_iBRaf_dim_netValence = 1 _one_;

  // Unit definitions:
  unit molecules = item;
  unit um3 = (1e-6 metre)^3;
  unit um2 = (1e-6 metre)^2;
  unit um = 1e-6 metre;
  unit min = 60 second;
  unit uM_1_min_1 = litre / (1e-6 mole * 60 second);
  unit min_1 = 1 / (60 second);
  unit molecules_1_min_1 = 1 / (item * 60 second);
  unit molecules_min_1 = item / (60 second);
  unit min_1_molecules_1 = 1 / (60 second * item);
  unit K = kelvin;
  unit _one_ = dimensionless;
  unit C_mol_1 = coulomb / mole;
  unit C_nmol_1 = coulomb / (1e-9 mole);
  unit molecules_pmol_1 = item / (1e-12 mole);
  unit _one_000000000 = 1e9 dimensionless;
  unit mV_C_K_1_mol_1 = 1e-3 volt * coulomb / (kelvin * mole);
  unit mV_V_1 = dimensionless;
  unit uM_um3_molecules_1 = 1e-6 mole * (1e-6 metre)^3 / (litre * item);
  unit pA_um_2 = 1e-12 ampere / (1e-6 metre)^2;
  unit um3_min_1_molecules_1 = (1e-6 metre)^3 / (60 second * item);
  unit um2_min_1_molecules_1 = (1e-6 metre)^2 / (60 second * item);
  unit um_min_1 = 1e-6 metre / (60 second);
end
