// SBML level 3 version 1
// Exported by VCell 7.3

model A_predictive_computational_model_reveals_that_GIV_Girdin_serves_as_a_tunable_valve_for_EGFR_stimulated_Cyclic_AMP_Signals_unnamed()
  // A predictive computational model reveals that GIV/Girdin serves as a tunable valve for EGFR-stimulated Cyclic AMP Signals_unnamed
  // model units - substance: umol, time: s, volume: litre_base, area: um2, length: um, extent: umol

  // Compartments:
  compartment Endosome = 1.38e-16 litre_base;
  compartment Cyto = 2e-12 litre_base;
  compartment ECM = 5e-12 litre_base;
  compartment intmem = 5;  // 2-D
  compartment PM = 1256;  // 2-D

  // Species:
  substanceOnly species $EGF in ECM = 150553.5;
  substanceOnly species EGFR in PM = 0;
  substanceOnly species p35 in PM = 0;
  substanceOnly species p35_act in PM = 0;
  substanceOnly species Gi_GTP in PM = 0;
  substanceOnly species Gi_GDP in PM = 0;
  substanceOnly species EGF_EGFR in PM = 0;
  substanceOnly species PLCg in Cyto = 120442.8;
  substanceOnly species IP3 in Cyto = 0;
  substanceOnly species inositol in Cyto = 0;
  substanceOnly species PKC in Cyto = 120442.8;
  substanceOnly species PKC_act in PM = 0;
  substanceOnly species AC in PM = 0;
  substanceOnly species AC_act in intmem = 0;
  substanceOnly species $ATP in Cyto = 6.022142e9;
  substanceOnly species cAMP in Cyto = 5581.863;
  substanceOnly species PKA in Cyto = 7991.408;
  substanceOnly species PDE in Cyto = 416024.4;
  substanceOnly species R2C2 in Cyto = 116046.8;
  substanceOnly species AMP in Cyto = 1.204428e9;
  substanceOnly species PDEp in Cyto = 65746.99;
  substanceOnly species $PIP2 in PM = 0;
  substanceOnly species EGF_EGFR_2_act in PM = 0;
  substanceOnly species EGF_EGFR_2 in PM = 0;
  substanceOnly species PP_PDE in Cyto = 240885.7;
  substanceOnly species DAG in PM = 0;
  substanceOnly species PLCg_active in Cyto = 0;
  substanceOnly species GEF_EGFR in PM = 0;
  substanceOnly species GEF_Gi_EGFR in PM = 0;
  substanceOnly species GIV in Cyto = 1204428*(totalGIV - GDImult*totalGIV - 1.660539e-18*GIV_GEF);
  substanceOnly species GIV_GEF in Cyto = 1204428*GEFmult*totalGIV;
  substanceOnly species GIV_GDI in Cyto = 0;
  substanceOnly species Cdk5 in Cyto = 60221.42;
  substanceOnly species Gs_GTP_i in intmem = 0;
  substanceOnly species Gs_GDP_i in intmem = 0;
  substanceOnly species Gs_GDI_i in intmem = 0;
  substanceOnly species EGF_EGFR_i_act in intmem = 0;
  substanceOnly species AC_i in intmem = 0;
  substanceOnly species bg_i in intmem = 0;
  substanceOnly species AC_inact in PM = 0;
  substanceOnly species Gs_protein in PM = 0;
  substanceOnly species EGFi in Endosome = 0;
  substanceOnly species EGFRi in intmem = 0;
  substanceOnly species R2 in Cyto = 84.06002;
  substanceOnly species R2u in Cyto = 5049.648;
  substanceOnly species R2uu in Cyto = 3188.756;
  substanceOnly species EGF_EGFRi in intmem = 0;
  substanceOnly species EGF_EGFR_2i in intmem = 0;
  substanceOnly species Cdk5_p35_act in PM = 0;
  substanceOnly species Gs_protein_i in intmem = 0;
  substanceOnly species PKA_inact in Cyto = 0;
  substanceOnly species Gs_GDI_b in intmem = 0;
  substanceOnly species GIV89p in Cyto = 1204428*GDImult*totalGIV;
  substanceOnly species I in intmem = 0;

  // Parameters:
  kfint = 4.578941e-5;
  krint = 6.665028e-5;
  kbase = 1.07e-8;
  kc = 1.32e11;
  kfGi = 3.010289e18;
  intrec = 0.002;
  totalGIV = 1;
  krGDIGIV = 0.0003;
  GEFmult = 0.05111202;
  GDI_function_k1 = 2.91;
  _T_ = 300 K;
  _PI_ = 3.141593 _one_;
  _F_ = 9.64853321e4 C_mol_1;
  _F_nmol_ = 9.64853321e-5 C_nmol_1;
  _N_pmol_ = 6.02214179e11 molecules_pmol_1;
  _K_GHK_ = 1e-9 _one_000000000;
  _R_ = 8314.463 mV_C_K_1_mol_1;
  K_millivolts_per_volt = 1000 mV_V_1;
  KMOLE = 0.001660539 uM_um3_molecules_1;
  k1_AC_inactivation = 3.14951e17 um2_s_1_umol_1;
  k1_AC_unbinding = 0.1667 s_1;
  k1_AC_activation = 1.26462e15 um2_s_1_umol_1;
  k1_Cdk5_activation = 45 litre_s_1_umol_1;
  k2_Cdk5_activation = 10 s_1;
  k1_DAG_decactivation = 0.00067 s_1;
  k1_DAG_deactivation_while_bound = 0.028 s_1;
  k1_Degradation_GDI = 0.00107286 s_1;
  k1_Degradation_GEF = 0.0064638 s_1;
  k1_Dimerize = 3.14951e17;
  k2_Dimerize = 0.1;
  k1_Dimerized_receptor_activation = 1 s_1;
  k2_Dimerized_receptor_activation = 0.01 s_1;
  k1_EGFR_to_PM = 0.005 s_1;
  k2_EGFR_to_PM = 5e-5 s_1;
  Km_EGFR_GEF_to_GDI = 2.10987e-15 umol_um_2;
  kcat_EGFR_GEF_to_GDI = 2.53373 s_1;
  k1_GEF_EGFR_binding = 0.00145 litre_s_1_umol_1;
  k2_GEF_EGFR_binding = 1.09025e-7 s_1;
  Km_GEF_activation = 6 umol_litre_1;
  kcat_GEF_activation = 0.6 s_1;
  Km_GEF_to_GDI = 6 umol_litre_1;
  kcat_GEF_to_GDI = 0.999995 s_1;
  k1_Gi_activation = 14.4682 s_1;
  k1_Gi_hydrolysis = 0.139 s_1;
  Km_Gs_activation = 5e-15 umol_um_2;
  kcat_Gs_activation = 0.4 s_1;
  k1_Gs_hydrolysis = 0.139 s_1;
  k1_IP3_degradation = 2.5 s_1;
  k1_InactivAC = 0.1667 s_1;
  Km_PDE_phos = 0.5 umol_litre_1;
  kcat_PDE_phos = 5 s_1;
  Km_PIP2_to_DAG = 8.3e-15 umol_um_2;
  kcat_PIP2_to_DAG = 2.3e-17 litre_s_1_um_2;
  k1_PKA_inactivation = 0.0001 s_1;
  k2_PKA_inactivation = 1 s_1;
  k1_PKA_reformation = 10;
  k1_PKC_activation = 0.1 litre_s_1_umol_1;
  k2_PKC_activation = 1e-5 s_1;
  Km_PLC_GEF_enhanced = 1 umol_litre_1;
  kcat_PLC_GEF_enhanced = 0.103589 s_1;
  Km_PLC_activation_basal = 1 umol_litre_1;
  kcat_PLC_activation_basal = 0.000100002 s_1;
  k1_PLC_deactivation = 1.00002e-5 s_1;
  k1_R2uUnbind = 0.000278 s_1;
  k1_R2Unbind = 0.0167 s_1;
  V_cAMP_Activation = 0.05 s_1;
  Shalve_cAMP_Activation = 0.54 umol_litre_1;
  h_cAMP_Activation = 1.75 _one_;
  Km_cAMP_basal = 1030 umol_litre_1;
  kcat_cAMP_basal = 0.12 s_1;
  Km_cAMP_basal_production_internal = 1030 umol_litre_1;
  kcat_cAMP_basal_production_internal = 0.12 s_1;
  Km_cAMP_to_AMP = 1.51 umol_litre_1;
  kcat_cAMP_to_AMP = 2 s_1;
  Km_cAMP_to_AMP_PDEp = 1.26 umol_litre_1;
  kcat_cAMP_to_AMP_PDEp = 5 s_1;
  Km_dephos_of_PDEp = 8 umol_litre_1;
  kcat_dephos_of_PDEp = 10 s_1;
  k1_internal_trimerize = 8.91256e14 um2_s_1_umol_1;
  Km_p35_activation = 1.589e-15 umol_um_2;
  kcat_p35_activation = 0.1 s_1;
  k1_p35_inactivation = 0.001 s_1;
  Km_production_cAMP_internal = 315 umol_litre_1;
  kcat_production_cAMP_internal = 13 s_1;
  k1_receptor_ligand_binding = 3 litre_s_1_umol_1;
  k2_receptor_ligand_binding = 0.014 s_1;
  k1_v10 = 0.14 litre_s_1_umol_1;
  k2_v10 = 0.0195 s_1;
  k1_v11 = 4e-5;
  k2_v11 = 0.1;
  k1_v12 = 1 s_1;
  k2_v12 = 0.01 s_1;
  k1__89pDEG = 0.01 s_1;
  kc_Intfun = 42968000 s_1;

  // Assignment rules:
  krGi := 0.24*ModelValue_4*Compartment_2/Compartment_1;
  normcAMP := 1.660539e-18*cAMP/Metabolite_15;
  normGDI := (Gs_GDI_i + Gs_GDI_b)/(Metabolite_35 + Metabolite_51);
  normGEF := GEF_Gi_EGFR/Metabolite_28;
  normGEFc := (1.660539e-18*GIV_GEF + 1.660539e-18*GIV_GDI)/(Metabolite_30 + Metabolite_31);
  normGDIc := (1.660539e-18*GIV_GDI + 1.660539e-18*GIV89p)/(Metabolite_31 + Metabolite_52);
  GDImult := 2*GEFmult;
  bindingGDIGIV := 0.05*GDI_function_k1;
  Compartment_2 := Cyto;
  Metabolite_52 := 1.660539e-18*GIV89p;
  Metabolite_31 := 1.660539e-18*GIV_GDI;
  Metabolite_30 := 1.660539e-18*GIV_GEF;
  Metabolite_15 := 1.660539e-18*cAMP;
  Compartment_1 := PM;
  Metabolite_28 := GEF_Gi_EGFR;
  Metabolite_51 := Gs_GDI_b;
  Metabolite_35 := Gs_GDI_i;
  ModelValue_4 := kfGi;

  // Reactions:
  AC_inactivation: AC + Gi_GTP -> AC_inact; PM*k1_AC_inactivation*AC*Gi_GTP;
    AC_inactivation_LumpedI = 0 pA; AC_inactivation_netValence = 1 _one_;
  AC_internalization: AC -> AC_i; PM*(kfint*AC - krint*AC_i);
    AC_internalization_LumpedI = 0 pA; AC_internalization_netValence = 1 _one_;
  AC_unbinding: AC_inact -> AC + Gi_GDP; PM*k1_AC_unbinding*AC_inact;
    AC_unbinding_LumpedI = 0 pA; AC_unbinding_netValence = 1 _one_;
  AC_activation: AC_i + Gs_GTP_i -> AC_act; intmem*k1_AC_activation*AC_i*Gs_GTP_i;
    AC_activation_LumpedI = 0 pA; AC_activation_netValence = 1 _one_;
  Cdk5_activation: Cdk5 + p35_act -> Cdk5_p35_act; PM*(1.660539e-18*k1_Cdk5_activation*p35_act*Cdk5 - k2_Cdk5_activation*Cdk5_p35_act);
    Cdk5_activation_LumpedI = 0 pA; Cdk5_activation_netValence = 1 _one_;
  DAG_decactivation: DAG -> ; PM*k1_DAG_decactivation*DAG;
    DAG_decactivation_LumpedI = 0 pA; DAG_decactivation_netValence = 1 _one_;
  DAG_deactivation_while_bound: PKC_act -> PKC; PM*k1_DAG_deactivation_while_bound*PKC_act;
    DAG_deactivation_while_bound_LumpedI = 0 pA; DAG_deactivation_while_bound_netValence = 1 _one_;
  Degradation_GDI: GIV_GDI -> GIV; 1.660539e-18*Cyto*k1_Degradation_GDI*GIV_GDI;
  Degradation_GEF: GIV_GEF -> GIV; 1.660539e-18*Cyto*k1_Degradation_GEF*GIV_GEF;
  Dimerize: 2 EGF_EGFR -> EGF_EGFR_2; PM*(k1_Dimerize*EGF_EGFR^2 - k2_Dimerize*EGF_EGFR_2);
    Dimerize_LumpedI = 0 pA; Dimerize_netValence = 1 _one_;
  Dimerized_receptor_activation: EGF_EGFR_2 -> EGF_EGFR_2_act; PM*(k1_Dimerized_receptor_activation*EGF_EGFR_2 - k2_Dimerized_receptor_activation*EGF_EGFR_2_act);
    Dimerized_receptor_activation_LumpedI = 0 pA; Dimerized_receptor_activation_netValence = 1 _one_;
  EGF_deg: EGFi -> ; 1.660539e-18*Endosome*(kbase + kc*(Gs_GDP_i + Gs_GDI_i + Gs_GDI_b))*EGFi;  // modifiers: Gs_GDP_i, Gs_GDI_i, Gs_GDI_b
  EGFR_deg: EGFRi -> ; intmem*(kbase + kc*(Gs_GDP_i + Gs_GDI_i + Gs_GDI_b))*EGFRi;  // modifiers: Gs_GDP_i, Gs_GDI_i, Gs_GDI_b
    EGFR_deg_LumpedI = 0 pA; EGFR_deg_netValence = 1 _one_;
  EGFR_to_PM: EGFRi -> EGFR; intmem*(k1_EGFR_to_PM*EGFRi - k2_EGFR_to_PM*EGFR);
    EGFR_to_PM_LumpedI = 0 pA; EGFR_to_PM_netValence = 1 _one_;
  EGFR_GEF_to_GDI: GEF_EGFR -> GIV_GDI + EGF_EGFR_2_act; PM*kcat_EGFR_GEF_to_GDI*PKC_act*GEF_EGFR/(Km_EGFR_GEF_to_GDI + GEF_EGFR);  // modifiers: PKC_act
    EGFR_GEF_to_GDI_LumpedI = 0 pA; EGFR_GEF_to_GDI_netValence = 1 _one_;
  GDI_function: GIV_GDI + Gs_GDP_i -> Gs_GDI_i; intmem*(1.660539e-18*GDI_function_k1*Gs_GDP_i*GIV_GDI - krGDIGIV*Gs_GDI_i);
    GDI_function_LumpedI = 0 pA; GDI_function_netValence = 1 _one_;
  GEF_EGFR_binding: GIV_GEF + EGF_EGFR_2_act -> GEF_EGFR; PM*(1.660539e-18*k1_GEF_EGFR_binding*EGF_EGFR_2_act*GIV_GEF - k2_GEF_EGFR_binding*GEF_EGFR);
    GEF_EGFR_binding_LumpedI = 0 pA; GEF_EGFR_binding_netValence = 1 _one_;
  GEF_Gi_Binding: GEF_EGFR + Gi_GDP -> GEF_Gi_EGFR; PM*(kfGi*GEF_EGFR*Gi_GDP - krGi*GEF_Gi_EGFR);
    GEF_Gi_Binding_LumpedI = 0 pA; GEF_Gi_Binding_netValence = 1 _one_;
  GEF_activation: GIV -> GIV_GEF; 1.660539e-18*PM*kcat_GEF_activation*Cdk5_p35_act*GIV/(Km_GEF_activation + 1.660539e-18*GIV);  // modifiers: Cdk5_p35_act
    GEF_activation_LumpedI = 0 pA; GEF_activation_netValence = 1 _one_;
  GEF_to_GDI: GIV_GEF -> GIV_GDI; 1.660539e-18*PM*kcat_GEF_to_GDI*PKC_act*GIV_GEF/(Km_GEF_to_GDI + 1.660539e-18*GIV_GEF);  // modifiers: PKC_act
    GEF_to_GDI_LumpedI = 0 pA; GEF_to_GDI_netValence = 1 _one_;
  Gi_activation: GEF_Gi_EGFR -> GEF_EGFR + Gi_GTP; PM*k1_Gi_activation*GEF_Gi_EGFR;
    Gi_activation_LumpedI = 0 pA; Gi_activation_netValence = 1 _one_;
  Gi_hydrolysis: Gi_GTP -> Gi_GDP; PM*k1_Gi_hydrolysis*Gi_GTP;
    Gi_hydrolysis_LumpedI = 0 pA; Gi_hydrolysis_netValence = 1 _one_;
  Gs_GDI_accel_deg: EGF_EGFR_i_act -> ; intmem*(kbase + kc*(Gs_GDP_i + Gs_GDI_i + Gs_GDI_b))*EGF_EGFR_i_act;  // modifiers: Gs_GDP_i, Gs_GDI_i, Gs_GDI_b
    Gs_GDI_accel_deg_LumpedI = 0 pA; Gs_GDI_accel_deg_netValence = 1 _one_;
  Gs_activation: Gs_protein_i -> bg_i + Gs_GTP_i; intmem*kcat_Gs_activation*EGF_EGFR_i_act*Gs_protein_i/(Km_Gs_activation + Gs_protein_i);  // modifiers: EGF_EGFR_i_act
    Gs_activation_LumpedI = 0 pA; Gs_activation_netValence = 1 _one_;
  Gs_hydrolysis: Gs_GTP_i -> Gs_GDP_i; intmem*k1_Gs_hydrolysis*Gs_GTP_i;
    Gs_hydrolysis_LumpedI = 0 pA; Gs_hydrolysis_netValence = 1 _one_;
  Gs_internalization: Gs_protein -> Gs_protein_i; PM*(kfint*Gs_protein - krint*Gs_protein_i);
    Gs_internalization_LumpedI = 0 pA; Gs_internalization_netValence = 1 _one_;
  IP3_degradation: IP3 -> inositol; 1.660539e-18*Cyto*k1_IP3_degradation*IP3;
  InactivAC: AC_act -> AC_i + Gs_GDP_i; intmem*k1_InactivAC*AC_act;
    InactivAC_LumpedI = 0 pA; InactivAC_netValence = 1 _one_;
  PDE_phos: PDE -> PDEp; 2.757389e-36*Cyto*kcat_PDE_phos*PKA*PDE/(Km_PDE_phos + 1.660539e-18*PDE);  // modifiers: PKA
  PIP2_to_DAG: $PIP2 -> DAG + IP3; 1.660539e-18*PM*kcat_PIP2_to_DAG*PLCg_active*PIP2/(Km_PIP2_to_DAG + PIP2);  // modifiers: PLCg_active
    PIP2_to_DAG_LumpedI = 0 pA; PIP2_to_DAG_netValence = 1 _one_;
  PKA_inactivation: PKA -> PKA_inact; Cyto*(1.660539e-18*k1_PKA_inactivation*PKA - 1.660539e-18*k2_PKA_inactivation*PKA_inact);
  PKA_reformation: R2uu + 2 PKA -> R2C2; 1.660539e-18*Cyto*k1_PKA_reformation*R2uu*(1.660539e-18*PKA)^2;
  PKC_activation: PKC + DAG -> PKC_act; PM*(1.660539e-18*k1_PKC_activation*DAG*PKC - k2_PKC_activation*PKC_act);
    PKC_activation_LumpedI = 0 pA; PKC_activation_netValence = 1 _one_;
  PLC_GEF_enhanced: PLCg -> PLCg_active; 1.660539e-18*PM*kcat_PLC_GEF_enhanced*GEF_EGFR*PLCg/(Km_PLC_GEF_enhanced + 1.660539e-18*PLCg);  // modifiers: GEF_EGFR
    PLC_GEF_enhanced_LumpedI = 0 pA; PLC_GEF_enhanced_netValence = 1 _one_;
  PLC_activation_basal: PLCg -> PLCg_active; 1.660539e-18*PM*kcat_PLC_activation_basal*EGF_EGFR_2_act*PLCg/(Km_PLC_activation_basal + 1.660539e-18*PLCg);  // modifiers: EGF_EGFR_2_act
    PLC_activation_basal_LumpedI = 0 pA; PLC_activation_basal_netValence = 1 _one_;
  PLC_deactivation: PLCg_active -> PLCg; 1.660539e-18*Cyto*k1_PLC_deactivation*PLCg_active;
  R2uUnbind: R2u -> R2uu + 2 cAMP; 1.660539e-18*Cyto*k1_R2uUnbind*R2u;
  R2Unbind: R2 -> R2u + 2 cAMP; 1.660539e-18*Cyto*k1_R2Unbind*R2;
  cAMP_Activation: R2C2 + 4 cAMP -> R2 + 2 PKA; 1.660539e-18*Cyto*V_cAMP_Activation*R2C2*(1.660539e-18*cAMP/Shalve_cAMP_Activation)^h_cAMP_Activation/(1 + (1.660539e-18*cAMP/Shalve_cAMP_Activation)^h_cAMP_Activation);
  cAMP_basal: $ATP -> cAMP; 1.660539e-18*PM*kcat_cAMP_basal*AC*ATP/(Km_cAMP_basal + 1.660539e-18*ATP);  // modifiers: AC
    cAMP_basal_LumpedI = 0 pA; cAMP_basal_netValence = 1 _one_;
  cAMP_basal_production_internal: $ATP -> cAMP; 1.660539e-18*intmem*kcat_cAMP_basal_production_internal*AC_i*ATP/(Km_cAMP_basal_production_internal + 1.660539e-18*ATP);  // modifiers: AC_i
    cAMP_basal_production_internal_LumpedI = 0 pA; cAMP_basal_production_internal_netValence = 1 _one_;
  cAMP_to_AMP: cAMP -> AMP; 2.757389e-36*Cyto*kcat_cAMP_to_AMP*PDE*cAMP/(Km_cAMP_to_AMP + 1.660539e-18*cAMP);  // modifiers: PDE
  cAMP_to_AMP_PDEp: cAMP -> AMP; 2.757389e-36*Cyto*kcat_cAMP_to_AMP_PDEp*PDEp*cAMP/(Km_cAMP_to_AMP_PDEp + 1.660539e-18*cAMP);  // modifiers: PDEp
  dephos_of_PDEp: PDEp -> PDE; 2.757389e-36*Cyto*kcat_dephos_of_PDEp*PP_PDE*PDEp/(Km_dephos_of_PDEp + 1.660539e-18*PDEp);  // modifiers: PP_PDE
  internal_transport: EGF_EGFR_2_act -> EGF_EGFR_i_act; PM*intrec*EGF_EGFR_2_act;
    internal_transport_LumpedI = 0 pA; internal_transport_netValence = 1 _one_;
  internal_trimerize: bg_i + Gs_GDP_i -> Gs_protein_i; intmem*k1_internal_trimerize*bg_i*Gs_GDP_i;
    internal_trimerize_LumpedI = 0 pA; internal_trimerize_netValence = 1 _one_;
  p35_activation: p35 -> p35_act; PM*kcat_p35_activation*EGF_EGFR_2_act*p35/(Km_p35_activation + p35);  // modifiers: EGF_EGFR_2_act
    p35_activation_LumpedI = 0 pA; p35_activation_netValence = 1 _one_;
  p35_inactivation: p35_act -> p35; PM*k1_p35_inactivation*p35_act;
    p35_inactivation_LumpedI = 0 pA; p35_inactivation_netValence = 1 _one_;
  production_cAMP_internal: $ATP -> cAMP; 1.660539e-18*intmem*kcat_production_cAMP_internal*AC_act*ATP/(Km_production_cAMP_internal + 1.660539e-18*ATP);  // modifiers: AC_act
    production_cAMP_internal_LumpedI = 0 pA; production_cAMP_internal_netValence = 1 _one_;
  receptor_ligand_binding: $EGF + EGFR -> EGF_EGFR; PM*(1.660539e-18*k1_receptor_ligand_binding*EGFR*EGF - k2_receptor_ligand_binding*EGF_EGFR);
    receptor_ligand_binding_LumpedI = 0 pA; receptor_ligand_binding_netValence = 1 _one_;
  v10: EGFi + EGFRi -> EGF_EGFRi; intmem*(1.660539e-18*k1_v10*EGFRi*EGFi - k2_v10*EGF_EGFRi);
    v10_LumpedI = 0 pA; v10_netValence = 1 _one_;
  v11: 2 EGF_EGFRi -> EGF_EGFR_2i; intmem*(k1_v11*EGF_EGFRi^2 - k2_v11*EGF_EGFR_2i);
    v11_LumpedI = 0 pA; v11_netValence = 1 _one_;
  v12: EGF_EGFR_2i -> EGF_EGFR_i_act; intmem*(k1_v12*EGF_EGFR_2i - k2_v12*EGF_EGFR_i_act);
    v12_LumpedI = 0 pA; v12_netValence = 1 _one_;
  basalGIVGDI: GIV + Gs_GDP_i -> Gs_GDI_b; Cyto*(1.660539e-18*bindingGDIGIV*GIV*Gs_GDP_i - krGDIGIV*Gs_GDI_b);
  __eight_9pDEG: GIV89p -> GIV; 1.660539e-18*Cyto*k1__89pDEG*GIV89p; __eight_9pDEG is "_89pDEG";
  Gs_GDI_accel_deg_copy: Gs_GDI_i -> ; intmem*I*Gs_GDI_i;  // modifiers: I
    Gs_GDI_accel_deg_copy_LumpedI = 0 pA; Gs_GDI_accel_deg_copy_netValence = 1 _one_;
  Gs_GDI_accel_deg_copy2: Gs_GDP_i -> ; intmem*Gs_GDP_i*Gs_GDP_i;
    Gs_GDI_accel_deg_copy2_LumpedI = 0 pA; Gs_GDI_accel_deg_copy2_netValence = 1 _one_;
  Gs_GDI_accel_deg_copy3: Gs_GTP_i -> ; intmem*Gs_GDP_i*Gs_GTP_i;  // modifiers: Gs_GDP_i
    Gs_GDI_accel_deg_copy3_LumpedI = 0 pA; Gs_GDI_accel_deg_copy3_netValence = 1 _one_;
  Gs_GDI_accel_deg_copy4: AC_act -> ; intmem*(kbase + kc*(Gs_GDP_i + Gs_GDI_i + Gs_GDI_b))*AC_act;  // modifiers: Gs_GDP_i, Gs_GDI_i, Gs_GDI_b
    Gs_GDI_accel_deg_copy4_LumpedI = 0 pA; Gs_GDI_accel_deg_copy4_netValence = 1 _one_;
  Gs_GDI_accel_deg_copy5: EGF_EGFRi -> ; intmem*(kbase + kc*(Gs_GDP_i + Gs_GDI_i + Gs_GDI_b))*EGF_EGFRi;  // modifiers: Gs_GDP_i, Gs_GDI_i, Gs_GDI_b
    Gs_GDI_accel_deg_copy5_LumpedI = 0 pA; Gs_GDI_accel_deg_copy5_netValence = 1 _one_;
  Gs_GDI_accel_deg_copy6: Gs_GDI_b -> ; intmem*I*Gs_GDI_b;  // modifiers: I
    Gs_GDI_accel_deg_copy6_LumpedI = 0 pA; Gs_GDI_accel_deg_copy6_netValence = 1 _one_;
  Intfun: -> I; intmem*kc_Intfun*(Gs_GDP_i + Gs_GDI_i + Gs_GDI_b);  // modifiers: Gs_GDP_i, Gs_GDI_i, Gs_GDI_b
    Intfun_LumpedI = 0 pA; Intfun_netValence = 1 _one_;

  // Events:
  EGFoff: at (0 != 0), t0=false: EGF = 0;

  // Unit definitions:
  unit umol = 1e-6 mole;
  unit litre_base = litre; litre_base is "Base unit litre";
  unit um2 = (1e-6 metre)^2;
  unit um = 1e-6 metre;
  unit s = second;
  unit K = kelvin;
  unit _one_ = dimensionless;
  unit C_mol_1 = coulomb / mole;
  unit C_nmol_1 = coulomb / (1e-9 mole);
  unit molecules_pmol_1 = item / (1e-12 mole);
  unit _one_000000000 = 1e9 dimensionless;
  unit mV_C_K_1_mol_1 = 1e-3 volt * coulomb / (kelvin * mole);
  unit mV_V_1 = dimensionless;
  unit uM_um3_molecules_1 = 1e-6 mole * (1e-6 metre)^3 / (litre * item);
  unit pA = 1e-12 ampere;
  unit um2_s_1_umol_1 = (1e-6 metre)^2 / (second * 1e-6 mole);
  unit s_1 = 1 / second;
  unit litre_s_1_umol_1 = litre / (second * 1e-6 mole);
  unit umol_um_2 = 1e-6 mole / (1e-6 metre)^2;
  unit umol_litre_1 = 1e-6 mole / litre;
  unit litre_s_1_um_2 = litre / (second * (1e-6 metre)^2);
end
