// SBML level 3 version 1
// Exported by VCell 7.3

model Histamine_RhoA_Model_FInal_Application1()
  // Histamine-RhoA Model_FInal_Application1
  // model units - substance: molecules, time: s, volume: um3, area: um2, length: um, extent: molecules

  // Compartments:
  compartment c0 = 50000 um3;

  // Species:
  substanceOnly species Gaq_act in c0 = 0;
  substanceOnly species H1HR_act in c0 = 0;
  substanceOnly species Histamine in c0 = 3.011071e9;
  substanceOnly species p63_act in c0 = 0;
  substanceOnly species PLC_act in c0 = 0;
  substanceOnly species PIP2 in c0 = 1.445314e9;
  substanceOnly species DAG in c0 = 2.167971e7;
  substanceOnly species IP3 in c0 = 3.613285e7;
  substanceOnly species RhoA_act in c0 = 0;
  substanceOnly species Ca_cyto in c0 = 3011071;
  substanceOnly species PKC_act in c0 = 0;
  substanceOnly species p115_act in c0 = 0;
  substanceOnly species RhoA_inact in c0 = 1.505535e9;
  substanceOnly species H1HR_inact in c0 = 1.505535e8;
  substanceOnly species Gaq_inact in c0 = 1.053875e8;
  substanceOnly species p63_inact in c0 = 3.011071e7;
  substanceOnly species p115_inact in c0 = 602214.2;
  substanceOnly species PKC_inact in c0 = 4.516606e8;
  substanceOnly species Ca_ER in c0 = 1.505535e10;
  substanceOnly species PLC_inact in c0 = 3.011071e7;
  substanceOnly species Ca_miscbound in c0 = 0;
  substanceOnly species Ca_mito in c0 = 0;
  substanceOnly species Ca_Ex in c0 = 0;
  substanceOnly species phosphatase in c0 = 1.505535e7;
  substanceOnly species GAP_act in c0 = 9.033213e7;
  substanceOnly species SERCA in c0 = 4.516606e8;
  substanceOnly species PKC_Ca in c0 = 0;
  substanceOnly species Expumps_out in c0 = 4.697271e8;
  substanceOnly species Expumps_in in c0 = 301107.1;
  substanceOnly species Pyrilamine in c0 = 0;
  substanceOnly species PKC_act_translocate in c0 = 0;
  substanceOnly species GDI_act in c0 = 1.505535e7;
  substanceOnly species GDI_inact in c0 = 0;
  substanceOnly species GAP_inact in c0 = 0;
  substanceOnly species DAG_deg in c0 = 0;

  // Parameters:
  _T_ = 300 K;
  _PI_ = 3.141593 _one_;
  _F_ = 9.64853321e4 C_mol_1;
  _F_nmol_ = 9.64853321e-5 C_nmol_1;
  _N_pmol_ = 6.02214179e11 molecules_pmol_1;
  _K_GHK_ = 1e-9 _one_000000000;
  _R_ = 8314.463 mV_C_K_1_mol_1;
  K_millivolts_per_volt = 1000 mV_V_1;
  KMOLE = 0.001660539 uM_um3_molecules_1;
  Kf_r0 = 1.660539e-7 um3_s_1_molecules_1;
  Kr_r0 = 0.001 s_1;
  Kf_r1 = 2.490808e-5 um3_s_1_molecules_1;
  Kr_r1 = 7.2 s_1;
  Kf_r2 = 6.974263e-6 um3_s_1_molecules_1;
  Kr_r2 = 1 s_1;
  Kf_r3 = 6.642155e-5 um3_s_1_molecules_1;
  Kr_r3 = 0.5 s_1;
  Km_r4 = 6022.14179 molecules_um_3;
  Vmax_r4 has molecules_um_3_s_1;
  Km_r5 = 933.432 molecules_um_3;
  Vmax_r5 has molecules_um_3_s_1;
  Km_r6 = 48.96001 molecules_um_3;
  Vmax_r6 has molecules_um_3_s_1;
  Km_r8 = 602.214179 molecules_um_3;
  Vmax_r8 has molecules_um_3_s_1;
  Km_r9 = 602.214179 molecules_um_3;
  Vmax_r9 has molecules_um_3_s_1;
  Kf_r10 = 2.43 s_1;
  Kr_r10 = 1 s_1;
  Km_r11 = 68652.42 molecules_um_3;
  Vmax_r11 has molecules_um_3_s_1;
  Km_r13 = 4335.942 molecules_um_3;
  Vmax_r13 has molecules_um_3_s_1;
  Km_r12 = 1391.115 molecules_um_3;
  Vmax_r12 has molecules_um_3_s_1;
  Kf_r14 = 0.506 s_1;
  Kr_r14 = 0.476 s_1;
  Km_r15 = 313.1514 molecules_um_3;
  Vmax_r15 has molecules_um_3_s_1;
  Kf_r16 = 0 s_1;
  Kf_r7 = 3.321078e-5 um3_s_1_molecules_1;
  Kr_r7 = 50 s_1;
  Kf_r20 = 2.490808e-8 um3_s_1_molecules_1;
  Kr_r20 = 0.15 s_1;
  Kr_r17 = 0 s_1;
  Kf_r17 has s_1;
  Km_r21 = 602.214179 molecules_um_3;
  Vmax_r21 has molecules_um_3_s_1;
  Kf_r23 = 1.660539e-7 um3_s_1_molecules_1;
  Kr_r23 = 0 s_1;
  Kf_r24 = 1.660539e-7 um3_s_1_molecules_1;
  Kr_r24 = 0 s_1;
  Kf_r22 = 0.00203 s_1;
  Kr_r22 = 0 s_1;
  Kf_r26 = 0.001660539 um3_s_1_molecules_1;
  Kr_r26 = 1 s_1;
  Kf_r27 = 0.02 s_1;
  Kr_r27 = 0.0087 s_1;
  Km_r28 = 4335.942 molecules_um_3;
  Vmax_r28 has molecules_um_3_s_1;
  Km_r30 = 602.214179 molecules_um_3;
  Vmax_r30 has molecules_um_3_s_1;
  Km_r25 = 4335.942 molecules_um_3;
  Vmax_r25 has molecules_um_3_s_1;
  Km_r29 = 602.214179 molecules_um_3;
  Vmax_r29 has molecules_um_3_s_1;
  Km_r31 = 10237.64 molecules_um_3;
  Vmax_r31 has molecules_um_3_s_1;
  Kf_r18 = 1.5e-7 s_1;
  Kr_r18 = 0 s_1;

  // Assignment rules:
  Vmax_r4 := p63_act;
  Vmax_r5 := 800*PLC_act;
  Vmax_r6 := 10*IP3;
  Vmax_r8 := 1.1*PKC_act_translocate;
  Vmax_r9 := 0.5*p115_act;
  Vmax_r11 := 0.754*SERCA;
  Vmax_r13 := 0.036*phosphatase;
  Vmax_r12 := 0.0541*GAP_act;
  Vmax_r15 := 0.26*Expumps_out;
  Kf_r17 := 0.001660539*PLC_act;
  Vmax_r21 := 0.1*Expumps_in;
  Vmax_r28 := 0.036*phosphatase;
  Vmax_r30 := 1.1*PKC_act_translocate;
  Vmax_r25 := 0.036*phosphatase;
  Vmax_r29 := 1.1*PKC_act_translocate;
  Vmax_r31 := 0.0242*GDI_act;

  // Reactions:
  // M Shahid Open Immun Journal 2009
  r0: Histamine + H1HR_inact -> H1HR_act; (H1HR_inact*Histamine*Kf_r0 - H1HR_act*Kr_r0)*c0;
  // BH Kim et al. PLoS One 2013
  r1: Gaq_inact + H1HR_act -> Gaq_act; (Gaq_inact*H1HR_act*Kf_r1 - Gaq_act*Kr_r1)*c0;
  // TJ Lukas Biophys Journal 2004
  r2: Gaq_act + PLC_inact -> PLC_act; (-(Kr_r2*PLC_act) + Gaq_act*Kf_r2*PLC_inact)*c0;
  // S Lutz et al Science 2007 fitted kf
  r3: Gaq_act + p63_inact -> p63_act; (-(Kr_r3*p63_act) + Gaq_act*Kf_r3*p63_inact)*c0;
  // fitted km vmax numbers are extrapolated by comparing p115 kinetics to p63 kinetics looked at p115 kobs from M Jaiswal et al JBC 2011 looked at p63 kobs from RJ Rojas et al JBC 2007
  r4: RhoA_inact -> RhoA_act; 0.001660539*RhoA_inact*Vmax_r4/(0.001660539*Km_r4 + 0.001660539*RhoA_inact)*c0;  // modifiers: p63_act
  // Km: Cheng-Jing Zhou et al. Biochem J 1993 kcat: BH Kim et al. PLoS One 2013 TJ Lukas Biophys Journal 2004
  r5: PIP2 -> DAG + IP3; 0.001660539*PIP2*Vmax_r5/(0.001660539*Km_r5 + 0.001660539*PIP2)*c0;  // modifiers: PLC_act
  // MR Maurya and S Subramanian Biophys J 2007 kcat went from .189 to 10
  r6: Ca_ER -> Ca_cyto; 0.001660539*Ca_ER*Vmax_r6/(0.001660539*Ca_ER + 0.001660539*Km_r6)*c0;  // modifiers: IP3
  // JH Kang et al. Proteomics 2008 Km and vmax is averaged for all PKCs
  r8: p115_inact -> p115_act; 0.001660539*Vmax_r8*p115_inact/(0.001660539*Km_r8 + 0.001660539*p115_inact)*c0;  // modifiers: PKC_act_translocate
  // M Jaiswal et al JBC 2011
  r9: RhoA_inact -> RhoA_act; 0.001660539*RhoA_inact*Vmax_r9/(0.001660539*Km_r9 + 0.001660539*RhoA_inact)*c0;  // modifiers: p115_act
  // MR Maurya and S Subramanian Biophys J 2007 fitted kr
  r10: Ca_cyto -> Ca_miscbound; (Ca_cyto*Kf_r10 - Ca_miscbound*Kr_r10)*c0;
  // MR Maurya and S Subramanian Biophys J 2007
  r11: Ca_cyto -> Ca_ER; 0.001660539*Ca_cyto*Vmax_r11/(0.001660539*Ca_cyto + 0.001660539*Km_r11)*c0;  // modifiers: SERCA
  // MD Pato et al. Biochem J 1993 averaged from caldesmon and calponin changed .00364 to .0364
  r13: p115_act -> p115_inact; 0.001660539*Vmax_r13*p115_act/(0.001660539*Km_r13 + 0.001660539*p115_act)*c0;  // modifiers: phosphatase
  // averaged from p50GAP and p190GAP kinetic parameters R Li et al. JBC 1997
  r12: RhoA_act -> RhoA_inact; 0.001660539*RhoA_act*Vmax_r12/(0.001660539*Km_r12 + 0.001660539*RhoA_act)*c0;  // modifiers: GAP_act
  // MR Maurya and S Subramanian Biophys J 2007
  r14: Ca_cyto -> Ca_mito; (Ca_cyto*Kf_r14 - Ca_mito*Kr_r14)*c0;
  // MR Maurya and S Subramanian Biophys J 2007 averaged from PMCA and NCX
  r15: Ca_cyto -> Ca_Ex; 0.001660539*Ca_cyto*Vmax_r15/(0.001660539*Ca_cyto + 0.001660539*Km_r15)*c0;  // modifiers: Expumps_out
  // MR Maurya and S Subramanian Biophys J 2007
  r16: Ca_ER -> ; Ca_ER*Kf_r16*c0;
    Kr = 0 molecules_um_3_s_1;
  // BH Kim et al. PLoS One 2013
  r7: Ca_cyto + PKC_inact -> PKC_Ca; (-(Kr_r7*PKC_Ca) + Ca_cyto*Kf_r7*PKC_inact)*c0;
  // BH Kim et al. PLoS One 2013
  r20: DAG + PKC_Ca -> PKC_act; (DAG*Kf_r20*PKC_Ca - Kr_r20*PKC_act)*c0;
  // BH Kim et al. PLoS One 2013
  r17: Gaq_act -> Gaq_inact; (Gaq_act*Kf_r17 - Gaq_inact*Kr_r17)*c0;  // modifiers: PLC_act
  // MR Maurya and S Subramanian Biophys J 2007 looking at NCX
  r21: Ca_Ex -> Ca_cyto; 0.001660539*Ca_Ex*Vmax_r21/(0.001660539*Ca_Ex + 0.001660539*Km_r21)*c0;  // modifiers: Expumps_in
  r23: Expumps_in + Ca_cyto -> Expumps_out; (Ca_cyto*Expumps_in*Kf_r23 - Expumps_out*Kr_r23)*c0;
  r24: Ca_Ex + Expumps_out -> Expumps_in; (Ca_Ex*Expumps_out*Kf_r24 - Expumps_in*Kr_r24)*c0;
  // MR Maurya and S Subramanian Biophys J 2007 Ca ER leak
  r22: Ca_ER -> Ca_cyto; (Ca_ER*Kf_r22 - Ca_cyto*Kr_r22)*c0;
  r26: Pyrilamine + H1HR_act -> H1HR_inact; (-(H1HR_inact*Kr_r26) + H1HR_act*Kf_r26*Pyrilamine)*c0;
  r27: PKC_act -> PKC_act_translocate; (Kf_r27*PKC_act - Kr_r27*PKC_act_translocate)*c0;
  r28: GDI_inact -> GDI_act; 0.001660539*GDI_inact*Vmax_r28/(0.001660539*GDI_inact + 0.001660539*Km_r28)*c0;  // modifiers: phosphatase
  r30: GDI_act -> GDI_inact; 0.001660539*GDI_act*Vmax_r30/(0.001660539*GDI_act + 0.001660539*Km_r30)*c0;  // modifiers: PKC_act_translocate
  r25: GAP_inact -> GAP_act; 0.001660539*GAP_inact*Vmax_r25/(0.001660539*GAP_inact + 0.001660539*Km_r25)*c0;  // modifiers: phosphatase
  r29: GAP_act -> GAP_inact; 0.001660539*GAP_act*Vmax_r29/(0.001660539*GAP_act + 0.001660539*Km_r29)*c0;  // modifiers: PKC_act_translocate
  r31: RhoA_act -> RhoA_inact; 0.001660539*RhoA_act*Vmax_r31/(0.001660539*Km_r31 + 0.001660539*RhoA_act)*c0;  // modifiers: GDI_act
  r18: DAG -> DAG_deg; (DAG*Kf_r18 - DAG_deg*Kr_r18)*c0;

  // Events:
  event0: at (time >= 1200), t0=false: Pyrilamine = 60221.42;

  // Unit definitions:
  unit molecules = item;
  unit um3 = (1e-6 metre)^3;
  unit um2 = (1e-6 metre)^2;
  unit um = 1e-6 metre;
  unit s = second;
  unit K = kelvin;
  unit _one_ = dimensionless;
  unit C_mol_1 = coulomb / mole;
  unit C_nmol_1 = coulomb / (1e-9 mole);
  unit molecules_pmol_1 = item / (1e-12 mole);
  unit _one_000000000 = 1e9 dimensionless;
  unit mV_C_K_1_mol_1 = 1e-3 volt * coulomb / (kelvin * mole);
  unit mV_V_1 = dimensionless;
  unit uM_um3_molecules_1 = 1e-6 mole * (1e-6 metre)^3 / (litre * item);
  unit um3_s_1_molecules_1 = (1e-6 metre)^3 / (second * item);
  unit s_1 = 1 / second;
  unit molecules_um_3 = item / (1e-6 metre)^3;
  unit molecules_um_3_s_1 = item / ((1e-6 metre)^3 * second);
end
