// SBML level 3 version 1
// Exported by VCell 7.3

model Minimum_Stochastic_Model_BetaCell_Copy_of_Application0_1()
  // model units - substance: molecules, time: s, volume: um3, area: um2, length: um, extent: molecules

  // Compartments:
  compartment c2 = 50000 um3;
  compartment c0 = 0.083 um3;
  compartment c1 = 50000 um3;
  compartment c3 = 50000 um3;
  compartment m0 = 0.28;  // 2-D
  compartment m1 = 6563;  // 2-D
  compartment m2 = 6563;  // 2-D
  compartment m3 = 6563;  // 2-D
  compartment centermem = 6563;  // 2-D

  // Species:
  substanceOnly species Ca in c0 = 10;
  substanceOnly species AC in m0 = 0;
  substanceOnly species cAMP in c0 = 0;
  substanceOnly species PDE in c0 = 45;
  substanceOnly species ACa in m0 = 0;
  substanceOnly species PDEa in c0 = 5;
  substanceOnly species s0m in m1 = 0;
  substanceOnly species s4m in m1 = 0;

  // Parameters:
  g0 has molecules_um_2;
  _T_ = 300 K;
  _PI_ = 3.141593 _one_;
  _F_ = 9.64853321e4 C_mol_1;
  _F_nmol_ = 9.64853321e-5 C_nmol_1;
  _N_pmol_ = 6.02214179e11 molecules_pmol_1;
  _K_GHK_ = 1e-9 _one_000000000;
  _R_ = 8314.463 mV_C_K_1_mol_1;
  K_millivolts_per_volt = 1000 mV_V_1;
  KMOLE = 0.001660539 uM_um3_molecules_1;
  Kf_Ca_influx = 200 s_1;
  Kr_Ca_influx = 0 um3_s_1_molecules_1;
  Kf_cAMPdeg = 0.1660539 um3_s_1_molecules_1;
  Kr_cAMPdeg = 0 s_1;
  Kf_inddeg = 50 s_1;
  Kf_AC_act = 0.1660539 um3_s_1_molecules_1;
  Kr_AC_act = 100 s_1;
  Kf_PDEact = 0.01660539 um3_s_1_molecules_1;
  Kr_PDEact = 100 s_1;
  Kf_basedeg = 0.01660539 um3_s_1_molecules_1;
  Kr_basedeg = 0 s_1;
  Kf_baseAC = 10 s_1;
  Kr_baseAC = 0 um3_s_1_molecules_1;
  Kf_ACactive = 200 s_1;
  Kr_ACactive = 0 um3_s_1_molecules_1;
  Kf_removeCa = 1.660539 um_s_1;
  Kf_r0m = 1 s_1;
  Kr_r0m = 0 um2_s_1_molecules_1;
  Kf_r1m = 1 um2_s_1_molecules_1;
  Kr_r1m = 0 um2_s_1_molecules_1;
  Kf_r2m = 5 s_1;

  // Assignment rules:
  g0 := 0.5*(2 + 2*(2*floor(0.25*t) - floor(0.5*t)));

  // Reactions:
  Ca_influx: s4m -> s4m + Ca; (Kf_Ca_influx*s4m - Ca*Kr_Ca_influx*s4m)*m0;
    Ca_influx_I = 0 pA_um_2; Ca_influx_netValence = 1 _one_;
  cAMPdeg: PDEa + cAMP -> PDEa; (-(Kr_cAMPdeg*PDEa) + Kf_cAMPdeg*PDEa*cAMP)*c0;
  inddeg: cAMP -> ; Kf_inddeg*cAMP*c0;
    inddeg_Kr = 0 molecules_um_3_s_1;
  AC_act: AC + Ca -> ACa; (AC*Ca*Kf_AC_act - ACa*Kr_AC_act)*m0;
    AC_act_I = 0 pA_um_2; AC_act_netValence = 1 _one_;
  PDEact: Ca + PDE -> PDEa; (Ca*Kf_PDEact*PDE - Kr_PDEact*PDEa)*c0;
  basedeg: PDE + cAMP -> PDE; (-(Kr_basedeg*PDE) + Kf_basedeg*PDE*cAMP)*c0;
  baseAC: AC -> AC + cAMP; (AC*Kf_baseAC - AC*Kr_baseAC*cAMP)*m0;
    baseAC_I = 0 pA_um_2; baseAC_netValence = 1 _one_;
  ACactive: ACa -> cAMP + ACa; (ACa*Kf_ACactive - ACa*Kr_ACactive*cAMP)*m0;
    ACactive_I = 0 pA_um_2; ACactive_netValence = 1 _one_;
  removeCa: Ca -> ; Ca*Kf_removeCa*m0;
    removeCa_I = 0 pA_um_2; removeCa_netValence = 1 _one_; removeCa_Kr = 0 molecules_um_2_s_1;
  cAMPind: -> cAMP; 20*m0;
    cAMPind_I = 0 pA_um_2; cAMPind_netValence = 1 _one_;
  r0m: s0m -> 2 s0m; (Kf_r0m*s0m - Kr_r0m*s0m^2)*m1;
    r0m_I = 0 pA_um_2; r0m_netValence = 1 _one_;
  r1m: s0m + s4m -> 2 s4m; (Kf_r1m*s0m*s4m - Kr_r1m*s4m^2)*m1;
    r1m_I = 0 pA_um_2; r1m_netValence = 1 _one_;
  r2m: s4m -> ; Kf_r2m*s4m*m1;
    r2m_I = 0 pA_um_2; r2m_netValence = 1 _one_; r2m_Kr = 0 molecules_um_2_s_1;

  // Unit definitions:
  unit molecules = item;
  unit um3 = (1e-6 metre)^3;
  unit um2 = (1e-6 metre)^2;
  unit um = 1e-6 metre;
  unit s = second;
  unit molecules_um_2 = item / (1e-6 metre)^2;
  unit K = kelvin;
  unit _one_ = dimensionless;
  unit C_mol_1 = coulomb / mole;
  unit C_nmol_1 = coulomb / (1e-9 mole);
  unit molecules_pmol_1 = item / (1e-12 mole);
  unit _one_000000000 = 1e9 dimensionless;
  unit mV_C_K_1_mol_1 = 1e-3 volt * coulomb / (kelvin * mole);
  unit mV_V_1 = dimensionless;
  unit uM_um3_molecules_1 = 1e-6 mole * (1e-6 metre)^3 / (litre * item);
  unit pA_um_2 = 1e-12 ampere / (1e-6 metre)^2;
  unit s_1 = 1 / second;
  unit um3_s_1_molecules_1 = (1e-6 metre)^3 / (second * item);
  unit molecules_um_3_s_1 = item / ((1e-6 metre)^3 * second);
  unit um_s_1 = 1e-6 metre / second;
  unit molecules_um_2_s_1 = item / ((1e-6 metre)^2 * second);
  unit um2_s_1_molecules_1 = (1e-6 metre)^2 / (second * item);
end
