// SBML level 3 version 1
// Exported by VCell 7.3

model _five_HT7_Jang_2020_Application0()
  // 5HT7_Jang_2020_Application0
  // model units - substance: molecules, time: s, volume: um3, area: um2, length: um, extent: molecules

  // Compartments:
  compartment EC = 250000 um3;
  compartment IC = 5500 um3;
  compartment PM = 1500;  // 2-D

  // Species:
  substanceOnly species Gs_GDP_s in PM = 75000;
  substanceOnly species Gs_GTP_s in PM = 0;
  substanceOnly species Gs_Empty_s in PM = 0;
  substanceOnly species GDP_free in IC = 0;
  substanceOnly species GTP_free in IC = 0;
  substanceOnly species HTR7_Apo_Inactive_Unbound in PM = 0;
  substanceOnly species HTR7_L_Active_Unbound in PM = 0;
  substanceOnly species HTR7_L_Inactive_Unbound in PM = 0;
  substanceOnly species HTR7_L_Active_Gs_GDP in PM = 0;
  substanceOnly species HTR7_L_Active_Gs_Empty in PM = 0;
  substanceOnly species HTR7_L_Active_Gs_GTP in PM = 0;
  substanceOnly species HTR7_Apo_Active_Unbound in PM = 0;
  substanceOnly species L_5HT in EC = 0;
  substanceOnly species L_5HT_1 in EC = 4760.925;
  substanceOnly species L_5HT_2 in EC = 15055.35;
  substanceOnly species L_5HT_3 in EC = 47574.92;
  substanceOnly species L_5HT_4 in EC = 150553.5;
  substanceOnly species L_5HT_5 in EC = 476050.3;
  substanceOnly species L_5HT_6 in EC = 1505535;
  substanceOnly species L_5HT_7 in EC = 4760955;
  substanceOnly species L_5HT_8 in EC = 1.505535e7;
  substanceOnly species L_5HT_9 in EC = 4.760955e7;
  substanceOnly species L_5HT_10 in EC = 1.505535e8;
  substanceOnly species L_5HT_11 in EC = 4.760922e8;
  substanceOnly species L_5HT_12 in EC = 1.505535e9;
  substanceOnly species L_5HT_13 in EC = 4.760922e9;
  substanceOnly species ss1_5HT in EC = 1.505535e8;
  substanceOnly species ss2_MT in EC = 1.505535e10;
  substanceOnly species I_MT in EC = 0;
  substanceOnly species GDP_IC in IC = 9.936534e7;
  substanceOnly species GTP_IC in IC = 9.936534e8;
  substanceOnly species L_5HT_14 in EC = 1.505535e10;
  substanceOnly species L_5HT_15 in EC = 4.760922e10;
  substanceOnly species L_5HT_16 in EC = 1.505535e11;
  substanceOnly species L_ISO in EC = 0;
  substanceOnly species ss3_Iso in EC = 1.505535e8;
  substanceOnly species B2AR_Apo_Inactive in PM = 0;
  substanceOnly species G12_Empty_s in PM = 0;
  substanceOnly species G12_GDP_S in PM = 0;
  substanceOnly species GRK_Kras_s in PM = 0;
  substanceOnly species L_ISO_1 in EC = 4760.925;
  substanceOnly species L_ISO_2 in EC = 15055.35;
  substanceOnly species L_ISO_3 in EC = 47574.92;
  substanceOnly species L_ISO_4 in EC = 150553.5;
  substanceOnly species L_ISO_5 in EC = 476050.3;
  substanceOnly species L_ISO_6 in EC = 1505535;
  substanceOnly species L_ISO_7 in EC = 4760955;
  substanceOnly species L_ISO_8 in EC = 1.505535e7;
  substanceOnly species L_ISO_9 in EC = 4.760955e7;
  substanceOnly species L_ISO_10 in EC = 1.505535e8;
  substanceOnly species L_ISO_11 in EC = 4.760922e8;
  substanceOnly species L_ISO_12 in EC = 1.505535e9;
  substanceOnly species L_ISO_13 in EC = 4.760922e9;
  substanceOnly species L_ISO_14 in EC = 1.505535e10;
  substanceOnly species L_ISO_15 in EC = 4.760922e10;
  substanceOnly species L_ISO_16 in EC = 1.505535e11;
  substanceOnly species I_ICI in EC = 0;
  substanceOnly species ss4_ICI in EC = 1204428358;
  substanceOnly species HTR7_null_apo in PM = 750;

  // Parameters:
  _T_ = 300 K;
  _PI_ = 3.141593 _one_;
  _F_ = 9.64853321e4 C_mol_1;
  _F_nmol_ = 9.64853321e-5 C_nmol_1;
  _N_pmol_ = 6.02214179e11 molecules_pmol_1;
  _K_GHK_ = 1e-9 _one_000000000;
  _R_ = 8314.463 mV_C_K_1_mol_1;
  K_millivolts_per_volt = 1000 mV_V_1;
  KMOLE = 0.001660539 uM_um3_molecules_1;
  start_inj1 = 10500 s;
  end_inj1 = 12000 s;
  start1_inj1 = 12500 s;
  Kf_inj1 has s_1;
  Kr_inj1 has s_1;
  start1_inj2 = 12500 s;
  end1_inj2 = 14000 s;
  start2_inj2 = 14500 s;
  Kf_inj2 has s_1;
  Kr_inj2 has s_1;
  end2_inj3 = 16000 s;
  start2_inj3 = 14500 s;
  start3_inj3 = 16500 s;
  Kf_inj3 has s_1;
  Kr_inj3 has s_1;
  end3_inj4 = 18000 s;
  start3_inj4 = 16500 s;
  start4_inj4 = 18500 s;
  Kf_inj4 has s_1;
  Kr_inj4 has s_1;
  end4_inj5 = 20000 s;
  start4_inj5 = 18500 s;
  start5_inj5 = 20500 s;
  Kf_inj5 has s_1;
  Kr_inj5 has s_1;
  end5_inj6 = 22000 s;
  start5_inj6 = 20500 s;
  start6_inj6 = 22500 s;
  Kf_inj6 has s_1;
  Kr_inj6 has s_1;
  end6_inj7 = 24000 s;
  start6_inj7 = 22500 s;
  start7_inj7 = 24500 s;
  Kf_inj7 has s_1;
  Kr_inj7 has s_1;
  end7_inj8 = 26000 s;
  start7_inj8 = 24500 s;
  start8_inj8 = 26500 s;
  Kf_inj8 has s_1;
  Kr_inj8 has s_1;
  end8_inj9 = 28000 s;
  start8_inj9 = 26500 s;
  start9_inj9 = 28500 s;
  Kf_inj9 has s_1;
  Kr_inj9 has s_1;
  end9_inj10 = 30000 s;
  start9_inj10 = 28500 s;
  start10_inj10 = 30500 s;
  Kf_inj10 has s_1;
  Kr_inj10 has s_1;
  end10_inj11 = 32000 s;
  start10_inj11 = 30500 s;
  start11_inj11 = 32500 s;
  Kf_inj11 has s_1;
  Kr_inj11 has s_1;
  start11_inj12 = 32500 s;
  end11_inj12 = 34000 s;
  start12_inj12 = 34500 s;
  Kf_inj12 has s_1;
  Kr_inj12 has s_1;
  start12_inj13 = 34500 s;
  end12_inj13 = 36000 s;
  start13_inj13 = 36500 s;
  Kf_inj13 has s_1;
  Kr_inj13 has s_1;
  end_ss_1 = 2300 s;
  start_ss_1 = 530 s;
  Kf_ss_1 has s_1;
  Kr_ss_1 has s_1;
  Kr_ss_2 = 0 s_1;
  start_ss_2 = 575 s;
  Kf_ss_2 has s_1;
  Kr_GDP_Inj = 0 s_1;
  start_GDP_Inj = 0 s;
  Kf_GDP_Inj has s_1;
  Kr_GTP_Inj = 0 s_1;
  start_GTP_Inj = 0 s;
  Kf_GTP_Inj has s_1;
  start13_inj14 = 36500 s;
  end13_inj14 = 38000 s;
  start14_inj14 = 38500 s;
  Kf_inj14 has s_1;
  Kr_inj14 has s_1;
  end14_inj15 = 40000 s;
  start14_inj15 = 38500 s;
  start15_inj15 = 40500 s;
  Kf_inj15 has s_1;
  Kr_inj15 has s_1;
  end15_inj16 = 42000 s;
  start15_inj16 = 40500 s;
  Kf_inj16 has s_1;
  Kr_inj16 has s_1;
  start_ISO1 = 10500 s;
  end_ISO1 = 12000 s;
  start1_ISO1 = 12500 s;
  Kf_ISO1 has s_1;
  Kr_ISO1 has s_1;
  start1_ISO2 = 12500 s;
  end1_ISO2 = 14000 s;
  start2_ISO2 = 14500 s;
  Kf_ISO2 has s_1;
  Kr_ISO2 has s_1;
  end2_ISO3 = 16000 s;
  start2_ISO3 = 14500 s;
  start3_ISO3 = 16500 s;
  Kf_ISO3 has s_1;
  Kr_ISO3 has s_1;
  end3_ISO_4 = 18000 s;
  start3_ISO_4 = 16500 s;
  start4_ISO_4 = 18500 s;
  Kf_ISO_4 has s_1;
  Kr_ISO_4 has s_1;
  end4_ISO_5 = 20000 s;
  start4_ISO_5 = 18500 s;
  start5_ISO_5 = 20500 s;
  Kf_ISO_5 has s_1;
  Kr_ISO_5 has s_1;
  end5_ISO_6 = 22000 s;
  start5_ISO_6 = 20500 s;
  start6_ISO_6 = 22500 s;
  Kf_ISO_6 has s_1;
  Kr_ISO_6 has s_1;
  end6_ISO_7 = 24000 s;
  start6_ISO_7 = 22500 s;
  start7_ISO_7 = 24500 s;
  Kf_ISO_7 has s_1;
  Kr_ISO_7 has s_1;
  end7_ISO_8 = 26000 s;
  start7_ISO_8 = 24500 s;
  start8_ISO_8 = 26500 s;
  Kf_ISO_8 has s_1;
  Kr_ISO_8 has s_1;
  end8_ISO_9 = 28000 s;
  start8_ISO_9 = 26500 s;
  start9_ISO_9 = 28500 s;
  Kf_ISO_9 has s_1;
  Kr_ISO_9 has s_1;
  end9_ISO_10 = 30000 s;
  start9_ISO_10 = 28500 s;
  start10_ISO_10 = 30500 s;
  Kf_ISO_10 has s_1;
  Kr_ISO_10 has s_1;
  end10_ISO_11 = 32000 s;
  start10_ISO_11 = 30500 s;
  start11_ISO_11 = 32500 s;
  Kf_ISO_11 has s_1;
  Kr_ISO_11 has s_1;
  start11_ISO_12 = 32500 s;
  end11_ISO_12 = 34000 s;
  start12_ISO_12 = 34500 s;
  Kf_ISO_12 has s_1;
  Kr_ISO_12 has s_1;
  start12_ISO_13 = 34500 s;
  end12_ISO_13 = 36000 s;
  start13_ISO_13 = 36500 s;
  Kf_ISO_13 has s_1;
  Kr_ISO_13 has s_1;
  start13_ISO_14 = 36500 s;
  end13_ISO_14 = 38000 s;
  start14_ISO_14 = 38500 s;
  Kf_ISO_14 has s_1;
  Kr_ISO_14 has s_1;
  end14_ISO_15 = 40000 s;
  start14_ISO_15 = 38500 s;
  start15_ISO_15 = 40500 s;
  Kf_ISO_15 has s_1;
  Kr_ISO_15 has s_1;
  Kr_ISO_16 = 0 s_1;
  start15_ISO_16 = 40500 s;
  end15_ISO_16 = 42000 s;
  Kf_ISO_16 has s_1;

  // Assignment rules:
  Kf_inj1 := 50*(t > start_inj1)*(t < end_inj1);
  Kr_inj1 := 50*(t > end_inj1)*(t < start1_inj1);
  Kf_inj2 := 50*(t > start1_inj2)*(t < end1_inj2);
  Kr_inj2 := 50*(t > end1_inj2)*(t < start2_inj2);
  Kf_inj3 := 50*(t > start2_inj3)*(t < end2_inj3);
  Kr_inj3 := 50*(t > end2_inj3)*(t < start3_inj3);
  Kf_inj4 := 50*(t > start3_inj4)*(t < end3_inj4);
  Kr_inj4 := 50*(t > end3_inj4)*(t < start4_inj4);
  Kf_inj5 := 50*(t > start4_inj5)*(t < end4_inj5);
  Kr_inj5 := 50*(t > end4_inj5)*(t < start5_inj5);
  Kf_inj6 := 50*(t > start5_inj6)*(t < end5_inj6);
  Kr_inj6 := 50*(t > end5_inj6)*(t < start6_inj6);
  Kf_inj7 := 50*(t > start6_inj7)*(t < end6_inj7);
  Kr_inj7 := 50*(t > end6_inj7)*(t < start7_inj7);
  Kf_inj8 := 50*(t > start7_inj8)*(t < end7_inj8);
  Kr_inj8 := 50*(t > end7_inj8)*(t < start8_inj8);
  Kf_inj9 := 50*(t > start8_inj9)*(t < end8_inj9);
  Kr_inj9 := 50*(t > end8_inj9)*(t < start9_inj9);
  Kf_inj10 := 50*(t > start9_inj10)*(t < end9_inj10);
  Kr_inj10 := 50*(t > end9_inj10)*(t < start10_inj10);
  Kf_inj11 := 50*(t > start10_inj11)*(t < end10_inj11);
  Kr_inj11 := 50*(t > end10_inj11)*(t < start11_inj11);
  Kf_inj12 := 50*(t > start11_inj12)*(t < end11_inj12);
  Kr_inj12 := 50*(t > end11_inj12)*(t < start12_inj12);
  Kf_inj13 := 50*(t > start12_inj13)*(t < end12_inj13);
  Kr_inj13 := 50*(t > end12_inj13)*(t < start13_inj13);
  Kf_ss_1 := 50*(t > start_ss_1)*(t < end_ss_1);
  Kr_ss_1 := 50*(t > end_ss_1);
  Kf_ss_2 := 50*(t > start_ss_2);
  Kf_GDP_Inj := 50*(t > start_GDP_Inj);
  Kf_GTP_Inj := 50*(t > start_GTP_Inj);
  Kf_inj14 := 50*(t > start13_inj14)*(t < end13_inj14);
  Kr_inj14 := 50*(t > end13_inj14)*(t < start14_inj14);
  Kf_inj15 := 50*(t > start14_inj15)*(t < end14_inj15);
  Kr_inj15 := 50*(t > end14_inj15)*(t < start15_inj15);
  Kf_inj16 := 50*(t > start15_inj16)*(t < end15_inj16);
  Kr_inj16 := 50*(t > end15_inj16);
  Kf_ISO1 := 50*(t > start_ISO1)*(t < end_ISO1);
  Kr_ISO1 := 50*(t > end_ISO1)*(t < start1_ISO1);
  Kf_ISO2 := 50*(t > start1_ISO2)*(t < end1_ISO2);
  Kr_ISO2 := 50*(t > end1_ISO2)*(t < start2_ISO2);
  Kf_ISO3 := 50*(t > start2_ISO3)*(t < end2_ISO3);
  Kr_ISO3 := 50*(t > end2_ISO3)*(t < start3_ISO3);
  Kf_ISO_4 := 50*(t > start3_ISO_4)*(t < end3_ISO_4);
  Kr_ISO_4 := 50*(t > end3_ISO_4)*(t < start4_ISO_4);
  Kf_ISO_5 := 50*(t > start4_ISO_5)*(t < end4_ISO_5);
  Kr_ISO_5 := 50*(t > end4_ISO_5)*(t < start5_ISO_5);
  Kf_ISO_6 := 50*(t > start5_ISO_6)*(t < end5_ISO_6);
  Kr_ISO_6 := 50*(t > end5_ISO_6)*(t < start6_ISO_6);
  Kf_ISO_7 := 50*(t > start6_ISO_7)*(t < end6_ISO_7);
  Kr_ISO_7 := 50*(t > end6_ISO_7)*(t < start7_ISO_7);
  Kf_ISO_8 := 50*(t > start7_ISO_8)*(t < end7_ISO_8);
  Kr_ISO_8 := 50*(t > end7_ISO_8)*(t < start8_ISO_8);
  Kf_ISO_9 := 50*(t > start8_ISO_9)*(t < end8_ISO_9);
  Kr_ISO_9 := 50*(t > end8_ISO_9)*(t < start9_ISO_9);
  Kf_ISO_10 := 50*(t > start9_ISO_10)*(t < end9_ISO_10);
  Kr_ISO_10 := 50*(t > end9_ISO_10)*(t < start10_ISO_10);
  Kf_ISO_11 := 50*(t > start10_ISO_11)*(t < end10_ISO_11);
  Kr_ISO_11 := 50*(t > end10_ISO_11)*(t < start11_ISO_11);
  Kf_ISO_12 := 50*(t > start11_ISO_12)*(t < end11_ISO_12);
  Kr_ISO_12 := 50*(t > end11_ISO_12)*(t < start12_ISO_12);
  Kf_ISO_13 := 50*(t > start12_ISO_13)*(t < end12_ISO_13);
  Kr_ISO_13 := 50*(t > end12_ISO_13)*(t < start13_ISO_13);
  Kf_ISO_14 := 50*(t > start13_ISO_14)*(t < end13_ISO_14);
  Kr_ISO_14 := 50*(t > end13_ISO_14)*(t < start14_ISO_14);
  Kf_ISO_15 := 50*(t > start14_ISO_15)*(t < end14_ISO_15);
  Kr_ISO_15 := 50*(t > end14_ISO_15)*(t < start15_ISO_15);
  Kf_ISO_16 := 50*(t > start15_ISO_16)*(t < end15_ISO_16);

  // Reactions:
  inj1: L_5HT_1 -> L_5HT; (-(Kr_inj1*L_5HT) + Kf_inj1*L_5HT_1)*EC;
  inj2: L_5HT_2 -> L_5HT; (-(Kr_inj2*L_5HT) + Kf_inj2*L_5HT_2)*EC;
  inj3: L_5HT_3 -> L_5HT; (-(Kr_inj3*L_5HT) + Kf_inj3*L_5HT_3)*EC;
  inj4: L_5HT_4 -> L_5HT; (-(Kr_inj4*L_5HT) + Kf_inj4*L_5HT_4)*EC;
  inj5: L_5HT_5 -> L_5HT; (-(Kr_inj5*L_5HT) + Kf_inj5*L_5HT_5)*EC;
  inj6: L_5HT_6 -> L_5HT; (-(Kr_inj6*L_5HT) + Kf_inj6*L_5HT_6)*EC;
  inj7: L_5HT_7 -> L_5HT; (-(Kr_inj7*L_5HT) + Kf_inj7*L_5HT_7)*EC;
  inj8: L_5HT_8 -> L_5HT; (-(Kr_inj8*L_5HT) + Kf_inj8*L_5HT_8)*EC;
  inj9: L_5HT_9 -> L_5HT; (-(Kr_inj9*L_5HT) + Kf_inj9*L_5HT_9)*EC;
  inj10: L_5HT_10 -> L_5HT; (-(Kr_inj10*L_5HT) + Kf_inj10*L_5HT_10)*EC;
  inj11: L_5HT_11 -> L_5HT; (-(Kr_inj11*L_5HT) + Kf_inj11*L_5HT_11)*EC;
  inj12: L_5HT_12 -> L_5HT; (-(Kr_inj12*L_5HT) + Kf_inj12*L_5HT_12)*EC;
  inj13: L_5HT_13 -> L_5HT; (-(Kr_inj13*L_5HT) + Kf_inj13*L_5HT_13)*EC;
  ss_1: ss1_5HT -> L_5HT; (-(Kr_ss_1*L_5HT) + Kf_ss_1*ss1_5HT)*EC;
  ss_2: ss2_MT -> I_MT; (-(I_MT*Kr_ss_2) + Kf_ss_2*ss2_MT)*EC;
  GDP_Inj: GDP_IC -> GDP_free; (GDP_IC*Kf_GDP_Inj - GDP_free*Kr_GDP_Inj)*IC;
  GTP_Inj: GTP_IC -> GTP_free; (GTP_IC*Kf_GTP_Inj - GTP_free*Kr_GTP_Inj)*IC;
  inj14: L_5HT_14 -> L_5HT; (-(Kr_inj14*L_5HT) + Kf_inj14*L_5HT_14)*EC;
  inj15: L_5HT_15 -> L_5HT; (-(Kr_inj15*L_5HT) + Kf_inj15*L_5HT_15)*EC;
  inj16: L_5HT_16 -> L_5HT; (-(Kr_inj16*L_5HT) + Kf_inj16*L_5HT_16)*EC;
  ISO1: L_ISO_1 -> L_ISO; (-(Kr_ISO1*L_ISO) + Kf_ISO1*L_ISO_1)*EC;
  ISO2: L_ISO_2 -> L_ISO; (-(Kr_ISO2*L_ISO) + Kf_ISO2*L_ISO_2)*EC;
  ISO3: L_ISO_3 -> L_ISO; (-(Kr_ISO3*L_ISO) + Kf_ISO3*L_ISO_3)*EC;
  ISO_4: L_ISO_4 -> L_ISO; (-(Kr_ISO_4*L_ISO) + Kf_ISO_4*L_ISO_4)*EC;
  ISO_5: L_ISO_5 -> L_ISO; (-(Kr_ISO_5*L_ISO) + Kf_ISO_5*L_ISO_5)*EC;
  ISO_6: L_ISO_6 -> L_ISO; (-(Kr_ISO_6*L_ISO) + Kf_ISO_6*L_ISO_6)*EC;
  ISO_7: L_ISO_7 -> L_ISO; (-(Kr_ISO_7*L_ISO) + Kf_ISO_7*L_ISO_7)*EC;
  ISO_8: L_ISO_8 -> L_ISO; (-(Kr_ISO_8*L_ISO) + Kf_ISO_8*L_ISO_8)*EC;
  ISO_9: L_ISO_9 -> L_ISO; (-(Kr_ISO_9*L_ISO) + Kf_ISO_9*L_ISO_9)*EC;
  ISO_10: L_ISO_10 -> L_ISO; (-(Kr_ISO_10*L_ISO) + Kf_ISO_10*L_ISO_10)*EC;
  ISO_11: L_ISO_11 -> L_ISO; (-(Kr_ISO_11*L_ISO) + Kf_ISO_11*L_ISO_11)*EC;
  ISO_12: L_ISO_12 -> L_ISO; (-(Kr_ISO_12*L_ISO) + Kf_ISO_12*L_ISO_12)*EC;
  ISO_13: L_ISO_13 -> L_ISO; (-(Kr_ISO_13*L_ISO) + Kf_ISO_13*L_ISO_13)*EC;
  ISO_14: L_ISO_14 -> L_ISO; (-(Kr_ISO_14*L_ISO) + Kf_ISO_14*L_ISO_14)*EC;
  ISO_15: L_ISO_15 -> L_ISO; (-(Kr_ISO_15*L_ISO) + Kf_ISO_15*L_ISO_15)*EC;
  ISO_16: L_ISO_16 -> L_ISO; (-(Kr_ISO_16*L_ISO) + Kf_ISO_16*L_ISO_16)*EC;

  // Unit definitions:
  unit molecules = item;
  unit um3 = (1e-6 metre)^3;
  unit um2 = (1e-6 metre)^2;
  unit um = 1e-6 metre;
  unit s = second;
  unit K = kelvin;
  unit _one_ = dimensionless;
  unit C_mol_1 = coulomb / mole;
  unit C_nmol_1 = coulomb / (1e-9 mole);
  unit molecules_pmol_1 = item / (1e-12 mole);
  unit _one_000000000 = 1e9 dimensionless;
  unit mV_C_K_1_mol_1 = 1e-3 volt * coulomb / (kelvin * mole);
  unit mV_V_1 = dimensionless;
  unit uM_um3_molecules_1 = 1e-6 mole * (1e-6 metre)^3 / (litre * item);
  unit s_1 = 1 / second;
end
