// SBML level 3 version 1
// Exported by VCell 7.3

model eungdamrong_and_Iyengar_BiophysJ_compartmental()
  // model units - substance: molecules, time: s, volume: um3, area: um2, length: um, extent: molecules

  // Compartments:
  compartment EC = 1 um3;
  compartment cyt = 0.976 um3;
  compartment er = 0.012 um3;
  compartment Golgi = 0.012 um3;
  compartment PM = 0.6 um2;  // 2-D
  compartment erMembrane = 0.0456 um2;  // 2-D
  compartment GM = 0.048 um2;  // 2-D

  // Species:
  substanceOnly species RasGTP_Golgi_GM in GM = 0;
  substanceOnly species $EGF_EC in EC = 0.1005698;
  substanceOnly species CAPRI_cyt in cyt = 29.38805;
  substanceOnly species serca in erMembrane = 2;
  substanceOnly species PIP_PM in PM = 1714;
  substanceOnly species PI_PM in PM = 85714;
  substanceOnly species Shc_PM in PM = 112;
  substanceOnly species CaCAPRI_PM_PM in PM = 0;
  substanceOnly species RactCa in erMembrane = 0;
  substanceOnly species Shc_star_PM in PM = 0;
  substanceOnly species EGFR_PM in PM = 13;
  substanceOnly species PLC_act_PM in PM = 0;
  substanceOnly species RasGTP_pal_cyt in cyt = 0;
  substanceOnly species PLC_PM in PM = 60;
  substanceOnly species PIP2_PM in PM = 643;
  substanceOnly species Activated_EGFR_PM in PM = 0;
  substanceOnly species Ca in cyt = 0;
  substanceOnly species Ract in erMembrane = 0;
  substanceOnly species Rinh in erMembrane = 0;
  substanceOnly species RinhCa in erMembrane = 0;
  substanceOnly species IP3 in cyt = 0;
  substanceOnly species RasGDP_Golgi_GM in GM = 2;
  substanceOnly species Ca_RasGRP_GM_GM in GM = 0;
  substanceOnly species DAG_GM_GM in GM = 0;
  substanceOnly species RasGRP_DAG_GM in GM = 0;
  substanceOnly species CaCAPRI_cyt in cyt = 0;
  substanceOnly species DAG_PM in PM = 1200;
  substanceOnly species RasGTP_depal_cyt in cyt = 0;
  substanceOnly species RasGDP_depal_cyt in cyt = 0;
  substanceOnly species RasGDP_pal_cyt in cyt = 0;
  substanceOnly species Ca_PLCe_cyt in cyt = 0;
  substanceOnly species Ras_CaPLCe_GM in GM = 0;
  substanceOnly species $PIP2_GM_GM in GM = 12;
  substanceOnly species $ER_erMembrane in erMembrane = 0;
  substanceOnly species Ca_ER in er = 1445.314;
  substanceOnly species Sos_cyt in cyt = 79.34774;
  substanceOnly species Grb2_cyt in cyt = 490.7805;
  substanceOnly species PLCe_cyt in cyt = 11.75522;
  substanceOnly species buffer_cyt in cyt = 117.5522;
  substanceOnly species ca_buffer_cyt in cyt = 0;
  substanceOnly species SosGrb2_cyt in cyt = 96.98057;
  substanceOnly species SGS_PM in PM = 0;
  substanceOnly species RasGTP_PM in PM = 0;
  substanceOnly species RasGDP_PM in PM = 240;
  substanceOnly species RasGRP_cyt in cyt = 29.38805;
  substanceOnly species CaRasGRP1_cyt in cyt = 0;

  // Parameters:
  _T_ = 300 K;
  _PI_ = 3.141593 _one_;
  _F_ = 9.64853321e4 C_mol_1;
  _F_nmol_ = 9.64853321e-5 C_nmol_1;
  _N_pmol_ = 6.02214179e11 molecules_pmol_1;
  _K_GHK_ = 1e-9 _one_000000000;
  _R_ = 8314.463 mV_C_K_1_mol_1;
  K_millivolts_per_volt = 1000 mV_V_1;
  KMOLE = 0.001660539 uM_um3_molecules_1;
  kStimSynPIP2_PIP2_synthesis = 0.01 s_1;
  tauPIP2syn_PIP2_synthesis = 0.05 s;
  PIP2syndecay_PIP2_synthesis = 10 s;
  PIP2_basal_PIP2_synthesis = 1072 molecules_um_2;
  kBasalSynPIP2_PIP2_synthesis = 0.045 s_1;
  Rate_PIP2Synbasal_PIP2_synthesis has s_1;
  Rate_PIP2SynStim_PIP2_synthesis has s_1;
  Km_Shc_phosphorylation = 1032 molecules_um_2;
  Vmax_Shc_phosphorylation has molecules_um_2_s_1;
  Kf_Ca_bind_CAPRI = 0.0001660539 um3_s_1_molecules_1;
  Kr_Ca_bind_CAPRI = 0.5 s_1;
  IP3_basal_IP3_degradation = 0 uM;
  kIP3deg_IP3_degradation = 0.5 s_1;
  Kf_RasGTP_depal_translocate = 0.1992647 um_s_1;
  Kr_RasGTP_depal_translocate = 0.01 s_1;
  Kf_ca_bind_rasGRP = 0.0001660539 um3_s_1_molecules_1;
  Kr_ca_bind_rasGRP = 0.5 s_1;
  Km_RasGRP_DAG_GEF = 600 molecules_um_2;
  Vmax_RasGRP_DAG_GEF has molecules_um_2_s_1;
  Kf_rasGTP_pal_translocation = 0.1992647 um_s_1;
  Kr_rasGTP_pal_translocation = 0.01 s_1;
  Kf_PLCg_dephos = 0.2 s_1;
  Kr_PLCg_dephos = 0 s_1;
  Kf_basal_GAP = 0.0001 s_1;
  Kr_basal_GAP = 0 s_1;
  Kf_CAPRI_translocation = 0.1992647 um_s_1;
  Kr_CAPRI_translocation = 0.1 s_1;
  Kf_reaction5 = 0.0008302694 um3_s_1_molecules_1;
  Kr_reaction5 = 0.1 s_1;
  Kf_RasGDP_pal = 0.015 s_1;
  Kr_RasGDP_pal = 1.660539e-8 um_s_1;
  Km_CAPRI_GAP = 1200 molecules_um_2;
  Vmax_CAPRI_GAP has molecules_um_2_s_1;
  Kf_RasGDPpal_translocation = 0.1992647 um_s_1;
  Kr_RasGDPpal_translocation = 0.01 s_1;
  Kf_sos_grb2_binding = 4.151347e-5 um3_s_1_molecules_1;
  Kr_sos_grb2_binding = 0.0168 s_1;
  Kf_RasGDP_depal_translocate = 0.1992647 um_s_1;
  Kr_RasGDP_depal_translocate = 0.01 s_1;
  Kf_Ras_GTP_palm1 = 0.0015 s_1;
  Kr_Ras_GTP_palm1 = 1.660539e-8 um_s_1;
  Kf_RasPal_basal_GAP = 0.0001 s_1;
  Kr_RasPal_basal_GAP = 0 s_1;
  Kf_basal_cyt_depal_GEF = 0.0001 s_1;
  Kr_basal_cyt_depal_GEF = 0 s_1;
  kact_caPLCe_gen_DAG = 1.18 um2_molecules_1_s_1;
  Km_CaRasGRP_act_RasGM = 1200 molecules_um_2;
  Vmax_CaRasGRP_act_RasGM has molecules_um_2_s_1;
  k_PIP2hyd_PIP2_hydrolysis = 1.188 um2_molecules_1_s_1;
  Kf_Sos_activation = 0.1494485 um3_s_1_molecules_1;
  Kr_Sos_activation = 0.1 s_1;
  kBasalSynPIP_PIP_synthesis = 0.0015 s_1;
  PIP_basal_PIP_synthesis = 2857 molecules_um_2;
  tauPIPsyn_PIP_synthesis = 0.05 s;
  PIPsyndecay_PIP_synthesis = 10 s;
  kStimSynPIP_PIP_synthesis = 0.01 s_1;
  Ratestim_PIPsyn_PIP_synthesis has s_1;
  Ratebasal_PIPsyn_PIP_synthesis has s_1;
  Kf_EGF_internalization = 0.002 s_1;
  Kf_calcium_buffer = 0.08302694 um3_s_1_molecules_1;
  Kr_calcium_buffer = 10 s_1;
  Km_RasGM_basal_GAP = 600 molecules_um_2;
  Vmax_RasGM_basal_GAP = 1 molecules_um_2_s_1;
  Kf_reaction0 = 0.5 s_1;
  Kr_reaction0 = 0 s_1;
  Kf_EGFR_binding = 0.001660539 um3_s_1_molecules_1;
  Kr_EGFR_binding = 0.01 s_1;
  Kf_ca_act_PLCe = 0.004981616 um3_s_1_molecules_1;
  Kr_ca_act_PLCe = 1 s_1;
  Kf_ras_act_PLCe = 0.02490808 um3_s_1_molecules_1;
  Kr_ras_act_PLCe = 1 s_1;
  Kf_RasGDP_depal2 = 0.0001 s_1;
  Kr_RasGDP_depal2 = 0 um_s_1;
  Kf_CaRasGRP_translocation = 0.01660539 um_s_1;
  Kr_CaRasGRP_translocation = 5 s_1;
  Kon_reaction2 = 2.1 uM_1_s_1;
  dinh_reaction2 = 0.11 uM;
  Koff_reaction2 has s_1;
  Km_EGF_act_PLCgamma = 410 molecules_um_2;
  Vmax_EGF_act_PLCgamma has molecules_um_2_s_1;
  Kf_Ca_binds_IP3R = 1000 uM_1_s_1;
  dact_Ca_binds_IP3R = 0.2 s_1;
  Kr_Ca_binds_IP3R has s_1;
  Kf_reaction7 = 0.25 s_1;
  Km_Sos_act_RasPM = 600 molecules_um_2;
  Vmax_Sos_act_RasPM has molecules_um_2_s_1;
  kP_flux1 = 0.27;
  vP_flux1 = 0.0664 _one__0E_33_m2_mol_item_2_s_1;
  singleChanFlux_flux0 = 4.69 _one__0E_30_m5_item_2_s_1;
  dI_flux0 = 0.8 uM;
  vL_flux2 = 3.16e-5 um3_molecules_1_s_1;
  Kf_Ras_PM_depal1 = 0.0001 s_1;
  Kr_Ras_PM_depal1 = 0 um_s_1;

  // Assignment rules:
  Rate_PIP2Synbasal_PIP2_synthesis := 0.581*(PIP2_PM < PIP2_basal_PIP2_synthesis)*kBasalSynPIP2_PIP2_synthesis*(-1 + exp((PIP2_basal_PIP2_synthesis - PIP2_PM)/PIP2_basal_PIP2_synthesis));
  Rate_PIP2SynStim_PIP2_synthesis := kStimSynPIP2_PIP2_synthesis*exp(-((t - tauPIP2syn_PIP2_synthesis)/PIP2syndecay_PIP2_synthesis))*(t > tauPIP2syn_PIP2_synthesis);
  Vmax_Shc_phosphorylation := 0.2*Activated_EGFR_PM;
  Vmax_RasGRP_DAG_GEF := 0.05*RasGRP_DAG_GM;
  Vmax_CAPRI_GAP := 10*CaCAPRI_PM_PM;
  Vmax_CaRasGRP_act_RasGM := 0.01*Ca_RasGRP_GM_GM;
  Ratestim_PIPsyn_PIP_synthesis := kStimSynPIP_PIP_synthesis*exp(-((t - tauPIPsyn_PIP_synthesis)/PIPsyndecay_PIP_synthesis))*(t > tauPIPsyn_PIP_synthesis);
  Ratebasal_PIPsyn_PIP_synthesis := 0.581*(PIP_PM < PIP_basal_PIP_synthesis)*kBasalSynPIP_PIP_synthesis*(-1 + exp((PIP_basal_PIP_synthesis - PIP_PM)/PIP_basal_PIP_synthesis));
  Koff_reaction2 := dinh_reaction2*Kon_reaction2;
  Vmax_EGF_act_PLCgamma := 0.3*Activated_EGFR_PM;
  Kr_Ca_binds_IP3R := 1000*dact_Ca_binds_IP3R;
  Vmax_Sos_act_RasPM := 0.02*SGS_PM;

  // Reactions:
  PIP2_synthesis: PIP_PM -> PIP2_PM; (PIP_PM*Rate_PIP2SynStim_PIP2_synthesis + PIP_PM*Rate_PIP2Synbasal_PIP2_synthesis)*PM;
    PIP2_synthesis_I = 0 pA_um_2; PIP2_synthesis_netValence = 1 _one_;
  Shc_phosphorylation: Shc_PM -> Shc_star_PM; Shc_PM*Vmax_Shc_phosphorylation/(Km_Shc_phosphorylation + Shc_PM)*PM;  // modifiers: Activated_EGFR_PM
    Shc_phosphorylation_I = 0 pA_um_2; Shc_phosphorylation_netValence = 1 _one_;
  Ca_bind_CAPRI: Ca + CAPRI_cyt -> CaCAPRI_cyt; (CAPRI_cyt*Ca*Kf_Ca_bind_CAPRI - CaCAPRI_cyt*Kr_Ca_bind_CAPRI)*cyt;
  IP3_degradation: IP3 -> ; (IP3*kIP3deg_IP3_degradation - 602.214179*IP3_basal_IP3_degradation*kIP3deg_IP3_degradation)*cyt;
  RasGTP_depal_translocate: RasGTP_depal_cyt -> RasGTP_Golgi_GM; (-(RasGTP_Golgi_GM*Kr_RasGTP_depal_translocate) + Kf_RasGTP_depal_translocate*RasGTP_depal_cyt)*GM;
    RasGTP_depal_translocate_I = 0 pA_um_2; RasGTP_depal_translocate_netValence = 1 _one_;
  ca_bind_rasGRP: Ca + RasGRP_cyt -> CaRasGRP1_cyt; (-(CaRasGRP1_cyt*Kr_ca_bind_rasGRP) + Ca*Kf_ca_bind_rasGRP*RasGRP_cyt)*cyt;
  RasGRP_DAG_GEF: RasGDP_Golgi_GM -> RasGTP_Golgi_GM; RasGDP_Golgi_GM*Vmax_RasGRP_DAG_GEF/(Km_RasGRP_DAG_GEF + RasGDP_Golgi_GM)*GM;  // modifiers: RasGRP_DAG_GM
    RasGRP_DAG_GEF_I = 0 pA_um_2; RasGRP_DAG_GEF_netValence = 1 _one_;
  rasGTP_pal_translocation: RasGTP_pal_cyt -> RasGTP_PM; (-(RasGTP_PM*Kr_rasGTP_pal_translocation) + Kf_rasGTP_pal_translocation*RasGTP_pal_cyt)*PM;
    rasGTP_pal_translocation_I = 0 pA_um_2; rasGTP_pal_translocation_netValence = 1 _one_;
  PLCg_dephos: PLC_act_PM -> PLC_PM; (-(PLC_PM*Kr_PLCg_dephos) + Kf_PLCg_dephos*PLC_act_PM)*PM;
    PLCg_dephos_I = 0 pA_um_2; PLCg_dephos_netValence = 1 _one_;
  basal_GAP: RasGTP_PM -> RasGDP_PM; (-(RasGDP_PM*Kr_basal_GAP) + Kf_basal_GAP*RasGTP_PM)*PM;
    basal_GAP_I = 0 pA_um_2; basal_GAP_netValence = 1 _one_;
  CAPRI_translocation: CaCAPRI_cyt -> CaCAPRI_PM_PM; (CaCAPRI_cyt*Kf_CAPRI_translocation - CaCAPRI_PM_PM*Kr_CAPRI_translocation)*PM;
    CAPRI_translocation_I = 0 pA_um_2; CAPRI_translocation_netValence = 1 _one_;
  reaction5: DAG_GM_GM + RasGRP_cyt -> RasGRP_DAG_GM; (-(RasGRP_DAG_GM*Kr_reaction5) + DAG_GM_GM*Kf_reaction5*RasGRP_cyt)*GM;
    reaction5_I = 0 pA_um_2; reaction5_netValence = 1 _one_;
  RasGDP_pal: RasGDP_Golgi_GM -> RasGDP_pal_cyt; (Kf_RasGDP_pal*RasGDP_Golgi_GM - Kr_RasGDP_pal*RasGDP_pal_cyt)*GM;
    RasGDP_pal_I = 0 pA_um_2; RasGDP_pal_netValence = 1 _one_;
  CAPRI_GAP: RasGTP_PM -> RasGDP_PM; RasGTP_PM*Vmax_CAPRI_GAP/(Km_CAPRI_GAP + RasGTP_PM)*PM;  // modifiers: CaCAPRI_PM_PM
    CAPRI_GAP_I = 0 pA_um_2; CAPRI_GAP_netValence = 1 _one_;
  RasGDPpal_translocation: RasGDP_pal_cyt -> RasGDP_PM; (-(RasGDP_PM*Kr_RasGDPpal_translocation) + Kf_RasGDPpal_translocation*RasGDP_pal_cyt)*PM;
    RasGDPpal_translocation_I = 0 pA_um_2; RasGDPpal_translocation_netValence = 1 _one_;
  sos_grb2_binding: Sos_cyt + Grb2_cyt -> SosGrb2_cyt; (-(Kr_sos_grb2_binding*SosGrb2_cyt) + Grb2_cyt*Kf_sos_grb2_binding*Sos_cyt)*cyt;
  RasGDP_depal_translocate: RasGDP_depal_cyt -> RasGDP_Golgi_GM; (-(RasGDP_Golgi_GM*Kr_RasGDP_depal_translocate) + Kf_RasGDP_depal_translocate*RasGDP_depal_cyt)*GM;
    RasGDP_depal_translocate_I = 0 pA_um_2; RasGDP_depal_translocate_netValence = 1 _one_;
  Ras_GTP_palm1: RasGTP_Golgi_GM -> RasGTP_pal_cyt; (Kf_Ras_GTP_palm1*RasGTP_Golgi_GM - Kr_Ras_GTP_palm1*RasGTP_pal_cyt)*GM;
    Ras_GTP_palm1_I = 0 pA_um_2; Ras_GTP_palm1_netValence = 1 _one_;
  RasPal_basal_GAP: RasGTP_pal_cyt -> RasGDP_pal_cyt; (-(Kr_RasPal_basal_GAP*RasGDP_pal_cyt) + Kf_RasPal_basal_GAP*RasGTP_pal_cyt)*cyt;
  basal_cyt_depal_GEF: RasGTP_depal_cyt -> RasGDP_depal_cyt; (-(Kr_basal_cyt_depal_GEF*RasGDP_depal_cyt) + Kf_basal_cyt_depal_GEF*RasGTP_depal_cyt)*cyt;
  caPLCe_gen_DAG: $PIP2_GM_GM -> DAG_GM_GM + IP3; PIP2_GM_GM*Ras_CaPLCe_GM*kact_caPLCe_gen_DAG*GM;  // modifiers: Ras_CaPLCe_GM
    caPLCe_gen_DAG_I = 0 pA_um_2; caPLCe_gen_DAG_netValence = 1 _one_;
  CaRasGRP_act_RasGM: RasGDP_Golgi_GM -> RasGTP_Golgi_GM; RasGDP_Golgi_GM*Vmax_CaRasGRP_act_RasGM/(Km_CaRasGRP_act_RasGM + RasGDP_Golgi_GM)*GM;  // modifiers: Ca_RasGRP_GM_GM
    CaRasGRP_act_RasGM_I = 0 pA_um_2; CaRasGRP_act_RasGM_netValence = 1 _one_;
  PIP2_hydrolysis: PIP2_PM -> DAG_PM + IP3; PIP2_PM*PLC_act_PM*k_PIP2hyd_PIP2_hydrolysis*PM;  // modifiers: PLC_act_PM
    PIP2_hydrolysis_I = 0 pA_um_2; PIP2_hydrolysis_netValence = 1 _one_;
  Sos_activation: SosGrb2_cyt + Shc_star_PM -> SGS_PM; (-(SGS_PM*Kr_Sos_activation) + Kf_Sos_activation*Shc_star_PM*SosGrb2_cyt)*PM;
    Sos_activation_I = 0 pA_um_2; Sos_activation_netValence = 1 _one_;
  PIP_synthesis: PI_PM -> PIP_PM; (PI_PM*Ratebasal_PIPsyn_PIP_synthesis + PI_PM*Ratestim_PIPsyn_PIP_synthesis)*PM;
    PIP_synthesis_I = 0 pA_um_2; PIP_synthesis_netValence = 1 _one_;
  EGF_internalization: Activated_EGFR_PM -> ; Activated_EGFR_PM*Kf_EGF_internalization*PM;
    EGF_internalization_I = 0 pA_um_2; EGF_internalization_netValence = 1 _one_; EGF_internalization_Kr = 0 molecules_um_2_s_1;
  calcium_buffer: buffer_cyt + Ca -> ca_buffer_cyt; (Ca*Kf_calcium_buffer*buffer_cyt - Kr_calcium_buffer*ca_buffer_cyt)*cyt;
  RasGM_basal_GAP: RasGTP_Golgi_GM -> RasGDP_Golgi_GM; RasGTP_Golgi_GM*Vmax_RasGM_basal_GAP/(Km_RasGM_basal_GAP + RasGTP_Golgi_GM)*GM;
    RasGM_basal_GAP_I = 0 pA_um_2; RasGM_basal_GAP_netValence = 1 _one_;
  reaction0: Shc_star_PM -> Shc_PM; (-(Shc_PM*Kr_reaction0) + Kf_reaction0*Shc_star_PM)*PM;
    reaction0_I = 0 pA_um_2; reaction0_netValence = 1 _one_;
  EGFR_binding: $EGF_EC + EGFR_PM -> Activated_EGFR_PM; (EGFR_PM*EGF_EC*Kf_EGFR_binding - Activated_EGFR_PM*Kr_EGFR_binding)*PM;
    EGFR_binding_I = 0 pA_um_2; EGFR_binding_netValence = 1 _one_;
  ca_act_PLCe: Ca + PLCe_cyt -> Ca_PLCe_cyt; (-(Ca_PLCe_cyt*Kr_ca_act_PLCe) + Ca*Kf_ca_act_PLCe*PLCe_cyt)*cyt;
  ras_act_PLCe: RasGTP_Golgi_GM + Ca_PLCe_cyt -> Ras_CaPLCe_GM; (Ca_PLCe_cyt*Kf_ras_act_PLCe*RasGTP_Golgi_GM - Kr_ras_act_PLCe*Ras_CaPLCe_GM)*GM;
    ras_act_PLCe_I = 0 pA_um_2; ras_act_PLCe_netValence = 1 _one_;
  RasGDP_depal2: RasGDP_PM -> RasGDP_depal_cyt; (Kf_RasGDP_depal2*RasGDP_PM - Kr_RasGDP_depal2*RasGDP_depal_cyt)*PM;
    RasGDP_depal2_I = 0 pA_um_2; RasGDP_depal2_netValence = 1 _one_;
  CaRasGRP_translocation: CaRasGRP1_cyt -> Ca_RasGRP_GM_GM; (CaRasGRP1_cyt*Kf_CaRasGRP_translocation - Ca_RasGRP_GM_GM*Kr_CaRasGRP_translocation)*GM;
    CaRasGRP_translocation_I = 0 pA_um_2; CaRasGRP_translocation_netValence = 1 _one_;
  reaction2: Rinh + Ca -> RinhCa; (0.001660539*Ca*Kon_reaction2*Rinh - Koff_reaction2*RinhCa)*erMembrane;
    reaction2_I = 0 pA_um_2; reaction2_netValence = 1 _one_;
  EGF_act_PLCgamma: PLC_PM -> PLC_act_PM; PLC_PM*Vmax_EGF_act_PLCgamma/(Km_EGF_act_PLCgamma + PLC_PM)*PM;  // modifiers: Activated_EGFR_PM
    EGF_act_PLCgamma_I = 0 pA_um_2; EGF_act_PLCgamma_netValence = 1 _one_;
  Ca_binds_IP3R: Ract + Ca -> RactCa; (0.001660539*Ca*Kf_Ca_binds_IP3R*Ract - Kr_Ca_binds_IP3R*RactCa)*erMembrane;
    Ca_binds_IP3R_I = 0 pA_um_2; Ca_binds_IP3R_netValence = 1 _one_;
  reaction7: DAG_GM_GM -> ; DAG_GM_GM*Kf_reaction7*GM;
    reaction7_I = 0 pA_um_2; reaction7_netValence = 1 _one_; reaction7_Kr = 0 molecules_um_2_s_1;
  Sos_act_RasPM: RasGDP_PM -> RasGTP_PM; RasGDP_PM*Vmax_Sos_act_RasPM/(Km_Sos_act_RasPM + RasGDP_PM)*PM;  // modifiers: SGS_PM
    Sos_act_RasPM_I = 0 pA_um_2; Sos_act_RasPM_netValence = 1 _one_;
  flux1: Ca -> Ca_ER; 0.001660539*Ca^2*ER_erMembrane*serca*vP_flux1/(2.757389e-6*Ca^2 + kP_flux1^2)*erMembrane;  // modifiers: ER_erMembrane, serca
    flux1_I = 0 pA_um_2; flux1_netValence = 1 _one_;
  flux0: Ca -> Ca_ER; (0.25*Ca*ER_erMembrane*Ract*singleChanFlux_flux0*(0.001660539*IP3*RactCa*Rinh/(0.001660539*IP3*Ract*Rinh + 0.001660539*IP3*RactCa*Rinh + 0.001660539*IP3*Ract*RinhCa + 0.001660539*IP3*RactCa*RinhCa + Ract*Rinh*dI_flux0 + RactCa*Rinh*dI_flux0 + Ract*RinhCa*dI_flux0 + RactCa*RinhCa*dI_flux0))^3 - 0.25*Ca_ER*ER_erMembrane*Ract*singleChanFlux_flux0*(0.001660539*IP3*RactCa*Rinh/(0.001660539*IP3*Ract*Rinh + 0.001660539*IP3*RactCa*Rinh + 0.001660539*IP3*Ract*RinhCa + 0.001660539*IP3*RactCa*RinhCa + Ract*Rinh*dI_flux0 + RactCa*Rinh*dI_flux0 + Ract*RinhCa*dI_flux0 + RactCa*RinhCa*dI_flux0))^3 + 0.25*Ca*ER_erMembrane*RactCa*singleChanFlux_flux0*(0.001660539*IP3*RactCa*Rinh/(0.001660539*IP3*Ract*Rinh + 0.001660539*IP3*RactCa*Rinh + 0.001660539*IP3*Ract*RinhCa + 0.001660539*IP3*RactCa*RinhCa + Ract*Rinh*dI_flux0 + RactCa*Rinh*dI_flux0 + Ract*RinhCa*dI_flux0 + RactCa*RinhCa*dI_flux0))^3 - 0.25*Ca_ER*ER_erMembrane*RactCa*singleChanFlux_flux0*(0.001660539*IP3*RactCa*Rinh/(0.001660539*IP3*Ract*Rinh + 0.001660539*IP3*RactCa*Rinh + 0.001660539*IP3*Ract*RinhCa + 0.001660539*IP3*RactCa*RinhCa + Ract*Rinh*dI_flux0 + RactCa*Rinh*dI_flux0 + Ract*RinhCa*dI_flux0 + RactCa*RinhCa*dI_flux0))^3)*erMembrane;  // modifiers: ER_erMembrane, RactCa, Ract, IP3, Rinh, RinhCa
    flux0_I = 0 pA_um_2; flux0_netValence = 1 _one_;
  flux2: Ca -> Ca_ER; (Ca*ER_erMembrane*vL_flux2 - Ca_ER*ER_erMembrane*vL_flux2)*erMembrane;  // modifiers: ER_erMembrane
    flux2_I = 0 pA_um_2; flux2_netValence = 1 _one_;
  Ras_PM_depal1: RasGTP_PM -> RasGTP_depal_cyt; (Kf_Ras_PM_depal1*RasGTP_PM - Kr_Ras_PM_depal1*RasGTP_depal_cyt)*PM;
    Ras_PM_depal1_I = 0 pA_um_2; Ras_PM_depal1_netValence = 1 _one_;

  // Unit definitions:
  unit molecules = item;
  unit um3 = (1e-6 metre)^3;
  unit um2 = (1e-6 metre)^2;
  unit um = 1e-6 metre;
  unit s = second;
  unit K = kelvin;
  unit _one_ = dimensionless;
  unit C_mol_1 = coulomb / mole;
  unit C_nmol_1 = coulomb / (1e-9 mole);
  unit molecules_pmol_1 = item / (1e-12 mole);
  unit _one_000000000 = 1e9 dimensionless;
  unit mV_C_K_1_mol_1 = 1e-3 volt * coulomb / (kelvin * mole);
  unit mV_V_1 = dimensionless;
  unit uM_um3_molecules_1 = 1e-6 mole * (1e-6 metre)^3 / (litre * item);
  unit pA_um_2 = 1e-12 ampere / (1e-6 metre)^2;
  unit s_1 = 1 / second;
  unit molecules_um_2 = item / (1e-6 metre)^2;
  unit molecules_um_2_s_1 = item / ((1e-6 metre)^2 * second);
  unit um3_s_1_molecules_1 = (1e-6 metre)^3 / (second * item);
  unit uM = 1e-6 mole / litre;
  unit um_s_1 = 1e-6 metre / second;
  unit um2_molecules_1_s_1 = (1e-6 metre)^2 / (item * second);
  unit uM_1_s_1 = litre / (1e-6 mole * second);
  unit _one__0E_33_m2_mol_item_2_s_1 = (1e-33 metre)^2 * mole / (item^2 * second);
  unit _one__0E_30_m5_item_2_s_1 = (1e-30 metre)^5 / (item^2 * second);
  unit um3_molecules_1_s_1 = (1e-6 metre)^3 / (item * second);
end
