// SBML level 3 version 1
// Exported by VCell 7.3

model Scott_Fraley_Rangamani_YAP_TAZ_model_2021_Rho_and_FAK_confined_simulations__true_2D__Compartmental_model()
  // Scott_Fraley_Rangamani_YAP_TAZ_model_2021(Rho and FAK confined simulations (true 2D)_Compartmental model
  // model units - substance: molecules, time: s, volume: um3, area: um2, length: um, extent: molecules

  // Compartments:
  compartment Cyto = 2300 um3;
  compartment Nuc = 550 um3;
  compartment ECM = 1704.795 um3;
  compartment NM = 393;  // 2-D
  compartment PM = 1260;  // 2-D

  // Species:
  substanceOnly species RhoAGTP_MEM in PM = 42336;
  substanceOnly species Fakp in Cyto = 415527.8;
  substanceOnly species RhoAGDP in Cyto = 1385093;
  substanceOnly species Fak in Cyto = 969564.8;
  substanceOnly species ROCKA in Cyto = 0;
  substanceOnly species ROCK in Cyto = 1385093;
  substanceOnly species mDia in Cyto = 1108074;
  substanceOnly species mDiaA in Cyto = 0;
  substanceOnly species Myo in Cyto = 4847824;
  substanceOnly species MyoA in Cyto = 2077639;
  substanceOnly species LIMK in Cyto = 2631676;
  substanceOnly species CofilinP in Cyto = 277018.5;
  substanceOnly species LIMKA in Cyto = 138509.3;
  substanceOnly species CofilinNP in Cyto = 2493167;
  substanceOnly species Fcyto in Cyto = 2.479316e7;
  substanceOnly species Gactin in Cyto = 6.681687e8;
  substanceOnly species YAPTAZP in Cyto = 277018.5;
  substanceOnly species YAPTAZN in Cyto = 969564.8;
  substanceOnly species YAPTAZnuc in Nuc = 231852.5;
  substanceOnly species Positionboolean in PM = 1260;
  substanceOnly species NPCA in NM = 0;
  substanceOnly species NPC in NM = 2555;
  substanceOnly species LaminA in NM = 0;
  substanceOnly species LaminAp in NM = 1375500;

  // Parameters:
  ksf = 0.379 s_1;
  C = 3.25 kPa;
  Emol = 25 kPa;
  kdf = 0.035 s_1;
  kfkp has s_1;
  gamma = 77.56 uM_5;
  kdp = 0.625 s_1;
  krp = 0.648 uM_1_s_1;
  alpha = 50 uM_1;
  epsilon = 36 uM_1;
  kdep = 3.5 s_1;
  kdl = 2 s_1;
  kdmdia = 0.005 s_1;
  kdmy = 0.067 s_1;
  kdrock = 0.8 s_1;
  kfc1 = 4 uM_1_s_1;
  k11 = 16 uM_1;
  kmp = 0.002 uM_1_s_1;
  kra = 0.4 s_1;
  tau = 55.49 uM_1;
  kly = 120 uM_1_s_1;
  kmr = 0.03 s_1;
  kturnover = 0.04 s_1;
  ROCKB = 0.3 uM;
  mDiaB = 0.165 uM;
  klr = 0.07 s_1;
  kCN = 0.56 s_1;
  kCY = 0.00076 uM_2_s_1;
  kNC = 0.14 s_1;
  kll = 16 uM_1;
  unitconversionfactor = 602.2 molecules_um_3_uM_1;
  kf = 0.015 s_1;
  SAV = 1.8 um;
  kfNPC = 2.8e-7 um2_s_1_uM_2_molecules_1;
  krNPC = 8.7 s_1;
  Clamin = 100 kPa;
  _T_ = 300 K;
  _PI_ = 3.141593 _one_;
  _F_ = 9.64853321e4 C_mol_1;
  _F_nmol_ = 9.64853321e-5 C_nmol_1;
  _N_pmol_ = 6.02214179e11 molecules_pmol_1;
  _K_GHK_ = 1e-9 _one_000000000;
  _R_ = 8314.463 mV_C_K_1_mol_1;
  K_millivolts_per_volt = 1000 mV_V_1;
  KMOLE = 0.001660539 uM_um3_molecules_1;
  Kr_r3 = 0 um_s_1;
  Kf_r3 has s_1;
  Kr_r4 = 0 um_s_1;
  Kf_r4 has um_s_1;
  Kr_r5 = 0 um_s_1;
  Kf_r5 has um_s_1;
  Kr_r6 = 0 s_1;
  Kf_r6 has s_1;
  Kf_r8 has s_1;
  Kr_r8 has s_1;
  Kf_r9 has s_1;
  Kr_r9 has s_1;
  kcatcof_r10 = 0.34 s_1_uM_1;
  kmCof_r10 = 4 uM;
  Kf_r10 has s_1;
  Kr_r10 has s_1;
  Kf_r11 has s_1;
  Kr_r11 has s_1;
  Kr_r7 = 0 s_1;
  Kf_r7 has s_1;
  Kf_r13 has s_1;
  Kr_r13 has s_1;
  Kr_r12 = 0 um_s_1;
  Kf_r12 has um_s_1;
  Kr_r0 = 0 s_1;
  Kf_r0 has s_1;
  Kr_r1 = 0 s_1;
  n2_r1 = 5 _one_;
  Kf_r1 has um_s_1;
  Kr_r2 = 0 s_1;
  Kf_r2 has s_1;
  Kf_r14 has s_1;
  Kr_r14 has s_1;
  Kr_r15 = 0.001 s_1;
  kflaminA_r15 = 0.46 s_1;
  p_r15 = 9e-6;
  Kf_r15 has s_1;
  Ecytosol_r15 has _one_;
  kin2_r16 = 10 s_1_uM_1;
  kinSolo2_r16 = 1 molecules_um_2_s_1_uM_1;
  kout2_r16 = 1 molecules_um_2_s_1_uM_1;
  Kf_r16 has um_s_1;
  Kr_r16 has um_s_1;

  // Assignment rules:
  kfkp := 0.0168*Positionboolean;
  Kf_r3 := kdp;
  Kf_r4 := 0.001660539*krp*RhoAGTP_MEM;
  Kf_r5 := 0.001660539*kmp*RhoAGTP_MEM;
  Kf_r6 := kdrock;
  Kf_r8 := klr*(1 + 8.302694e-4*tau*(1 + tanh(20*(0.001660539*ROCKA - ROCKB)))*ROCKA);
  Kr_r8 := kdl;
  Kf_r9 := kmr*(1 + 8.302694e-4*epsilon*(1 + tanh(20*(0.001660539*ROCKA - ROCKB)))*ROCKA);
  Kr_r9 := kdmy;
  Kf_r10 := kturnover;
  Kr_r10 := 0.001660539*kcatcof_r10*LIMKA/(kmCof_r10 + 0.001660539*CofilinNP);
  Kf_r11 := kra*(1 + 8.302694e-4*alpha*(1 + tanh(20*(0.001660539*mDiaA - mDiaB)))*mDiaA);
  Kr_r11 := kdep + 0.001660539*kfc1*CofilinNP;
  Kf_r7 := kdmdia;
  Kf_r13 := kCN + 2.757389e-6*kCY*MyoA*Fcyto;
  Kr_r13 := kNC;
  Kf_r12 := 0.001660539*ksf*Emol*unitconversionfactor*SAV*Positionboolean/(C + Emol);
  Kf_r0 := kdf;
  Kf_r1 := 0.001660539*kfkp*(1 + gamma*(0.001660539*Fakp)^n2_r1)*unitconversionfactor*SAV*Positionboolean;
  Kf_r2 := kf;
  Kf_r14 := 2.757389e-6*kfNPC*MyoA*Fcyto*LaminA;
  Kr_r14 := krNPC;
  Kf_r15 := kflaminA_r15*Ecytosol_r15/(Clamin + Ecytosol_r15);
  Ecytosol_r15 := p_r15*(0.001660539*Fcyto)^2.6;
  Kf_r16 := 0.001660539*(kin2_r16*NPCA + kinSolo2_r16);
  Kr_r16 := 0.001660539*kout2_r16;

  // Reactions:
  r3: RhoAGTP_MEM -> RhoAGDP; (-(RhoAGDP*Kr_r3) + Kf_r3*RhoAGTP_MEM)*PM;
    r3_I = 0 pA_um_2; r3_netValence = 1 _one_;
  r4: ROCK -> ROCKA; (Kf_r4*ROCK - Kr_r4*ROCKA)*PM;  // modifiers: RhoAGTP_MEM
    r4_I = 0 pA_um_2; r4_netValence = 1 _one_;
  r5: mDia -> mDiaA; (Kf_r5*mDia - Kr_r5*mDiaA)*PM;  // modifiers: RhoAGTP_MEM
    r5_I = 0 pA_um_2; r5_netValence = 1 _one_;
  r6: ROCKA -> ROCK; (-(Kr_r6*ROCK) + Kf_r6*ROCKA)*Cyto;
  r8: LIMK -> LIMKA; (Kf_r8*LIMK - Kr_r8*LIMKA)*Cyto;  // modifiers: ROCKA
  r9: Myo -> MyoA; (Kf_r9*Myo - Kr_r9*MyoA)*Cyto;  // modifiers: ROCKA
  r10: CofilinP -> CofilinNP; (CofilinP*Kf_r10 - CofilinNP*Kr_r10)*Cyto;  // modifiers: LIMKA
  r11: Gactin -> Fcyto; (Gactin*Kf_r11 - Fcyto*Kr_r11)*Cyto;  // modifiers: mDiaA, CofilinNP
  r7: mDiaA -> mDia; (-(Kr_r7*mDia) + Kf_r7*mDiaA)*Cyto;
  r13: YAPTAZP -> YAPTAZN; (-(Kr_r13*YAPTAZN) + Kf_r13*YAPTAZP)*Cyto;  // modifiers: MyoA, Fcyto
  r12: Fak -> Fakp; (Fak*Kf_r12 - Fakp*Kr_r12)*PM;  // modifiers: Positionboolean
    r12_I = 0 pA_um_2; r12_netValence = 1 _one_;
  r0: Fakp -> Fak; (Fakp*Kf_r0 - Fak*Kr_r0)*Cyto;
  r1: RhoAGDP -> RhoAGTP_MEM; (Kf_r1*RhoAGDP - Kr_r1*RhoAGTP_MEM)*PM;  // modifiers: Fakp, Positionboolean
    r1_I = 0 pA_um_2; r1_netValence = 1 _one_;
  r2: Fak -> Fakp; (Fak*Kf_r2 - Fakp*Kr_r2)*Cyto;
  r14: NPC -> NPCA; (Kf_r14*NPC - Kr_r14*NPCA)*NM;  // modifiers: MyoA, Fcyto, LaminA
    r14_I = 0 pA_um_2; r14_netValence = 1 _one_;
  r15: LaminAp -> LaminA; (-(LaminA*Kr_r15) + Kf_r15*LaminAp)*NM;  // modifiers: Fcyto
    r15_I = 0 pA_um_2; r15_netValence = 1 _one_;
  r16: YAPTAZN -> YAPTAZnuc; (Kf_r16*YAPTAZN - Kr_r16*YAPTAZnuc)*NM;  // modifiers: NPCA
    r16_I = 0 pA_um_2; r16_netValence = 1 _one_;

  // Unit definitions:
  unit molecules = item;
  unit um3 = (1e-6 metre)^3;
  unit um2 = (1e-6 metre)^2;
  unit um = 1e-6 metre;
  unit s = second;
  unit s_1 = 1 / second;
  unit kPa = 1000 pascal;
  unit uM_5 = litre^5 / (1e-6 mole)^5;
  unit uM_1_s_1 = litre / (1e-6 mole * second);
  unit uM_1 = litre / (1e-6 mole);
  unit uM = 1e-6 mole / litre;
  unit uM_2_s_1 = litre^2 / ((1e-6 mole)^2 * second);
  unit molecules_um_3_uM_1 = item * litre / ((1e-6 metre)^3 * 1e-6 mole);
  unit um2_s_1_uM_2_molecules_1 = (1e-6 metre)^2 * litre^2 / (second * (1e-6 mole)^2 * item);
  unit K = kelvin;
  unit _one_ = dimensionless;
  unit C_mol_1 = coulomb / mole;
  unit C_nmol_1 = coulomb / (1e-9 mole);
  unit molecules_pmol_1 = item / (1e-12 mole);
  unit _one_000000000 = 1e9 dimensionless;
  unit mV_C_K_1_mol_1 = 1e-3 volt * coulomb / (kelvin * mole);
  unit mV_V_1 = dimensionless;
  unit uM_um3_molecules_1 = 1e-6 mole * (1e-6 metre)^3 / (litre * item);
  unit pA_um_2 = 1e-12 ampere / (1e-6 metre)^2;
  unit um_s_1 = 1e-6 metre / second;
  unit s_1_uM_1 = litre / (second * 1e-6 mole);
  unit molecules_um_2_s_1_uM_1 = item * litre / ((1e-6 metre)^2 * second * 1e-6 mole);
end
