// SBML level 3 version 1
// Exported by VCell 7.3

model pyroseq_fin_pyro_nonspacial()
  // model units - substance: molecules, time: s, volume: um3, area: um2, length: um, extent: molecules

  // Compartments:
  compartment unnamed = 1 um3;
  compartment main = 0.25 um3;
  compartment frame = 0.25 um2;  // 2-D

  // Species:
  substanceOnly species PPi_main in main = 0;
  substanceOnly species KFp_DNAnp1_PPi_main in main = 0;
  substanceOnly species DNAnp1_main in main = 0;
  substanceOnly species DNA_main in main = 3.011071;
  substanceOnly species KF_DNA_main in main = 0;
  substanceOnly species KF_DNA_dNTP_main in main = 0;
  substanceOnly species dNTP_main in main = 301.1071;
  substanceOnly species KFp_DNA_dNTP_main in main = 0;
  substanceOnly species KF_DNAnp1_PPi_main in main = 0;
  substanceOnly species Sulfurylase_main in main = 12.81211;
  substanceOnly species PPi_Sulf_main in main = 0;
  substanceOnly species KF_DNAnp1_main in main = 0;
  substanceOnly species ATP_main in main = 0;
  substanceOnly species Luciferin_main in main = 53295.95;
  substanceOnly species Luciferase_main in main = 49.53212;
  substanceOnly species ATP_Luci_main in main = 0;
  substanceOnly species Luciferin_Luci_main in main = 0;
  substanceOnly species ATP_Luciferin_Luci_main in main = 0;
  substanceOnly species EP1_main in main = 0;
  substanceOnly species EP_main in main = 0;
  substanceOnly species photon_main in main = 0;
  substanceOnly species P_main in main = 0;
  substanceOnly species Apyrase_main in main = 15.35646;
  substanceOnly species KF_main in main = 30.11071;
  substanceOnly species Apyr_dNTP_main in main = 0;
  substanceOnly species Apyr_ATP_main in main = 0;
  substanceOnly species Luci_X_main in main = 0;
  substanceOnly species Luci_Luci_X_main in main = 0;
  substanceOnly species ATP_Luci_X_main in main = 0;
  substanceOnly species ATP_Luci_Luci_X_main in main = 0;
  substanceOnly species EP_X_main in main = 0;
  substanceOnly species Apy_AMP_2Pi_main in main = 0;
  substanceOnly species Pi_main in main = 0;
  substanceOnly species AMP_main in main = 0;

  // Parameters:
  _T_ = 300 K;
  _PI_ = 3.141593 _one_;
  _F_ = 9.64853321e4 C_mol_1;
  _F_nmol_ = 9.64853321e-5 C_nmol_1;
  _N_pmol_ = 6.02214179e11 molecules_pmol_1;
  _K_GHK_ = 1e-9 _one_000000000;
  _R_ = 8314.463 mV_C_K_1_mol_1;
  K_millivolts_per_volt = 1000 mV_V_1;
  KMOLE = 0.001660539 uM_um3_molecules_1;
  Kf_reaction16_reaction16 = 0.01453088 um3_s_1_molecules_1;
  Kr_reaction16_reaction16 = 3600 s_1;
  Kf_reaction18_reaction18 = 400 s_1;
  Kr_reaction18_reaction18 = 0 s_1;
  Kf_reaction19_reaction19 = 0.005534576 um3_s_1_molecules_1;
  Kr_reaction19_reaction19 = 0 s_1;
  Kf_reaction21_reaction21 = 2.6e-5 s_1;
  Kr_reaction21_reaction21 = 0 s_1;
  Kf_reaction17_reaction17 = 4800 s_1;
  Kr_reaction17_reaction17 = 50 s_1;
  Kf_reaction4_reaction4 = 15 s_1;
  Kr_reaction4_reaction4 = 15 s_1;
  Kf_reaction5_reaction5 = 1150 s_1;
  Kr_reaction5_reaction5 = 0.008302694 um3_s_1_molecules_1;
  Kf_reaction6_reaction6 = 0.06 s_1;
  Kr_reaction6_reaction6 = 0.01992647 um3_s_1_molecules_1;
  Kf_reaction8_reaction8 = 30.7648 s_1;
  Kr_reaction8_reaction8 = 0.04164631 um3_s_1_molecules_1;
  Kf_reaction2_reaction2 = 50 s_1;
  Kr_reaction2_reaction2 = 3 s_1;
  Kf_reaction25_reaction25 = 600 s_1;
  Kr_reaction25_reaction25 = 0 um6_s_1_molecules_2;
  Kf_reaction15_reaction15 = 0.1 s_1;
  Kr_reaction15_reaction15 = 0.001660539 um3_s_1_molecules_1;
  Kf_reaction20_reaction20 = 2.6e-5 s_1;
  Kr_reaction20_reaction20 = 0 s_1;
  Kf_reaction22_reaction22 = 2.6e-5 s_1;
  Kr_reaction22_reaction22 = 0 s_1;
  Kf_reaction24_reaction24 = 0.0003 s_1;
  Kr_reaction24_reaction24 = 0 s_1;
  Kf_reaction1_reaction1 = 0.01660539 um3_s_1_molecules_1;
  Kr_reaction1_reaction1 = 50 s_1;
  Kf_reaction12_reaction12 = 7.173528e-5 um3_s_1_molecules_1;
  Kr_reaction12_reaction12 = 3.5 s_1;
  Kf_reaction7_reaction7 = 0.009123246 um3_s_1_molecules_1;
  Kr_reaction7_reaction7 = 11.9438 s_1;
  Kf_reaction9_reaction9 = 7.173528e-5 um3_s_1_molecules_1;
  Kr_reaction9_reaction9 = 3.5 s_1;
  Kf_reaction11_reaction11 = 0.001660539 um3_s_1_molecules_1;
  Kr_reaction11_reaction11 = 10 s_1;
  Kf_reaction14_reaction14 = 0.96 s_1;
  Kr_reaction14_reaction14 = 0 um3_s_1_molecules_1;
  Kf_reaction13_reaction13 = 19.2 s_1;
  Kr_reaction13_reaction13 = 0 um3_s_1_molecules_1;
  Kf_reaction23_reaction23 = 2.6e-5 s_1;
  Kr_reaction23_reaction23 = 0 s_1;
  Kf_reaction0_reaction0 = 0.01992647 um3_s_1_molecules_1;
  Kr_reaction0_reaction0 = 0.06 s_1;
  Kf_reaction10_reaction10 = 0.001660539 um3_s_1_molecules_1;
  Kr_reaction10_reaction10 = 10 s_1;
  Kf_reaction3_reaction3 = 150 s_1;
  Kr_reaction3_reaction3 = 37.5 s_1;

  // Reactions:
  reaction16: ATP_main + Apyrase_main -> Apyr_ATP_main; (ATP_main*Apyrase_main*Kf_reaction16_reaction16 - Apyr_ATP_main*Kr_reaction16_reaction16)*main;
  reaction18: Apyr_dNTP_main -> Apyrase_main; (Apyr_dNTP_main*Kf_reaction18_reaction18 - Apyrase_main*Kr_reaction18_reaction18)*main;
  reaction19: dNTP_main + Apyrase_main -> Apyr_dNTP_main; (-(Apyr_dNTP_main*Kr_reaction19_reaction19) + Apyrase_main*Kf_reaction19_reaction19*dNTP_main)*main;
  reaction21: Luciferin_Luci_main -> Luci_Luci_X_main; (Kf_reaction21_reaction21*Luciferin_Luci_main - Kr_reaction21_reaction21*Luci_Luci_X_main)*main;
  reaction17: Apyr_ATP_main -> Apy_AMP_2Pi_main; (Apyr_ATP_main*Kf_reaction17_reaction17 - Apy_AMP_2Pi_main*Kr_reaction17_reaction17)*main;
  reaction4: KFp_DNAnp1_PPi_main -> KF_DNAnp1_PPi_main; (KFp_DNAnp1_PPi_main*Kf_reaction4_reaction4 - KF_DNAnp1_PPi_main*Kr_reaction4_reaction4)*main;
  reaction5: KF_DNAnp1_PPi_main -> KF_DNAnp1_main + PPi_main; (KF_DNAnp1_PPi_main*Kf_reaction5_reaction5 - KF_DNAnp1_main*Kr_reaction5_reaction5*PPi_main)*main;
  reaction6: KF_DNAnp1_main -> KF_main + DNAnp1_main; (KF_DNAnp1_main*Kf_reaction6_reaction6 - DNAnp1_main*KF_main*Kr_reaction6_reaction6)*main;
  reaction8: PPi_Sulf_main -> ATP_main + Sulfurylase_main; (Kf_reaction8_reaction8*PPi_Sulf_main - ATP_main*Kr_reaction8_reaction8*Sulfurylase_main)*main;
  reaction2: KF_DNA_dNTP_main -> KFp_DNA_dNTP_main; (KF_DNA_dNTP_main*Kf_reaction2_reaction2 - KFp_DNA_dNTP_main*Kr_reaction2_reaction2)*main;
  reaction25: Apy_AMP_2Pi_main -> Pi_main + AMP_main + Apyrase_main; (Apy_AMP_2Pi_main*Kf_reaction25_reaction25 - AMP_main*Apyrase_main*Kr_reaction25_reaction25*Pi_main)*main;
  reaction15: EP_main -> P_main + Luciferase_main; (EP_main*Kf_reaction15_reaction15 - Kr_reaction15_reaction15*Luciferase_main*P_main)*main;
  reaction20: Luciferase_main -> Luci_X_main; (Kf_reaction20_reaction20*Luciferase_main - Kr_reaction20_reaction20*Luci_X_main)*main;
  reaction22: ATP_Luci_main -> ATP_Luci_X_main; (ATP_Luci_main*Kf_reaction22_reaction22 - ATP_Luci_X_main*Kr_reaction22_reaction22)*main;
  reaction24: EP_main -> EP_X_main; (EP_main*Kf_reaction24_reaction24 - EP_X_main*Kr_reaction24_reaction24)*main;
  reaction1: dNTP_main + KF_DNA_main -> KF_DNA_dNTP_main; (-(KF_DNA_dNTP_main*Kr_reaction1_reaction1) + KF_DNA_main*Kf_reaction1_reaction1*dNTP_main)*main;
  reaction12: Luciferin_Luci_main + ATP_main -> ATP_Luciferin_Luci_main; (-(ATP_Luciferin_Luci_main*Kr_reaction12_reaction12) + ATP_main*Kf_reaction12_reaction12*Luciferin_Luci_main)*main;
  reaction7: PPi_main + Sulfurylase_main -> PPi_Sulf_main; (-(Kr_reaction7_reaction7*PPi_Sulf_main) + Kf_reaction7_reaction7*PPi_main*Sulfurylase_main)*main;
  reaction9: ATP_main + Luciferase_main -> ATP_Luci_main; (-(ATP_Luci_main*Kr_reaction9_reaction9) + ATP_main*Kf_reaction9_reaction9*Luciferase_main)*main;
  reaction11: ATP_Luci_main + Luciferin_main -> ATP_Luciferin_Luci_main; (-(ATP_Luciferin_Luci_main*Kr_reaction11_reaction11) + ATP_Luci_main*Kf_reaction11_reaction11*Luciferin_main)*main;
  reaction14: EP1_main -> EP_main + photon_main; (EP1_main*Kf_reaction14_reaction14 - EP_main*Kr_reaction14_reaction14*photon_main)*main;
  reaction13: ATP_Luciferin_Luci_main -> EP1_main + PPi_main; (ATP_Luciferin_Luci_main*Kf_reaction13_reaction13 - EP1_main*Kr_reaction13_reaction13*PPi_main)*main;
  reaction23: ATP_Luciferin_Luci_main -> ATP_Luci_Luci_X_main; (ATP_Luciferin_Luci_main*Kf_reaction23_reaction23 - ATP_Luci_Luci_X_main*Kr_reaction23_reaction23)*main;
  reaction0: DNA_main + KF_main -> KF_DNA_main; (DNA_main*KF_main*Kf_reaction0_reaction0 - KF_DNA_main*Kr_reaction0_reaction0)*main;
  reaction10: Luciferin_main + Luciferase_main -> Luciferin_Luci_main; (-(Kr_reaction10_reaction10*Luciferin_Luci_main) + Kf_reaction10_reaction10*Luciferase_main*Luciferin_main)*main;
  reaction3: KFp_DNA_dNTP_main -> KFp_DNAnp1_PPi_main; (KFp_DNA_dNTP_main*Kf_reaction3_reaction3 - KFp_DNAnp1_PPi_main*Kr_reaction3_reaction3)*main;

  // Unit definitions:
  unit molecules = item;
  unit um3 = (1e-6 metre)^3;
  unit um2 = (1e-6 metre)^2;
  unit um = 1e-6 metre;
  unit s = second;
  unit K = kelvin;
  unit _one_ = dimensionless;
  unit C_mol_1 = coulomb / mole;
  unit C_nmol_1 = coulomb / (1e-9 mole);
  unit molecules_pmol_1 = item / (1e-12 mole);
  unit _one_000000000 = 1e9 dimensionless;
  unit mV_C_K_1_mol_1 = 1e-3 volt * coulomb / (kelvin * mole);
  unit mV_V_1 = dimensionless;
  unit uM_um3_molecules_1 = 1e-6 mole * (1e-6 metre)^3 / (litre * item);
  unit um3_s_1_molecules_1 = (1e-6 metre)^3 / (second * item);
  unit s_1 = 1 / second;
  unit um6_s_1_molecules_2 = (1e-6 metre)^6 / (second * item^2);
end
