// SBML level 3 version 1
// Exported by VCell 7.3

model Formin_Profilin_Actin_Polymerization_0_5__M_PRF()
  // Formin-Profilin-Actin Polymerization_0.5 ?M PRF
  // model units - substance: molecules, time: s, volume: um3, area: um2, length: um, extent: molecules

  // Compartments:
  compartment A = 1 um3;

  // Species:
  substanceOnly species PRF_PA_Pyr_FH1FH2_A in A = 0;
  substanceOnly species PA_2_Pyr1_FH1FH2_A in A = 0;
  substanceOnly species A_A in A = 1517.58;
  substanceOnly species A3_A in A = 0;
  substanceOnly species End_A in A = 0;
  substanceOnly species FH1FH2_A in A = 1.505535;
  substanceOnly species A_Pyr_A in A = 379.3949;
  substanceOnly species Pyr_F_Actin_A in A = 1.204428e-10;
  substanceOnly species PA_Pyr_A in A = 0;
  substanceOnly species End_Pyr_PRF_A in A = 0;
  substanceOnly species FH1FH2_PA_Pyr_1_A_1_A in A = 0;
  substanceOnly species A2_Pyr2_A in A = 0;
  substanceOnly species A2_Pyr1_A in A = 0;
  substanceOnly species A3_Pyr3_A in A = 0;
  substanceOnly species PRF2_F_End_A in A = 0;
  substanceOnly species PA_1_Pyr_1_FH1FH2_A in A = 0;
  substanceOnly species PA_2_Pyr2_FH1FH2_A in A = 0;
  substanceOnly species PRF_1_FH1FH2_A in A = 0;
  substanceOnly species PRF_2_FH1FH2_A in A = 0;
  substanceOnly species End_PRF_A in A = 0;
  substanceOnly species A3_Pyr2_1_A in A = 0;
  substanceOnly species F_End_A in A = 0;
  substanceOnly species PRF_A in A = 0;
  substanceOnly species PA_A in A = 0;
  substanceOnly species PA_1_FH1FH2_A in A = 0;
  substanceOnly species A2_A in A = 0;
  substanceOnly species FH1FH2_PA_1_A_1_A in A = 0;
  substanceOnly species PRF_PA_FH1FH2_A in A = 0;
  substanceOnly species PRF_FH1FH2_PA_Pyr_1_A_1_A in A = 0;
  substanceOnly species PRF2_FH1FH2_PA_Pyr_1_A_1_A in A = 0;
  substanceOnly species PRF_FH1FH2_PA_1_A_A in A = 0;
  substanceOnly species PRF2_FH1FH2_PA_A_1_A in A = 0;
  substanceOnly species PA_2_FH1FH2_A in A = 0;
  substanceOnly species A3_Pyr2_2_A in A = 0;
  substanceOnly species A3_Pyr1_1_A in A = 0;
  substanceOnly species A3_Pyr_1_2_A in A = 0;
  substanceOnly species FActin_A in A = 6.022142e-10;
  substanceOnly species FH1FH2_PA2_Pyr2_A in A = 0;
  substanceOnly species FH1FH2_PA2_Pyr1_I_A in A = 0;
  substanceOnly species FH1FH2_PA2_Pyr1_II_A in A = 0;
  substanceOnly species FH1FH2_PA2_A in A = 0;
  substanceOnly species PRF_F_End_A in A = 0;

  // Parameters:
  _T_ = 300 K;
  _PI_ = 3.141593 _one_;
  _F_ = 9.64853321e4 C_mol_1;
  _F_nmol_ = 9.64853321e-5 C_nmol_1;
  _N_pmol_ = 6.02214179e11 molecules_pmol_1;
  _K_GHK_ = 1e-9 _one_000000000;
  _R_ = 8314.463 mV_C_K_1_mol_1;
  K_millivolts_per_volt = 1000 mV_V_1;
  KMOLE = 0.001660539 uM_um3_molecules_1;
  Kf_reaction40 = 0.003619975 um3_s_1_molecules_1;
  Kr_reaction40 has um3_s_1_molecules_1;
  Kf_reaction26 has s_1;
  Kr_reaction26 has s_1;
  Kf_reaction34 = 1.102956e-9 um6_s_1_molecules_2;
  Kr_reaction34 = 0 um6_s_1_molecules_2;
  Kf_reaction84 = 2500 s_1;
  Kr_reaction84 has um3_s_1_molecules_1;
  Kf_reaction85 = 0 s_1;
  Kr_reaction85 = 0 um6_s_1_molecules_2;
  Kf_reaction86 = 2500 s_1;
  Kr_reaction86 has um3_s_1_molecules_1;
  Kf_reaction87 = 0 s_1;
  Kr_reaction87 = 0 um6_s_1_molecules_2;
  Kf_reaction52 = 0.01594117 um3_s_1_molecules_1;
  Kr_reaction52 = 0 um3_s_1_molecules_1;
  Kf_reaction28 = 2500 s_1;
  Kr_reaction28 has um3_s_1_molecules_1;
  Kf_reaction49 = 0.01594117 um3_s_1_molecules_1;
  Kr_reaction49 = 0 um3_s_1_molecules_1;
  Kf_reaction39 = 1.102956e-9 um6_s_1_molecules_2;
  Kr_reaction39 = 0 um6_s_1_molecules_2;
  Kf_reaction22 = 1.102956e-9 um6_s_1_molecules_2;
  Kr_reaction22 = 0 um6_s_1_molecules_2;
  Kf_reaction76 = 1.102956e-9 um6_s_1_molecules_2;
  Kr_reaction76 = 0 um6_s_1_molecules_2;
  Kf_reaction62 = 0.3321078 um3_s_1_molecules_1;
  Kr_reaction62 = 5500 s_1;
  Kf_reaction63 = 0.04981616 um3_s_1_molecules_1;
  Kr_reaction63 = 900 s_1;
  Kf_reaction51 = 0.01594117 um3_s_1_molecules_1;
  Kr_reaction51 = 0 um3_s_1_molecules_1;
  Kf_reaction2 = 0.05928123 um3_s_1_molecules_1;
  Kr_reaction2 has um6_s_1_molecules_2;
  Kf_reaction69 = 0.3321078 um3_s_1_molecules_1;
  Kr_reaction69 = 5500 s_1;
  Kf_reaction82 = 2.205911e-9 um6_s_1_molecules_2;
  Kr_reaction82 = 0 um6_s_1_molecules_2;
  Kf_reaction60 = 2.205911e-9 um6_s_1_molecules_2;
  Kr_reaction60 = 0 um6_s_1_molecules_2;
  Kf_reaction44 = 0.01594117 um3_s_1_molecules_1;
  Kr_reaction44 = 0 um3_s_1_molecules_1;
  Kf_reaction50 = 0.01594117 um3_s_1_molecules_1;
  Kr_reaction50 = 0 um3_s_1_molecules_1;
  Kf_reaction33 = 0.01660539 um3_s_1_molecules_1;
  Kr_reaction33 has um3_s_1_molecules_1;
  Kf_reaction77 = 1.102956e-9 um6_s_1_molecules_2;
  Kr_reaction77 = 0 um6_s_1_molecules_2;
  Kf_reaction78 = 1.102956e-9 um6_s_1_molecules_2;
  Kr_reaction78 = 0 um6_s_1_molecules_2;
  Kf_reaction7 = 0.04981616 um3_s_1_molecules_1;
  Kr_reaction7 = 90 s_1;
  Kf_reaction12 = 0.3321078 um3_s_1_molecules_1;
  Kr_reaction12 = 5500 s_1;
  Kf_reaction18 = 0.3321078 um3_s_1_molecules_1;
  Kr_reaction18 = 5500 s_1;
  Kf_reaction38 = 1.102956e-9 um6_s_1_molecules_2;
  Kr_reaction38 = 0 um6_s_1_molecules_2;
  Kf_reaction72 = 1.102956e-9 um6_s_1_molecules_2;
  Kr_reaction72 = 0 um6_s_1_molecules_2;
  Kf_reaction73 = 1.102956e-9 um6_s_1_molecules_2;
  Kr_reaction73 = 0 um6_s_1_molecules_2;
  Kf_reaction6 has s_1;
  Kr_reaction6 has s_1;
  Kf_reaction17 = 0.6642155 um3_s_1_molecules_1;
  Kr_reaction17 = 5500 s_1;
  Kr_reaction8 = 2500 s_1;
  Kf_reaction8 has um3_s_1_molecules_1;
  Kf_reaction58 = 2.205911e-9 um6_s_1_molecules_2;
  Kr_reaction58 = 0 um6_s_1_molecules_2;
  Kf_reaction59 = 2.205911e-9 um6_s_1_molecules_2;
  Kr_reaction59 = 0 um6_s_1_molecules_2;
  Kf_reaction43 = 0.003619975 um3_s_1_molecules_1;
  Kr_reaction43 has um3_s_1_molecules_1;
  Kf_reaction23 = 1.102956e-9 um6_s_1_molecules_2;
  Kr_reaction23 = 0 um6_s_1_molecules_2;
  Kf_reaction20 = 1.102956e-9 um6_s_1_molecules_2;
  Kr_reaction20 = 0 um6_s_1_molecules_2;
  Kf_reaction4 = 0.01594117 um3_s_1_molecules_1;
  Kr_reaction4 = 0 um3_s_1_molecules_1;
  Kf_reaction1 = 0.003619975 um3_s_1_molecules_1;
  Kr_reaction1 has um3_s_1_molecules_1;
  Kf_reaction47 = 0.01594117 um3_s_1_molecules_1;
  Kr_reaction47 = 0 um3_s_1_molecules_1;
  Kf_FPA_Elong1 = 0.04981616 um3_s_1_molecules_1;
  Kr_FPA_Elong1 has um3_s_1_molecules_1;
  Kf_reaction68 = 0.3321078 um3_s_1_molecules_1;
  Kr_reaction68 = 5500 s_1;
  Kf_reaction66 = 0.04981616 um3_s_1_molecules_1;
  Kr_reaction66 = 900 s_1;
  Kf_reaction67 = 0.09963233 um3_s_1_molecules_1;
  Kr_reaction67 = 900 s_1;
  Kf_reaction45 = 0.01594117 um3_s_1_molecules_1;
  Kr_reaction45 = 0 um3_s_1_molecules_1;
  Kf_reaction46 = 0.01594117 um3_s_1_molecules_1;
  Kr_reaction46 = 0 um3_s_1_molecules_1;
  Kf_reaction11 = 0.09963233 um3_s_1_molecules_1;
  Kr_reaction11 = 90 s_1;
  Kf_reaction32 = 2500 s_1;
  Kr_reaction32 has um3_s_1_molecules_1;
  Kf_reaction70 = 0.04981616 um3_s_1_molecules_1;
  Kr_reaction70 = 90 s_1;
  Kf_reaction81 = 2.205911e-9 um6_s_1_molecules_2;
  Kr_reaction81 = 0 um6_s_1_molecules_2;
  Kf_reaction29 = 0.04981616 um3_s_1_molecules_1;
  Kr_reaction29 = 90 s_1;
  Kf_reaction53 = 0.01594117 um3_s_1_molecules_1;
  Kr_reaction53 = 0 um3_s_1_molecules_1;
  Kf_reaction54 = 0.01594117 um3_s_1_molecules_1;
  Kr_reaction54 = 0 um3_s_1_molecules_1;
  Kf_reaction42 = 0.003619975 um3_s_1_molecules_1;
  Kr_reaction42 has um3_s_1_molecules_1;
  Kf_reaction88 = 2500 s_1;
  Kr_reaction88 has um3_s_1_molecules_1;
  Kf_reaction55 = 2.205911e-9 um6_s_1_molecules_2;
  Kr_reaction55 = 0 um6_s_1_molecules_2;
  Kf_reaction9 = 0.01660539 um3_s_1_molecules_1;
  Kr_reaction9 has um3_s_1_molecules_1;
  Kf_reaction56 = 2.205911e-9 um6_s_1_molecules_2;
  Kr_reaction56 = 0 um6_s_1_molecules_2;
  Kf_reaction57 = 2.205911e-9 um6_s_1_molecules_2;
  Kr_reaction57 = 0 um6_s_1_molecules_2;
  Kf_reaction16 = 5500 s_1;
  Kr_reaction16 = 0.3321078 um3_s_1_molecules_1;
  Kf_reaction71 = 0.04981616 um3_s_1_molecules_1;
  Kr_reaction71 = 900 s_1;
  Kf_reaction79 = 1.102956e-9 um6_s_1_molecules_2;
  Kr_reaction79 = 0 um6_s_1_molecules_2;
  Kf_reaction90 = 2500 s_1;
  Kr_reaction90 has um3_s_1_molecules_1;
  Kf_reaction80 = 2.205911e-9 um6_s_1_molecules_2;
  Kr_reaction80 = 0 um6_s_1_molecules_2;
  Kf_reaction24 = 0.003619975 um3_s_1_molecules_1;
  Kr_reaction24 has um3_s_1_molecules_1;
  Kf_reaction31 = 0 s_1;
  Kr_reaction31 = 0 um6_s_1_molecules_2;
  Kf_reaction30 = 0.04981616 um3_s_1_molecules_1;
  Kr_reaction30 = 90 s_1;
  Kf_reaction83 = 2.205911e-9 um6_s_1_molecules_2;
  Kr_reaction83 = 0 um6_s_1_molecules_2;
  Kf_reaction21 = 1.102956e-9 um6_s_1_molecules_2;
  Kr_reaction21 = 0 um6_s_1_molecules_2;
  Kf_reaction5 = 1.102956e-9 um6_s_1_molecules_2;
  Kr_reaction5 = 0 um6_s_1_molecules_2;
  Kf_reaction3 has s_1;
  Kr_reaction3 has s_1;
  Kf_reaction25 has s_1;
  Kr_reaction25 has s_1;
  Kf_reaction91 = 0.6642155 um3_s_1_molecules_1;
  Kr_reaction91 = 5500 s_1;
  Kf_reaction92 = 0.3321078 um3_s_1_molecules_1;
  Kr_reaction92 = 5500 s_1;
  Kf_reaction93 has s_1;
  Kr_reaction93 has s_1;
  Kf_reaction64 = 0.3321078 um3_s_1_molecules_1;
  Kr_reaction64 = 5500 s_1;
  Kf_reaction65 = 0.3321078 um3_s_1_molecules_1;
  Kr_reaction65 = 5500 s_1;
  Kf_reaction74 = 1.102956e-9 um6_s_1_molecules_2;
  Kr_reaction74 = 0 um6_s_1_molecules_2;
  Kf_reaction75 = 1.102956e-9 um6_s_1_molecules_2;
  Kr_reaction75 = 0 um6_s_1_molecules_2;
  Kf_reaction19 = 0.003619975 um3_s_1_molecules_1;
  Kr_reaction19 has um3_s_1_molecules_1;
  Kf_reaction89 = 0 s_1;
  Kr_reaction89 = 0 um6_s_1_molecules_2;
  Kf_reaction35 = 1.102956e-9 um6_s_1_molecules_2;
  Kr_reaction35 = 0 um6_s_1_molecules_2;
  Kf_reaction36 = 1.102956e-9 um6_s_1_molecules_2;
  Kr_reaction36 = 0 um6_s_1_molecules_2;
  Kf_reaction37 = 1.102956e-9 um6_s_1_molecules_2;
  Kr_reaction37 = 0 um6_s_1_molecules_2;
  Kf_FPA_Elong = 0.04981616 um3_s_1_molecules_1;
  Kr_FPA_Elong has um3_s_1_molecules_1;
  Kf_reaction14 = 1.102956e-9 um6_s_1_molecules_2;
  Kr_reaction14 = 0 um6_s_1_molecules_2;
  Kf_reaction61 = 0.6642155 um3_s_1_molecules_1;
  Kr_reaction61 = 5500 s_1;
  Kf_reaction10 = 0.6642155 um3_s_1_molecules_1;
  Kr_reaction10 = 5500 s_1;
  Kf_reaction48 = 0.01594117 um3_s_1_molecules_1;
  Kr_reaction48 = 0 um3_s_1_molecules_1;
  Kf_reaction13 = 0.1185625 um3_s_1_molecules_1;
  Kr_reaction13 has um6_s_1_molecules_2;
  Kf_reaction0 = 0.05928123 um3_s_1_molecules_1;
  Kr_reaction0 has um6_s_1_molecules_2;
  Kf_reaction27 = 0.04981616 um3_s_1_molecules_1;
  Kr_reaction27 = 900 s_1;
  Kf_reaction94 has s_1;
  Kr_reaction94 has s_1;
  Kf_reaction41 = 2500 s_1;
  Kr_reaction41 has um3_s_1_molecules_1;
  Kf_reaction95 has s_1;
  Kr_reaction95 has s_1;
  Kf_reaction96 has s_1;
  Kr_reaction96 has s_1;
  Kf_reaction15 = 0.3321078 um3_s_1_molecules_1;
  Kr_reaction15 = 5500 s_1;
  Kf_FPA_Elong2 = 0.006642155 um3_s_1_molecules_1;
  Kr_FPA_Elong2 has um3_s_1_molecules_1;
  Kf_FPA_Elong3 = 0.006642155 um3_s_1_molecules_1;
  Kr_FPA_Elong3 has um3_s_1_molecules_1;
  Kf_reaction97 = 0.3321078 um3_s_1_molecules_1;
  Kr_reaction97 = 5500 s_1;
  Kf_reaction98 = 2500 s_1;
  Kr_reaction98 has um3_s_1_molecules_1;
  Kf_reaction99 = 2500 s_1;
  Kr_reaction99 has um3_s_1_molecules_1;
  Kf_FPA_Elong4 = 0.006642155 um3_s_1_molecules_1;
  Kr_FPA_Elong4 has um3_s_1_molecules_1;
  Kf_FPA_Elong5 = 0.006642155 um3_s_1_molecules_1;
  Kr_FPA_Elong5 has um3_s_1_molecules_1;
  Kf_reaction101 = 0.3321078 um3_s_1_molecules_1;
  Kr_reaction101 = 5500 s_1;
  Kf_reaction100 = 2500 s_1;
  Kr_reaction100 has um3_s_1_molecules_1;
  Kf_reaction102 = 2500 s_1;
  Kr_reaction102 has um3_s_1_molecules_1;

  // Assignment rules:
  Kr_reaction40 := 2.1587/(0.001660539*Pyr_F_Actin_A);
  Kf_reaction26 := 0.0077049*F_End_A + 0.0021587*F_End_A;
  Kr_reaction26 := 0.001660539*(9.299017e-4*F_End_A/(0.001660539*Pyr_F_Actin_A) + 0.001328431*F_End_A/(0.001660539*Pyr_F_Actin_A))*Pyr_F_Actin_A/(0.001660539*FActin_A + 0.001660539*Pyr_F_Actin_A);
  Kr_reaction84 := 2.757389e-5*Pyr_F_Actin_A/(0.001660539*Pyr_F_Actin_A + 0.001660539*FActin_A);
  Kr_reaction86 := 2.757389e-5*FActin_A/(0.001660539*Pyr_F_Actin_A + 0.001660539*FActin_A);
  Kr_reaction28 := 2.757389e-5*Pyr_F_Actin_A/(0.001660539*Pyr_F_Actin_A + 0.001660539*FActin_A);
  Kr_reaction2 := 449.4544/(0.001660539*Pyr_F_Actin_A)^2;
  Kr_reaction33 := 0.01660539/(0.001660539*Pyr_F_Actin_A);
  Kf_reaction6 := 0.0077049*F_End_A + 0.0021587*F_End_A;
  Kr_reaction6 := 0.001660539*(9.299017e-4*F_End_A/(0.001660539*FActin_A) + 0.001328431*F_End_A/(0.001660539*FActin_A))*FActin_A/(0.001660539*FActin_A + 0.001660539*Pyr_F_Actin_A);
  Kf_reaction8 := 2.757389e-5*FActin_A/(0.001660539*FActin_A + 0.001660539*Pyr_F_Actin_A);
  Kr_reaction43 := 2.1587/(0.001660539*FActin_A);
  Kr_reaction1 := 2.1587/(0.001660539*FActin_A);
  Kr_FPA_Elong1 := 0.04981616/(0.001660539*Pyr_F_Actin_A);
  Kr_reaction32 := 2.757389e-5*FActin_A/(0.001660539*FActin_A + 0.001660539*Pyr_F_Actin_A);
  Kr_reaction42 := 2.1587/(0.001660539*Pyr_F_Actin_A);
  Kr_reaction88 := 2.757389e-5*Pyr_F_Actin_A/(0.001660539*FActin_A + 0.001660539*Pyr_F_Actin_A);
  Kr_reaction9 := 0.1660539/(0.001660539*FActin_A);
  Kr_reaction90 := 2.757389e-5*FActin_A/(0.001660539*FActin_A + 0.001660539*Pyr_F_Actin_A);
  Kr_reaction24 := 2.1587/(0.001660539*FActin_A);
  Kf_reaction3 := 0.01926225*End_A + 0.0021587*End_A;
  Kr_reaction3 := 0.001660539*(0.002324754*End_A/(0.001660539*FActin_A) + 0.001328431*End_A/(0.001660539*FActin_A))*FActin_A/(0.001660539*FActin_A + 0.001660539*Pyr_F_Actin_A);
  Kf_reaction25 := 0.01926225*End_A + 0.0021587*End_A;
  Kr_reaction25 := 0.001660539*(0.002324754*End_A/(0.001660539*Pyr_F_Actin_A) + 0.001328431*End_A/(0.001660539*Pyr_F_Actin_A))*Pyr_F_Actin_A/(0.001660539*Pyr_F_Actin_A + 0.001660539*FActin_A);
  Kf_reaction93 := 0.0077049*PRF_F_End_A + 0.0021587*PRF_F_End_A;
  Kr_reaction93 := 0.001660539*(9.299017e-4*PRF_F_End_A/(0.001660539*FActin_A) + 0.001328431*PRF_F_End_A/(0.001660539*FActin_A))*FActin_A/(0.001660539*FActin_A + 0.001660539*Pyr_F_Actin_A);
  Kr_reaction19 := 2.1587/(0.001660539*Pyr_F_Actin_A);
  Kr_FPA_Elong := 0.4981616/(0.001660539*FActin_A);
  Kr_reaction13 := 449.4544/(2.757389e-6*Pyr_F_Actin_A*FActin_A);
  Kr_reaction0 := 449.4544/(0.001660539*FActin_A)^2;
  Kf_reaction94 := 0.0077049*PRF2_F_End_A + 0.0021587*PRF2_F_End_A;
  Kr_reaction94 := 0.001660539*(9.299017e-4*PRF2_F_End_A/(0.001660539*FActin_A) + 0.001328431*PRF2_F_End_A/(0.001660539*FActin_A))*FActin_A/(0.001660539*FActin_A + 0.001660539*Pyr_F_Actin_A);
  Kr_reaction41 := 2.757389e-5*Pyr_F_Actin_A/(0.001660539*Pyr_F_Actin_A + 0.001660539*FActin_A);
  Kf_reaction95 := 0.0077049*PRF_F_End_A + 0.0021587*PRF_F_End_A;
  Kr_reaction95 := 0.001660539*(9.299017e-4*PRF_F_End_A/(0.001660539*Pyr_F_Actin_A) + 0.001328431*PRF_F_End_A/(0.001660539*Pyr_F_Actin_A))*Pyr_F_Actin_A/(0.001660539*FActin_A + 0.001660539*Pyr_F_Actin_A);
  Kf_reaction96 := 0.0077049*PRF2_F_End_A + 0.0021587*PRF2_F_End_A;
  Kr_reaction96 := 0.001660539*(9.299017e-4*PRF2_F_End_A/(0.001660539*Pyr_F_Actin_A) + 0.001328431*PRF2_F_End_A/(0.001660539*Pyr_F_Actin_A))*Pyr_F_Actin_A/(0.001660539*FActin_A + 0.001660539*Pyr_F_Actin_A);
  Kr_FPA_Elong2 := 0.006642155/(0.001660539*Pyr_F_Actin_A);
  Kr_FPA_Elong3 := 0.006642155/(0.001660539*Pyr_F_Actin_A);
  Kr_reaction98 := 2.757389e-5*Pyr_F_Actin_A/(0.001660539*Pyr_F_Actin_A + 0.001660539*FActin_A);
  Kr_reaction99 := 2.757389e-5*Pyr_F_Actin_A/(0.001660539*Pyr_F_Actin_A + 0.001660539*FActin_A);
  Kr_FPA_Elong4 := 0.06642155/(0.001660539*FActin_A);
  Kr_FPA_Elong5 := 0.06642155/(0.001660539*FActin_A);
  Kr_reaction100 := 2.757389e-5*FActin_A/(0.001660539*FActin_A + 0.001660539*Pyr_F_Actin_A);
  Kr_reaction102 := 2.757389e-5*FActin_A/(0.001660539*FActin_A + 0.001660539*Pyr_F_Actin_A);

  // Reactions:
  reaction40: A2_Pyr1_A + A_Pyr_A -> A3_Pyr2_2_A + Pyr_F_Actin_A; (A2_Pyr1_A*A_Pyr_A*Kf_reaction40 - A3_Pyr2_2_A*Kr_reaction40*Pyr_F_Actin_A)*A;
  reaction26: A_Pyr_A -> Pyr_F_Actin_A; (A_Pyr_A*Kf_reaction26 - Kr_reaction26*Pyr_F_Actin_A)*A;  // modifiers: F_End_A, FActin_A
  reaction34: PA_2_FH1FH2_A + 2 A_Pyr_A -> F_End_A + 2 Pyr_F_Actin_A; (362661.9*Kf_reaction34*PA_2_FH1FH2_A*(0.001660539*A_Pyr_A)^2 - 362661.9*F_End_A*Kr_reaction34*(0.001660539*Pyr_F_Actin_A)^2)*A;
  reaction84: FH1FH2_PA2_Pyr2_A -> FH1FH2_PA_Pyr_1_A_1_A + PRF_A; (FH1FH2_PA2_Pyr2_A*Kf_reaction84 - FH1FH2_PA_Pyr_1_A_1_A*Kr_reaction84*PRF_A)*A;  // modifiers: Pyr_F_Actin_A, FActin_A
  reaction85: PA_2_Pyr1_FH1FH2_A -> FH1FH2_PA2_Pyr1_I_A + FActin_A + Pyr_F_Actin_A; (Kf_reaction85*PA_2_Pyr1_FH1FH2_A - FActin_A*FH1FH2_PA2_Pyr1_I_A*Kr_reaction85*Pyr_F_Actin_A)*A;
  reaction86: FH1FH2_PA2_Pyr1_I_A -> FH1FH2_PA_Pyr_1_A_1_A + PRF_A; (FH1FH2_PA2_Pyr1_I_A*Kf_reaction86 - FH1FH2_PA_Pyr_1_A_1_A*Kr_reaction86*PRF_A)*A;  // modifiers: FActin_A, Pyr_F_Actin_A
  reaction87: PA_2_Pyr1_FH1FH2_A -> FH1FH2_PA2_Pyr1_II_A + FActin_A + Pyr_F_Actin_A; (Kf_reaction87*PA_2_Pyr1_FH1FH2_A - FActin_A*FH1FH2_PA2_Pyr1_II_A*Kr_reaction87*Pyr_F_Actin_A)*A;
  reaction52: A3_Pyr2_1_A + A_Pyr_A -> End_A + Pyr_F_Actin_A; (A3_Pyr2_1_A*A_Pyr_A*Kf_reaction52 - End_A*Kr_reaction52*Pyr_F_Actin_A)*A;
  reaction28: FH1FH2_PA_Pyr_1_A_1_A -> PRF_A + F_End_A; (FH1FH2_PA_Pyr_1_A_1_A*Kf_reaction28 - F_End_A*Kr_reaction28*PRF_A)*A;  // modifiers: Pyr_F_Actin_A, FActin_A
  reaction49: A3_Pyr2_2_A + A_A -> End_A + FActin_A; (A3_Pyr2_2_A*A_A*Kf_reaction49 - End_A*FActin_A*Kr_reaction49)*A;
  reaction39: PRF_2_FH1FH2_A + 2 A_Pyr_A -> 2 Pyr_F_Actin_A + F_End_A; (362661.9*Kf_reaction39*PRF_2_FH1FH2_A*(0.001660539*A_Pyr_A)^2 - 362661.9*F_End_A*Kr_reaction39*(0.001660539*Pyr_F_Actin_A)^2)*A;
  reaction22: PA_2_FH1FH2_A + 2 A_A -> F_End_A + 2 FActin_A; (362661.9*Kf_reaction22*PA_2_FH1FH2_A*(0.001660539*A_A)^2 - 362661.9*F_End_A*Kr_reaction22*(0.001660539*FActin_A)^2)*A;
  reaction76: 2 A_Pyr_A + PA_2_Pyr1_FH1FH2_A -> 2 Pyr_F_Actin_A + F_End_A; (362661.9*Kf_reaction76*PA_2_Pyr1_FH1FH2_A*(0.001660539*A_Pyr_A)^2 - 362661.9*F_End_A*Kr_reaction76*(0.001660539*Pyr_F_Actin_A)^2)*A;
  reaction62: PA_1_Pyr_1_FH1FH2_A + PA_Pyr_A -> PA_2_Pyr2_FH1FH2_A; (-(Kr_reaction62*PA_2_Pyr2_FH1FH2_A) + Kf_reaction62*PA_1_Pyr_1_FH1FH2_A*PA_Pyr_A)*A;
  reaction63: PRF_1_FH1FH2_A + A_Pyr_A -> PA_1_Pyr_1_FH1FH2_A; (-(Kr_reaction63*PA_1_Pyr_1_FH1FH2_A) + A_Pyr_A*Kf_reaction63*PRF_1_FH1FH2_A)*A;
  reaction51: A3_Pyr2_1_A + A_A -> End_A + FActin_A; (A3_Pyr2_1_A*A_A*Kf_reaction51 - End_A*FActin_A*Kr_reaction51)*A;
  reaction2: 2 A_Pyr_A -> A2_Pyr2_A + 2 Pyr_F_Actin_A; (362661.9*Kf_reaction2*(0.001660539*A_Pyr_A)^2 - 362661.9*A2_Pyr2_A*Kr_reaction2*(0.001660539*Pyr_F_Actin_A)^2)*A;
  reaction69: PA_1_FH1FH2_A + PA_Pyr_A -> PA_2_Pyr1_FH1FH2_A; (-(Kr_reaction69*PA_2_Pyr1_FH1FH2_A) + Kf_reaction69*PA_1_FH1FH2_A*PA_Pyr_A)*A;
  reaction82: A_Pyr_A + A_A + PA_1_Pyr_1_FH1FH2_A -> F_End_A + FActin_A + Pyr_F_Actin_A; (A_A*A_Pyr_A*Kf_reaction82*PA_1_Pyr_1_FH1FH2_A - FActin_A*F_End_A*Kr_reaction82*Pyr_F_Actin_A)*A;
  reaction60: PRF_2_FH1FH2_A + A_Pyr_A + A_A -> F_End_A + Pyr_F_Actin_A + FActin_A; (A_A*A_Pyr_A*Kf_reaction60*PRF_2_FH1FH2_A - FActin_A*F_End_A*Kr_reaction60*Pyr_F_Actin_A)*A;
  reaction44: A3_A + A_Pyr_A -> End_A + Pyr_F_Actin_A; (A3_A*A_Pyr_A*Kf_reaction44 - End_A*Kr_reaction44*Pyr_F_Actin_A)*A;
  reaction50: A_Pyr_A + A3_Pyr2_2_A -> Pyr_F_Actin_A + End_A; (A3_Pyr2_2_A*A_Pyr_A*Kf_reaction50 - End_A*Kr_reaction50*Pyr_F_Actin_A)*A;
  reaction33: End_A + PA_Pyr_A -> Pyr_F_Actin_A + End_Pyr_PRF_A; (End_A*Kf_reaction33*PA_Pyr_A - End_Pyr_PRF_A*Kr_reaction33*Pyr_F_Actin_A)*A;
  reaction77: 2 A_Pyr_A + PA_2_Pyr2_FH1FH2_A -> F_End_A + 2 Pyr_F_Actin_A; (362661.9*Kf_reaction77*PA_2_Pyr2_FH1FH2_A*(0.001660539*A_Pyr_A)^2 - 362661.9*F_End_A*Kr_reaction77*(0.001660539*Pyr_F_Actin_A)^2)*A;
  reaction78: 2 A_Pyr_A + PA_1_Pyr_1_FH1FH2_A -> F_End_A + 2 Pyr_F_Actin_A; (362661.9*Kf_reaction78*PA_1_Pyr_1_FH1FH2_A*(0.001660539*A_Pyr_A)^2 - 362661.9*F_End_A*Kr_reaction78*(0.001660539*Pyr_F_Actin_A)^2)*A;
  reaction7: A_A + PRF_A -> PA_A; (-(Kr_reaction7*PA_A) + A_A*Kf_reaction7*PRF_A)*A;
  reaction12: PRF_A + PRF_1_FH1FH2_A -> PRF_2_FH1FH2_A; (-(Kr_reaction12*PRF_2_FH1FH2_A) + Kf_reaction12*PRF_1_FH1FH2_A*PRF_A)*A;
  reaction18: PA_1_FH1FH2_A + PA_A -> PA_2_FH1FH2_A; (-(Kr_reaction18*PA_2_FH1FH2_A) + Kf_reaction18*PA_1_FH1FH2_A*PA_A)*A;
  reaction38: PRF_1_FH1FH2_A + 2 A_Pyr_A -> F_End_A + 2 Pyr_F_Actin_A; (362661.9*Kf_reaction38*PRF_1_FH1FH2_A*(0.001660539*A_Pyr_A)^2 - 362661.9*F_End_A*Kr_reaction38*(0.001660539*Pyr_F_Actin_A)^2)*A;
  reaction72: 2 A_A + PA_2_Pyr1_FH1FH2_A -> F_End_A + 2 FActin_A; (362661.9*Kf_reaction72*PA_2_Pyr1_FH1FH2_A*(0.001660539*A_A)^2 - 362661.9*F_End_A*Kr_reaction72*(0.001660539*FActin_A)^2)*A;
  reaction73: 2 A_A + PA_2_Pyr2_FH1FH2_A -> F_End_A + 2 FActin_A; (362661.9*Kf_reaction73*PA_2_Pyr2_FH1FH2_A*(0.001660539*A_A)^2 - 362661.9*F_End_A*Kr_reaction73*(0.001660539*FActin_A)^2)*A;
  reaction6: A_A -> FActin_A; (A_A*Kf_reaction6 - FActin_A*Kr_reaction6)*A;  // modifiers: F_End_A, Pyr_F_Actin_A
  reaction17: PA_A + FH1FH2_A -> PA_1_FH1FH2_A; (-(Kr_reaction17*PA_1_FH1FH2_A) + FH1FH2_A*Kf_reaction17*PA_A)*A;
  reaction8: End_A + PRF_A -> End_PRF_A; (-(End_PRF_A*Kr_reaction8) + End_A*Kf_reaction8*PRF_A)*A;  // modifiers: FActin_A, Pyr_F_Actin_A
  reaction58: PRF_PA_FH1FH2_A + A_Pyr_A + A_A -> F_End_A + Pyr_F_Actin_A + FActin_A; (A_A*A_Pyr_A*Kf_reaction58*PRF_PA_FH1FH2_A - FActin_A*F_End_A*Kr_reaction58*Pyr_F_Actin_A)*A;
  reaction59: PRF_1_FH1FH2_A + A_Pyr_A + A_A -> Pyr_F_Actin_A + FActin_A + F_End_A; (A_A*A_Pyr_A*Kf_reaction59*PRF_1_FH1FH2_A - FActin_A*F_End_A*Kr_reaction59*Pyr_F_Actin_A)*A;
  reaction43: A2_Pyr1_A + A_A -> A3_Pyr_1_2_A + FActin_A; (A2_Pyr1_A*A_A*Kf_reaction43 - A3_Pyr_1_2_A*FActin_A*Kr_reaction43)*A;
  reaction23: PA_1_FH1FH2_A + 2 A_A -> F_End_A + 2 FActin_A; (362661.9*Kf_reaction23*PA_1_FH1FH2_A*(0.001660539*A_A)^2 - 362661.9*F_End_A*Kr_reaction23*(0.001660539*FActin_A)^2)*A;
  reaction20: PRF_1_FH1FH2_A + 2 A_A -> F_End_A + 2 FActin_A; (362661.9*Kf_reaction20*PRF_1_FH1FH2_A*(0.001660539*A_A)^2 - 362661.9*F_End_A*Kr_reaction20*(0.001660539*FActin_A)^2)*A;
  reaction4: A3_A + A_A -> End_A + FActin_A; (A3_A*A_A*Kf_reaction4 - End_A*FActin_A*Kr_reaction4)*A;
  reaction1: A_A + A2_A -> FActin_A + A3_A; (A2_A*A_A*Kf_reaction1 - A3_A*FActin_A*Kr_reaction1)*A;
  reaction47: A3_Pyr_1_2_A + A_A -> End_A + FActin_A; (A3_Pyr_1_2_A*A_A*Kf_reaction47 - End_A*FActin_A*Kr_reaction47)*A;
  FPA_Elong1: F_End_A + PA_Pyr_A -> Pyr_F_Actin_A + FH1FH2_PA_Pyr_1_A_1_A; (F_End_A*Kf_FPA_Elong1*PA_Pyr_A - FH1FH2_PA_Pyr_1_A_1_A*Kr_FPA_Elong1*Pyr_F_Actin_A)*A;
  reaction68: PA_1_Pyr_1_FH1FH2_A + PA_A -> PA_2_Pyr1_FH1FH2_A; (-(Kr_reaction68*PA_2_Pyr1_FH1FH2_A) + Kf_reaction68*PA_1_Pyr_1_FH1FH2_A*PA_A)*A;
  reaction66: PRF_PA_Pyr_FH1FH2_A + A_Pyr_A -> PA_2_Pyr2_FH1FH2_A; (-(Kr_reaction66*PA_2_Pyr2_FH1FH2_A) + A_Pyr_A*Kf_reaction66*PRF_PA_Pyr_FH1FH2_A)*A;
  reaction67: A_Pyr_A + PRF_2_FH1FH2_A -> PRF_PA_Pyr_FH1FH2_A; (A_Pyr_A*Kf_reaction67*PRF_2_FH1FH2_A - Kr_reaction67*PRF_PA_Pyr_FH1FH2_A)*A;
  reaction45: A3_Pyr1_1_A + A_A -> End_A + FActin_A; (A3_Pyr1_1_A*A_A*Kf_reaction45 - End_A*FActin_A*Kr_reaction45)*A;
  reaction46: A_Pyr_A + A3_Pyr1_1_A -> End_A + Pyr_F_Actin_A; (A3_Pyr1_1_A*A_Pyr_A*Kf_reaction46 - End_A*Kr_reaction46*Pyr_F_Actin_A)*A;
  reaction11: PRF_2_FH1FH2_A + A_A -> PRF_PA_FH1FH2_A; (A_A*Kf_reaction11*PRF_2_FH1FH2_A - Kr_reaction11*PRF_PA_FH1FH2_A)*A;
  reaction32: FH1FH2_PA_1_A_1_A -> PRF_A + F_End_A; (FH1FH2_PA_1_A_1_A*Kf_reaction32 - F_End_A*Kr_reaction32*PRF_A)*A;  // modifiers: FActin_A, Pyr_F_Actin_A
  reaction70: PRF_PA_Pyr_FH1FH2_A + A_A -> PA_2_Pyr1_FH1FH2_A; (-(Kr_reaction70*PA_2_Pyr1_FH1FH2_A) + A_A*Kf_reaction70*PRF_PA_Pyr_FH1FH2_A)*A;
  reaction81: A_Pyr_A + A_A + PA_2_Pyr2_FH1FH2_A -> F_End_A + FActin_A + Pyr_F_Actin_A; (A_A*A_Pyr_A*Kf_reaction81*PA_2_Pyr2_FH1FH2_A - FActin_A*F_End_A*Kr_reaction81*Pyr_F_Actin_A)*A;
  reaction29: A_A + PRF_1_FH1FH2_A -> PA_1_FH1FH2_A; (-(Kr_reaction29*PA_1_FH1FH2_A) + A_A*Kf_reaction29*PRF_1_FH1FH2_A)*A;
  reaction53: A3_Pyr3_A + A_A -> End_A + FActin_A; (A3_Pyr3_A*A_A*Kf_reaction53 - End_A*FActin_A*Kr_reaction53)*A;
  reaction54: A3_Pyr3_A + A_Pyr_A -> End_A + Pyr_F_Actin_A; (A3_Pyr3_A*A_Pyr_A*Kf_reaction54 - End_A*Kr_reaction54*Pyr_F_Actin_A)*A;
  reaction42: A2_A + A_Pyr_A -> A3_Pyr1_1_A + Pyr_F_Actin_A; (A2_A*A_Pyr_A*Kf_reaction42 - A3_Pyr1_1_A*Kr_reaction42*Pyr_F_Actin_A)*A;
  reaction88: FH1FH2_PA2_Pyr1_II_A -> FH1FH2_PA_1_A_1_A + PRF_A; (FH1FH2_PA2_Pyr1_II_A*Kf_reaction88 - FH1FH2_PA_1_A_1_A*Kr_reaction88*PRF_A)*A;  // modifiers: Pyr_F_Actin_A, FActin_A
  reaction55: PA_2_FH1FH2_A + A_Pyr_A + A_A -> F_End_A + Pyr_F_Actin_A + FActin_A; (A_A*A_Pyr_A*Kf_reaction55*PA_2_FH1FH2_A - FActin_A*F_End_A*Kr_reaction55*Pyr_F_Actin_A)*A;
  reaction9: PA_A + End_A -> FActin_A + End_PRF_A; (-(End_PRF_A*FActin_A*Kr_reaction9) + End_A*Kf_reaction9*PA_A)*A;
  reaction56: PA_1_FH1FH2_A + A_Pyr_A + A_A -> F_End_A + Pyr_F_Actin_A + FActin_A; (A_A*A_Pyr_A*Kf_reaction56*PA_1_FH1FH2_A - FActin_A*F_End_A*Kr_reaction56*Pyr_F_Actin_A)*A;
  reaction57: FH1FH2_A + A_Pyr_A + A_A -> F_End_A + Pyr_F_Actin_A + FActin_A; (A_A*A_Pyr_A*FH1FH2_A*Kf_reaction57 - FActin_A*F_End_A*Kr_reaction57*Pyr_F_Actin_A)*A;
  reaction16: PRF_PA_FH1FH2_A -> PA_1_FH1FH2_A + PRF_A; (-(Kr_reaction16*PA_1_FH1FH2_A*PRF_A) + Kf_reaction16*PRF_PA_FH1FH2_A)*A;
  reaction71: A_Pyr_A + PRF_PA_FH1FH2_A -> PA_2_Pyr1_FH1FH2_A; (-(Kr_reaction71*PA_2_Pyr1_FH1FH2_A) + A_Pyr_A*Kf_reaction71*PRF_PA_FH1FH2_A)*A;
  reaction79: 2 A_Pyr_A + PRF_PA_Pyr_FH1FH2_A -> F_End_A + 2 Pyr_F_Actin_A; (362661.9*Kf_reaction79*PRF_PA_Pyr_FH1FH2_A*(0.001660539*A_Pyr_A)^2 - 362661.9*F_End_A*Kr_reaction79*(0.001660539*Pyr_F_Actin_A)^2)*A;
  reaction90: FH1FH2_PA2_A -> FH1FH2_PA_1_A_1_A + FH1FH2_A; (FH1FH2_PA2_A*Kf_reaction90 - FH1FH2_A*FH1FH2_PA_1_A_1_A*Kr_reaction90)*A;  // modifiers: FActin_A, Pyr_F_Actin_A
  reaction80: A_Pyr_A + A_A + PA_2_Pyr1_FH1FH2_A -> F_End_A + FActin_A + Pyr_F_Actin_A; (A_A*A_Pyr_A*Kf_reaction80*PA_2_Pyr1_FH1FH2_A - FActin_A*F_End_A*Kr_reaction80*Pyr_F_Actin_A)*A;
  reaction24: A2_Pyr2_A + A_A -> A3_Pyr2_1_A + FActin_A; (A2_Pyr2_A*A_A*Kf_reaction24 - A3_Pyr2_1_A*FActin_A*Kr_reaction24)*A;
  reaction31: PA_2_Pyr2_FH1FH2_A -> FH1FH2_PA2_Pyr2_A + 2 Pyr_F_Actin_A; (Kf_reaction31*PA_2_Pyr2_FH1FH2_A - 362661.9*FH1FH2_PA2_Pyr2_A*Kr_reaction31*(0.001660539*Pyr_F_Actin_A)^2)*A;
  reaction30: PRF_PA_FH1FH2_A + A_A -> PA_2_FH1FH2_A; (-(Kr_reaction30*PA_2_FH1FH2_A) + A_A*Kf_reaction30*PRF_PA_FH1FH2_A)*A;
  reaction83: A_Pyr_A + A_A + PRF_PA_Pyr_FH1FH2_A -> F_End_A + FActin_A + Pyr_F_Actin_A; (A_A*A_Pyr_A*Kf_reaction83*PRF_PA_Pyr_FH1FH2_A - FActin_A*F_End_A*Kr_reaction83*Pyr_F_Actin_A)*A;
  reaction21: PRF_PA_FH1FH2_A + 2 A_A -> F_End_A + 2 FActin_A; (362661.9*Kf_reaction21*PRF_PA_FH1FH2_A*(0.001660539*A_A)^2 - 362661.9*F_End_A*Kr_reaction21*(0.001660539*FActin_A)^2)*A;
  reaction5: 2 A_A + FH1FH2_A -> F_End_A + 2 FActin_A; (362661.9*FH1FH2_A*Kf_reaction5*(0.001660539*A_A)^2 - 362661.9*F_End_A*Kr_reaction5*(0.001660539*FActin_A)^2)*A;
  reaction3: A_A -> FActin_A; (A_A*Kf_reaction3 - FActin_A*Kr_reaction3)*A;  // modifiers: End_A, Pyr_F_Actin_A
  reaction25: A_Pyr_A -> Pyr_F_Actin_A; (A_Pyr_A*Kf_reaction25 - Kr_reaction25*Pyr_F_Actin_A)*A;  // modifiers: End_A, FActin_A
  reaction91: F_End_A + PRF_A -> PRF_F_End_A; (F_End_A*Kf_reaction91*PRF_A - Kr_reaction91*PRF_F_End_A)*A;
  reaction92: PRF_F_End_A + PRF_A -> PRF2_F_End_A; (-(Kr_reaction92*PRF2_F_End_A) + Kf_reaction92*PRF_A*PRF_F_End_A)*A;
  reaction93: A_A -> FActin_A; (A_A*Kf_reaction93 - FActin_A*Kr_reaction93)*A;  // modifiers: PRF_F_End_A, Pyr_F_Actin_A
  reaction64: PRF_1_FH1FH2_A + PA_Pyr_A -> PRF_PA_Pyr_FH1FH2_A; (Kf_reaction64*PA_Pyr_A*PRF_1_FH1FH2_A - Kr_reaction64*PRF_PA_Pyr_FH1FH2_A)*A;
  reaction65: PA_1_Pyr_1_FH1FH2_A + PRF_A -> PRF_PA_Pyr_FH1FH2_A; (Kf_reaction65*PA_1_Pyr_1_FH1FH2_A*PRF_A - Kr_reaction65*PRF_PA_Pyr_FH1FH2_A)*A;
  reaction74: 2 A_A + PA_1_Pyr_1_FH1FH2_A -> F_End_A + 2 FActin_A; (362661.9*Kf_reaction74*PA_1_Pyr_1_FH1FH2_A*(0.001660539*A_A)^2 - 362661.9*F_End_A*Kr_reaction74*(0.001660539*FActin_A)^2)*A;
  reaction75: 2 A_A + PRF_PA_Pyr_FH1FH2_A -> F_End_A + 2 FActin_A; (362661.9*Kf_reaction75*PRF_PA_Pyr_FH1FH2_A*(0.001660539*A_A)^2 - 362661.9*F_End_A*Kr_reaction75*(0.001660539*FActin_A)^2)*A;
  reaction19: A2_Pyr2_A + A_Pyr_A -> A3_Pyr3_A + Pyr_F_Actin_A; (A2_Pyr2_A*A_Pyr_A*Kf_reaction19 - A3_Pyr3_A*Kr_reaction19*Pyr_F_Actin_A)*A;
  reaction89: PA_2_FH1FH2_A -> FH1FH2_PA2_A + 2 FActin_A; (Kf_reaction89*PA_2_FH1FH2_A - 362661.9*FH1FH2_PA2_A*Kr_reaction89*(0.001660539*FActin_A)^2)*A;
  reaction35: PA_1_FH1FH2_A + 2 A_Pyr_A -> F_End_A + 2 Pyr_F_Actin_A; (362661.9*Kf_reaction35*PA_1_FH1FH2_A*(0.001660539*A_Pyr_A)^2 - 362661.9*F_End_A*Kr_reaction35*(0.001660539*Pyr_F_Actin_A)^2)*A;
  reaction36: FH1FH2_A + 2 A_Pyr_A -> F_End_A + 2 Pyr_F_Actin_A; (362661.9*FH1FH2_A*Kf_reaction36*(0.001660539*A_Pyr_A)^2 - 362661.9*F_End_A*Kr_reaction36*(0.001660539*Pyr_F_Actin_A)^2)*A;
  reaction37: PRF_PA_FH1FH2_A + 2 A_Pyr_A -> F_End_A + 2 Pyr_F_Actin_A; (362661.9*Kf_reaction37*PRF_PA_FH1FH2_A*(0.001660539*A_Pyr_A)^2 - 362661.9*F_End_A*Kr_reaction37*(0.001660539*Pyr_F_Actin_A)^2)*A;
  FPA_Elong: PA_A + F_End_A -> FActin_A + FH1FH2_PA_1_A_1_A; (-(FActin_A*FH1FH2_PA_1_A_1_A*Kr_FPA_Elong) + F_End_A*Kf_FPA_Elong*PA_A)*A;
  reaction14: PRF_2_FH1FH2_A + 2 A_A -> F_End_A + 2 FActin_A; (362661.9*Kf_reaction14*PRF_2_FH1FH2_A*(0.001660539*A_A)^2 - 362661.9*F_End_A*Kr_reaction14*(0.001660539*FActin_A)^2)*A;
  reaction61: FH1FH2_A + PA_Pyr_A -> PA_1_Pyr_1_FH1FH2_A; (-(Kr_reaction61*PA_1_Pyr_1_FH1FH2_A) + FH1FH2_A*Kf_reaction61*PA_Pyr_A)*A;
  reaction10: PRF_A + FH1FH2_A -> PRF_1_FH1FH2_A; (-(Kr_reaction10*PRF_1_FH1FH2_A) + FH1FH2_A*Kf_reaction10*PRF_A)*A;
  reaction48: A3_Pyr_1_2_A + A_Pyr_A -> End_A + Pyr_F_Actin_A; (A3_Pyr_1_2_A*A_Pyr_A*Kf_reaction48 - End_A*Kr_reaction48*Pyr_F_Actin_A)*A;
  reaction13: A_Pyr_A + A_A -> Pyr_F_Actin_A + FActin_A + A2_Pyr1_A; (A_A*A_Pyr_A*Kf_reaction13 - A2_Pyr1_A*FActin_A*Kr_reaction13*Pyr_F_Actin_A)*A;
  reaction0: 2 A_A -> A2_A + 2 FActin_A; (362661.9*Kf_reaction0*(0.001660539*A_A)^2 - 362661.9*A2_A*Kr_reaction0*(0.001660539*FActin_A)^2)*A;
  reaction27: PRF_A + A_Pyr_A -> PA_Pyr_A; (-(Kr_reaction27*PA_Pyr_A) + A_Pyr_A*Kf_reaction27*PRF_A)*A;
  reaction94: A_A -> FActin_A; (A_A*Kf_reaction94 - FActin_A*Kr_reaction94)*A;  // modifiers: PRF2_F_End_A, Pyr_F_Actin_A
  reaction41: End_Pyr_PRF_A -> End_A + PRF_A; (End_Pyr_PRF_A*Kf_reaction41 - End_A*Kr_reaction41*PRF_A)*A;  // modifiers: Pyr_F_Actin_A, FActin_A
  reaction95: A_Pyr_A -> Pyr_F_Actin_A; (A_Pyr_A*Kf_reaction95 - Kr_reaction95*Pyr_F_Actin_A)*A;  // modifiers: PRF_F_End_A, FActin_A
  reaction96: A_Pyr_A -> Pyr_F_Actin_A; (A_Pyr_A*Kf_reaction96 - Kr_reaction96*Pyr_F_Actin_A)*A;  // modifiers: PRF2_F_End_A, FActin_A
  reaction15: PRF_1_FH1FH2_A + PA_A -> PRF_PA_FH1FH2_A; (Kf_reaction15*PA_A*PRF_1_FH1FH2_A - Kr_reaction15*PRF_PA_FH1FH2_A)*A;
  FPA_Elong2: PA_Pyr_A + PRF_F_End_A -> Pyr_F_Actin_A + PRF_FH1FH2_PA_Pyr_1_A_1_A; (Kf_FPA_Elong2*PA_Pyr_A*PRF_F_End_A - Kr_FPA_Elong2*PRF_FH1FH2_PA_Pyr_1_A_1_A*Pyr_F_Actin_A)*A;
  FPA_Elong3: PA_Pyr_A + PRF2_F_End_A -> Pyr_F_Actin_A + PRF2_FH1FH2_PA_Pyr_1_A_1_A; (Kf_FPA_Elong3*PA_Pyr_A*PRF2_F_End_A - Kr_FPA_Elong3*PRF2_FH1FH2_PA_Pyr_1_A_1_A*Pyr_F_Actin_A)*A;
  reaction97: PRF_FH1FH2_PA_Pyr_1_A_1_A + PRF_A -> PRF2_FH1FH2_PA_Pyr_1_A_1_A; (-(Kr_reaction97*PRF2_FH1FH2_PA_Pyr_1_A_1_A) + Kf_reaction97*PRF_A*PRF_FH1FH2_PA_Pyr_1_A_1_A)*A;
  reaction98: PRF_FH1FH2_PA_Pyr_1_A_1_A -> PRF_A + PRF_F_End_A; (Kf_reaction98*PRF_FH1FH2_PA_Pyr_1_A_1_A - Kr_reaction98*PRF_A*PRF_F_End_A)*A;  // modifiers: Pyr_F_Actin_A, FActin_A
  reaction99: PRF2_FH1FH2_PA_Pyr_1_A_1_A -> PRF_A + PRF2_F_End_A; (Kf_reaction99*PRF2_FH1FH2_PA_Pyr_1_A_1_A - Kr_reaction99*PRF2_F_End_A*PRF_A)*A;  // modifiers: Pyr_F_Actin_A, FActin_A
  FPA_Elong4: PA_A + PRF_F_End_A -> FActin_A + PRF_FH1FH2_PA_1_A_A; (-(FActin_A*Kr_FPA_Elong4*PRF_FH1FH2_PA_1_A_A) + Kf_FPA_Elong4*PA_A*PRF_F_End_A)*A;
  FPA_Elong5: PA_A + PRF2_F_End_A -> FActin_A + PRF2_FH1FH2_PA_A_1_A; (-(FActin_A*Kr_FPA_Elong5*PRF2_FH1FH2_PA_A_1_A) + Kf_FPA_Elong5*PA_A*PRF2_F_End_A)*A;
  reaction101: PRF_FH1FH2_PA_1_A_A + PRF_A -> PRF2_FH1FH2_PA_A_1_A; (-(Kr_reaction101*PRF2_FH1FH2_PA_A_1_A) + Kf_reaction101*PRF_A*PRF_FH1FH2_PA_1_A_A)*A;
  reaction100: PRF_FH1FH2_PA_1_A_A -> PRF_A + PRF_F_End_A; (Kf_reaction100*PRF_FH1FH2_PA_1_A_A - Kr_reaction100*PRF_A*PRF_F_End_A)*A;  // modifiers: FActin_A, Pyr_F_Actin_A
  reaction102: PRF2_FH1FH2_PA_A_1_A -> PRF_A + PRF2_F_End_A; (Kf_reaction102*PRF2_FH1FH2_PA_A_1_A - Kr_reaction102*PRF2_F_End_A*PRF_A)*A;  // modifiers: FActin_A, Pyr_F_Actin_A

  // Unit definitions:
  unit molecules = item;
  unit um3 = (1e-6 metre)^3;
  unit um2 = (1e-6 metre)^2;
  unit um = 1e-6 metre;
  unit s = second;
  unit K = kelvin;
  unit _one_ = dimensionless;
  unit C_mol_1 = coulomb / mole;
  unit C_nmol_1 = coulomb / (1e-9 mole);
  unit molecules_pmol_1 = item / (1e-12 mole);
  unit _one_000000000 = 1e9 dimensionless;
  unit mV_C_K_1_mol_1 = 1e-3 volt * coulomb / (kelvin * mole);
  unit mV_V_1 = dimensionless;
  unit uM_um3_molecules_1 = 1e-6 mole * (1e-6 metre)^3 / (litre * item);
  unit um3_s_1_molecules_1 = (1e-6 metre)^3 / (second * item);
  unit s_1 = 1 / second;
  unit um6_s_1_molecules_2 = (1e-6 metre)^6 / (second * item^2);
end
