// SBML level 3 version 1
// Exported by VCell 7.3

model neves_cell_2008_compartmental()
  // Cell (2008)
  // model units - substance: molecules, time: s, volume: um3, area: um2, length: um, extent: molecules

  // Compartments:
  compartment cyto = 1 um3;
  compartment extra = 0.1111111 um3;
  compartment cyto_mem = 0.2 um2;  // 2-D

  // Species:
  substanceOnly species AC_active_cyto_mem in cyto_mem = 0;
  substanceOnly species G_GDP_cyto in cyto = 0;
  substanceOnly species G_protein_cyto in cyto = 2167.971;
  substanceOnly species G_a_s_cyto in cyto = 0;
  substanceOnly species GRK_bg_cyto in cyto = 0;
  substanceOnly species iso_BAR_p_cyto_mem in cyto_mem = 0;
  substanceOnly species PDE4_cyto in cyto = 240.8857;
  substanceOnly species ATP_cyto in cyto = 3011071;
  substanceOnly species AC_PKA_cyto_mem in cyto_mem = 0;
  substanceOnly species R2C2_cyto in cyto = 120.4428;
  substanceOnly species PP_PDE_cyto in cyto = 120.4428;
  substanceOnly species BAR_cyto_mem in cyto_mem = 19;
  substanceOnly species BAR_G_cyto_mem in cyto_mem = 0;
  substanceOnly species iso_extra in extra = 66.91269;
  substanceOnly species iso_BAR_cyto_mem in cyto_mem = 0;
  substanceOnly species MAPK_active_cyto in cyto = 0;
  substanceOnly species MEK_cyto in cyto = 108.3986;
  substanceOnly species MEK_active_cyto in cyto = 0;
  substanceOnly species B_Raf_active_cyto in cyto = 0;
  substanceOnly species bg_cyto in cyto = 0;
  substanceOnly species B_Raf_cyto in cyto = 120.4428;
  substanceOnly species PKA_cyto in cyto = 0;
  substanceOnly species AC_cyto_mem in cyto_mem = 60;
  substanceOnly species AMP_cyto in cyto = 3011071;
  substanceOnly species GRK_cyto in cyto = 0.602214179;
  substanceOnly species PP2A_cyto in cyto = 60.2214179;
  substanceOnly species MAPK_cyto in cyto = 216.7971;
  substanceOnly species PTP_cyto in cyto = 120.4428;
  substanceOnly species PTP_PKA_cyto in cyto = 0;
  substanceOnly species c_R2C2_cyto in cyto = 0;
  substanceOnly species c2_R2C2_cyto in cyto = 0;
  substanceOnly species c3_R2C2_cyto in cyto = 0;
  substanceOnly species iso_BAR_G_cyto_mem in cyto_mem = 0;
  substanceOnly species PDE_high_km_cyto in cyto = 301.1071;
  substanceOnly species cAMP_cyto in cyto = 0;
  substanceOnly species PTP_PP_cyto in cyto = 60.2214179;
  substanceOnly species PDE4_P_cyto in cyto = 0;

  // Parameters:
  _T_ = 300 K;
  _PI_ = 3.141593 _one_;
  _F_ = 9.64853321e4 C_mol_1;
  _F_nmol_ = 9.64853321e-5 C_nmol_1;
  _N_pmol_ = 6.02214179e11 molecules_pmol_1;
  _K_GHK_ = 1e-9 _one_000000000;
  _R_ = 8314.463 mV_C_K_1_mol_1;
  K_millivolts_per_volt = 1000 mV_V_1;
  KMOLE = 0.001660539 uM_um3_molecules_1;
  Kf_activate_Gs_activate_Gs = 0.025 s_1;
  Kr_activate_Gs_activate_Gs = 0 um6_s_1_molecules_2;
  Km_pde4_p_pde4_p = 782.8784 molecules_um_3;
  Vmax_pde4_p_pde4_p has molecules_um_3_s_1;
  Km_PPase_Raf = 9454.763 molecules_um_3;
  kcat_PPase_Raf = 5 s_1;
  Vmax_PPase_Raf has molecules_um_3_s_1;
  Kf_iso_binds_BAR = 0.001660539 um3_s_1_molecules_1;
  Kr_iso_binds_BAR = 0.2 s_1;
  Km_PDE4_PDE4 = 782.8784 molecules_um_3;
  Vmax_PDE4_PDE4 has molecules_um_3_s_1;
  Kf_bg_binds_GRK_bg_binds_GRK = 0.001660539 um3_s_1_molecules_1;
  Kr_bg_binds_GRK_bg_binds_GRK = 0.25 s_1;
  Km_MEK_activates_MAPK = 27.88011 molecules_um_3;
  Vmax_MEK_activates_MAPK has molecules_um_3_s_1;
  Km_PKA_activates_Raf = 301.1071 molecules_um_3;
  kcat_PKA_activates_Raf = 10 s_1;
  Vmax_PKA_activates_Raf has molecules_um_3_s_1;
  Km_AC_active_AC_active = 189697.5 molecules_um_3;
  Vmax_AC_active_AC_active has molecules_um_2_s_1;
  Kf_GTPase_GTPase = 0.06667 s_1;
  Kr_GTPase_GTPase = 0 s_1;
  Kf_trimer_trimer = 0.009963233 um3_s_1_molecules_1;
  Kr_trimer_trimer = 0 s_1;
  Kf_G_binds_iso_BAR_G_binds_iso_BAR = 0.01660539 um3_s_1_molecules_1;
  Kr_G_binds_iso_BAR_G_binds_iso_BAR = 0.1 s_1;
  Kf_A2 = 0.0138655 um3_s_1_molecules_1;
  Kr_A2 = 0.0167 s_1;
  Km_highKM_PDE = 9033.213 molecules_um_3;
  Vmax_highKM_PDE has molecules_um_3_s_1;
  Km_PKA_P_PTP = 60.2214179 molecules_um_3;
  kcat_PKA_P_PTP = 0.2 s_1;
  Vmax_PKA_P_PTP has molecules_um_3_s_1;
  Kf_AC_activation_AC_activation = 0.8302694 um3_s_1_molecules_1;
  Kr_AC_activation_AC_activation = 1 s_1;
  Km_AC_basal_AC_basal = 620280.6 molecules_um_3;
  Vmax_AC_basal_AC_basal has molecules_um_2_s_1;
  Kf_B1 = 9.797179e-6 um3_s_1_molecules_1;
  Kr_B1 = 0.00028 s_1;
  Km_grk_GRK = 15 molecules_um_2;
  Vmax_grk_GRK has molecules_um_2_s_1;
  Km_PKA_P_PDE = 301.1071 molecules_um_3;
  Vmax_PKA_P_PDE has molecules_um_3_s_1;
  Km_Raf_activates_MEK = 95.80625 molecules_um_3;
  Vmax_Raf_activates_MEK has molecules_um_3_s_1;
  Km_PTP_PKA = 5419.928 molecules_um_3;
  kcat_PTP_PKA = 0.1 s_1;
  Vmax_PTP_PKA has molecules_um_3_s_1;
  Kf_B2 = 9.797179e-6 um3_s_1_molecules_1;
  Kr_B2 = 0.00028 s_1;
  Km_PTP = 277.0185 molecules_um_3;
  kcat_PTP = 1.06 s_1;
  Vmax_PTP has molecules_um_3_s_1;
  Kf_iso_binds_BAR_g = 0.001660539 um3_s_1_molecules_1;
  Kr_iso_binds_BAR_g = 0.062 s_1;
  Km_PPase_MAPK = 463.7049 molecules_um_3;
  kcat_PPase_MAPK = 0.636 s_1;
  Vmax_PPase_MAPK has molecules_um_3_s_1;
  Km_pp2a_4_pp2a_4 = 4817.713 molecules_um_3;
  Vmax_pp2a_4_pp2a_4 has molecules_um_3_s_1;
  Km_pp_ptp = 3613.285 molecules_um_3;
  kcat_pp_ptp_pp_ptp = 5 s_1;
  Vmax_pp_ptp has molecules_um_3_s_1;
  Km_GRK_bg_GRK_bg = 4 molecules_um_2;
  Vmax_GRK_bg_GRK_bg has molecules_um_2_s_1;
  Kf_G_binds_BAR_G_binds_BAR = 0.0004981616 um3_s_1_molecules_1;
  Kr_G_binds_BAR_G_binds_BAR = 0.1 s_1;
  Km_PPase_mek = 9454.763 molecules_um_3;
  kcat_PPase_mek = 5 s_1;
  Vmax_PPase_mek has molecules_um_3_s_1;
  Kf_A1 = 0.0138655 um3_s_1_molecules_1;
  Kr_A1 = 0.0167 s_1;

  // Assignment rules:
  Vmax_pde4_p_pde4_p := 20*PDE4_P_cyto;
  Vmax_PPase_Raf := kcat_PPase_Raf*PP2A_cyto;
  Vmax_PDE4_PDE4 := 8*PDE4_cyto;
  Vmax_MEK_activates_MAPK := 0.15*MEK_active_cyto;
  Vmax_PKA_activates_Raf := kcat_PKA_activates_Raf*PKA_cyto;
  Vmax_AC_active_AC_active := 8.5*AC_active_cyto_mem;
  Vmax_highKM_PDE := 8*PDE_high_km_cyto;
  Vmax_PKA_P_PTP := kcat_PKA_P_PTP*PKA_cyto;
  Vmax_AC_basal_AC_basal := 0.2*AC_cyto_mem;
  Vmax_grk_GRK := 1.72696e-4*GRK_cyto;
  Vmax_PKA_P_PDE := 10*PKA_cyto;
  Vmax_Raf_activates_MEK := 0.105*B_Raf_active_cyto;
  Vmax_PTP_PKA := kcat_PTP_PKA*PTP_PKA_cyto;
  Vmax_PTP := kcat_PTP*PTP_cyto;
  Vmax_PPase_MAPK := kcat_PPase_MAPK*PP2A_cyto;
  Vmax_pp2a_4_pp2a_4 := 5*PP_PDE_cyto;
  Vmax_pp_ptp := kcat_pp_ptp_pp_ptp*PTP_PP_cyto;
  Vmax_GRK_bg_GRK_bg := 0.002225122*GRK_bg_cyto;
  Vmax_PPase_mek := kcat_PPase_mek*PP2A_cyto;

  // Reactions:
  activate_Gs: iso_BAR_G_cyto_mem -> iso_BAR_cyto_mem + bg_cyto + G_a_s_cyto; (Kf_activate_Gs_activate_Gs*iso_BAR_G_cyto_mem - G_a_s_cyto*Kr_activate_Gs_activate_Gs*bg_cyto*iso_BAR_cyto_mem)*cyto_mem;
    activate_Gs_I = 0 pA_um_2; activate_Gs_netValence = 1 _one_;
  pde4_p: cAMP_cyto -> AMP_cyto; 0.001660539*Vmax_pde4_p_pde4_p*cAMP_cyto/(0.001660539*Km_pde4_p_pde4_p + 0.001660539*cAMP_cyto)*cyto;  // modifiers: PDE4_P_cyto
  PPase_Raf: B_Raf_active_cyto -> B_Raf_cyto; 0.001660539*B_Raf_active_cyto*Vmax_PPase_Raf/(0.001660539*B_Raf_active_cyto + 0.001660539*Km_PPase_Raf)*cyto;  // modifiers: PP2A_cyto
  iso_binds_BAR: BAR_cyto_mem + iso_extra -> iso_BAR_cyto_mem; (-(iso_BAR_cyto_mem*Kr_iso_binds_BAR) + BAR_cyto_mem*Kf_iso_binds_BAR*iso_extra)*cyto_mem;
    iso_binds_BAR_I = 0 pA_um_2; iso_binds_BAR_netValence = 1 _one_;
  PDE4: cAMP_cyto -> AMP_cyto; 0.001660539*Vmax_PDE4_PDE4*cAMP_cyto/(0.001660539*Km_PDE4_PDE4 + 0.001660539*cAMP_cyto)*cyto;  // modifiers: PDE4_cyto
  bg_binds_GRK: GRK_cyto + bg_cyto -> GRK_bg_cyto; (-(GRK_bg_cyto*Kr_bg_binds_GRK_bg_binds_GRK) + GRK_cyto*Kf_bg_binds_GRK_bg_binds_GRK*bg_cyto)*cyto;
  MEK_activates_MAPK: MAPK_cyto -> MAPK_active_cyto; 0.001660539*MAPK_cyto*Vmax_MEK_activates_MAPK/(0.001660539*Km_MEK_activates_MAPK + 0.001660539*MAPK_cyto)*cyto;  // modifiers: MEK_active_cyto
  PKA_activates_Raf: B_Raf_cyto -> B_Raf_active_cyto; 0.001660539*B_Raf_cyto*Vmax_PKA_activates_Raf/(0.001660539*B_Raf_cyto + 0.001660539*Km_PKA_activates_Raf)*cyto;  // modifiers: PKA_cyto
  AC_active: ATP_cyto -> cAMP_cyto; ATP_cyto*Vmax_AC_active_AC_active/(ATP_cyto + Km_AC_active_AC_active)*cyto_mem;  // modifiers: AC_active_cyto_mem
    AC_active_I = 0 pA_um_2; AC_active_netValence = 1 _one_;
  GTPase: G_a_s_cyto -> G_GDP_cyto; (G_a_s_cyto*Kf_GTPase_GTPase - G_GDP_cyto*Kr_GTPase_GTPase)*cyto;
  trimer: bg_cyto + G_GDP_cyto -> G_protein_cyto; (-(G_protein_cyto*Kr_trimer_trimer) + G_GDP_cyto*Kf_trimer_trimer*bg_cyto)*cyto;
  G_binds_iso_BAR: iso_BAR_cyto_mem + G_protein_cyto -> iso_BAR_G_cyto_mem; (-(iso_BAR_G_cyto_mem*Kr_G_binds_iso_BAR_G_binds_iso_BAR) + G_protein_cyto*Kf_G_binds_iso_BAR_G_binds_iso_BAR*iso_BAR_cyto_mem)*cyto_mem;
    G_binds_iso_BAR_I = 0 pA_um_2; G_binds_iso_BAR_netValence = 1 _one_;
  A2: c3_R2C2_cyto + cAMP_cyto -> PKA_cyto; (-(Kr_A2*PKA_cyto) + Kf_A2*c3_R2C2_cyto*cAMP_cyto)*cyto;
  highKM_PDE: cAMP_cyto -> AMP_cyto; 0.001660539*Vmax_highKM_PDE*cAMP_cyto/(0.001660539*Km_highKM_PDE + 0.001660539*cAMP_cyto)*cyto;  // modifiers: PDE_high_km_cyto
  PKA_P_PTP: PTP_cyto -> PTP_PKA_cyto; 0.001660539*PTP_cyto*Vmax_PKA_P_PTP/(0.001660539*Km_PKA_P_PTP + 0.001660539*PTP_cyto)*cyto;  // modifiers: PKA_cyto
  AC_activation: G_a_s_cyto + AC_cyto_mem -> AC_active_cyto_mem; (AC_cyto_mem*G_a_s_cyto*Kf_AC_activation_AC_activation - AC_active_cyto_mem*Kr_AC_activation_AC_activation)*cyto_mem;
    AC_activation_I = 0 pA_um_2; AC_activation_netValence = 1 _one_;
  AC_basal: ATP_cyto -> cAMP_cyto; ATP_cyto*Vmax_AC_basal_AC_basal/(ATP_cyto + Km_AC_basal_AC_basal)*cyto_mem;  // modifiers: AC_cyto_mem
    AC_basal_I = 0 pA_um_2; AC_basal_netValence = 1 _one_;
  B1: R2C2_cyto + cAMP_cyto -> c_R2C2_cyto; (Kf_B1*R2C2_cyto*cAMP_cyto - Kr_B1*c_R2C2_cyto)*cyto;
  GRK: iso_BAR_cyto_mem -> iso_BAR_p_cyto_mem; Vmax_grk_GRK*iso_BAR_cyto_mem/(Km_grk_GRK + iso_BAR_cyto_mem)*cyto_mem;  // modifiers: GRK_cyto
    GRK_I = 0 pA_um_2; GRK_netValence = 1 _one_;
  PKA_P_PDE: PDE4_cyto -> PDE4_P_cyto; 0.001660539*PDE4_cyto*Vmax_PKA_P_PDE/(0.001660539*Km_PKA_P_PDE + 0.001660539*PDE4_cyto)*cyto;  // modifiers: PKA_cyto
  Raf_activates_MEK: MEK_cyto -> MEK_active_cyto; 0.001660539*MEK_cyto*Vmax_Raf_activates_MEK/(0.001660539*Km_Raf_activates_MEK + 0.001660539*MEK_cyto)*cyto;  // modifiers: B_Raf_active_cyto
  PTP_PKA: MAPK_active_cyto -> MAPK_cyto; 0.001660539*MAPK_active_cyto*Vmax_PTP_PKA/(0.001660539*Km_PTP_PKA + 0.001660539*MAPK_active_cyto)*cyto;  // modifiers: PTP_PKA_cyto
  B2: c_R2C2_cyto + cAMP_cyto -> c2_R2C2_cyto; (-(Kr_B2*c2_R2C2_cyto) + Kf_B2*cAMP_cyto*c_R2C2_cyto)*cyto;
  PTP: MAPK_active_cyto -> MAPK_cyto; 0.001660539*MAPK_active_cyto*Vmax_PTP/(0.001660539*Km_PTP + 0.001660539*MAPK_active_cyto)*cyto;  // modifiers: PTP_cyto
  iso_binds_BAR_g: iso_extra + BAR_G_cyto_mem -> iso_BAR_G_cyto_mem; (-(iso_BAR_G_cyto_mem*Kr_iso_binds_BAR_g) + BAR_G_cyto_mem*Kf_iso_binds_BAR_g*iso_extra)*cyto_mem;
    iso_binds_BAR_g_I = 0 pA_um_2; iso_binds_BAR_g_netValence = 1 _one_;
  PPase_MAPK: MAPK_active_cyto -> MAPK_cyto; 0.001660539*MAPK_active_cyto*Vmax_PPase_MAPK/(0.001660539*Km_PPase_MAPK + 0.001660539*MAPK_active_cyto)*cyto;  // modifiers: PP2A_cyto
  pp2a_4: PDE4_P_cyto -> PDE4_cyto; 0.001660539*PDE4_P_cyto*Vmax_pp2a_4_pp2a_4/(0.001660539*Km_pp2a_4_pp2a_4 + 0.001660539*PDE4_P_cyto)*cyto;  // modifiers: PP_PDE_cyto
  pp_ptp: PTP_PKA_cyto -> PTP_cyto; 0.001660539*PTP_PKA_cyto*Vmax_pp_ptp/(0.001660539*Km_pp_ptp + 0.001660539*PTP_PKA_cyto)*cyto;  // modifiers: PTP_PP_cyto
  GRK_bg: iso_BAR_cyto_mem -> iso_BAR_p_cyto_mem; Vmax_GRK_bg_GRK_bg*iso_BAR_cyto_mem/(Km_GRK_bg_GRK_bg + iso_BAR_cyto_mem)*cyto_mem;  // modifiers: GRK_bg_cyto
    GRK_bg_I = 0 pA_um_2; GRK_bg_netValence = 1 _one_;
  G_binds_BAR: BAR_cyto_mem + G_protein_cyto -> BAR_G_cyto_mem; (BAR_cyto_mem*G_protein_cyto*Kf_G_binds_BAR_G_binds_BAR - BAR_G_cyto_mem*Kr_G_binds_BAR_G_binds_BAR)*cyto_mem;
    G_binds_BAR_I = 0 pA_um_2; G_binds_BAR_netValence = 1 _one_;
  PPase_mek: MEK_active_cyto -> MEK_cyto; 0.001660539*MEK_active_cyto*Vmax_PPase_mek/(0.001660539*Km_PPase_mek + 0.001660539*MEK_active_cyto)*cyto;  // modifiers: PP2A_cyto
  A1: c2_R2C2_cyto + cAMP_cyto -> c3_R2C2_cyto; (-(Kr_A1*c3_R2C2_cyto) + Kf_A1*c2_R2C2_cyto*cAMP_cyto)*cyto;

  // Unit definitions:
  unit molecules = item;
  unit um3 = (1e-6 metre)^3;
  unit um2 = (1e-6 metre)^2;
  unit um = 1e-6 metre;
  unit s = second;
  unit K = kelvin;
  unit _one_ = dimensionless;
  unit C_mol_1 = coulomb / mole;
  unit C_nmol_1 = coulomb / (1e-9 mole);
  unit molecules_pmol_1 = item / (1e-12 mole);
  unit _one_000000000 = 1e9 dimensionless;
  unit mV_C_K_1_mol_1 = 1e-3 volt * coulomb / (kelvin * mole);
  unit mV_V_1 = dimensionless;
  unit uM_um3_molecules_1 = 1e-6 mole * (1e-6 metre)^3 / (litre * item);
  unit pA_um_2 = 1e-12 ampere / (1e-6 metre)^2;
  unit s_1 = 1 / second;
  unit um6_s_1_molecules_2 = (1e-6 metre)^6 / (second * item^2);
  unit molecules_um_3 = item / (1e-6 metre)^3;
  unit molecules_um_3_s_1 = item / ((1e-6 metre)^3 * second);
  unit um3_s_1_molecules_1 = (1e-6 metre)^3 / (second * item);
  unit molecules_um_2_s_1 = item / ((1e-6 metre)^2 * second);
  unit molecules_um_2 = item / (1e-6 metre)^2;
end
