// SBML level 3 version 1
// Exported by VCell 7.3

model BioNetGen_CaMKII___Trimer___3_states___with_phosphatase_CaM_buffered()
  // BioNetGen CaMKII - Trimer - 3 states - with phosphatase_CaM buffered
  // model units - substance: molecules, time: s, volume: um3, area: um2, length: um, extent: molecules

  // Compartments:
  compartment cell = 50000 um3;

  // Species:
  substanceOnly species $PP1 in cell = 3.011071e7*PP1tot;
  substanceOnly species Kcu_Kou_Kou in cell = 0;
  substanceOnly species Kcu_Kcu_Kou in cell = 0;
  substanceOnly species Kcu_Kcu_Kcu in cell = 0;
  substanceOnly species Kcp_Kcu_Kou in cell = 0;
  substanceOnly species Kcp_Kcu_Kcu in cell = 0;
  substanceOnly species Kcp_Kou_Kou in cell = 0;
  substanceOnly species Kcp_Kcu_Kou1 in cell = 0;
  substanceOnly species Kcp_Kcp_Kcu in cell = 0;
  substanceOnly species Kcp_Kcp_Kou in cell = 0;
  substanceOnly species Kcp_Kcp_Kcp in cell = 0;
  substanceOnly species $C in cell = 3.011071e7*CaMtot;
  substanceOnly species Kou_Kou_Kou in cell = 1.00369e7*CaMKIItot;

  // Parameters:
  kon = 30 uM_1_s_1;
  koff = 2 s_1;
  rauto1 = 1 s_1;
  rauto2 = 0.5 s_1;
  kcat = 1 s_1;
  KmPP1 = 1 uM;
  CaMKIItot = 1 uM;
  CaMtot = 1 uM;
  PP1tot = 0 uM;
  InitialConc1 has uM;
  Group_AutoInhibitedCaMKII has uM;
  Group_PhosphoT286 has uM;
  Group_ActiveCaMKII has uM;
  Group_AllCaM has uM;
  Group_AllCaMKII has uM;
  FracAutoInhibited has _one_;
  FracPhosphoCaMKII has _one_;
  FracActiveCaMKII has _one_;
  T0 = 1 s;
  T1 = 1 s;
  N = 1 _one_;
  _T_ = 300 K;
  _PI_ = 3.141593 _one_;
  _F_ = 9.64853321e4 C_mol_1;
  _F_nmol_ = 9.64853321e-5 C_nmol_1;
  _N_pmol_ = 6.02214179e11 molecules_pmol_1;
  _K_GHK_ = 1e-9 _one_000000000;
  _R_ = 8314.463 mV_C_K_1_mol_1;
  K_millivolts_per_volt = 1000 mV_V_1;
  KMOLE = 0.001660539 uM_um3_molecules_1;

  // Assignment rules:
  InitialConc1 := 0.3333333*CaMKIItot;
  Group_AutoInhibitedCaMKII := 0.004981616*Kou_Kou_Kou + 0.003321078*Kcu_Kou_Kou + 0.001660539*Kcu_Kcu_Kou + 0.001660539*Kcp_Kcu_Kou + 0.003321078*Kcp_Kou_Kou + 0.001660539*Kcp_Kcu_Kou1 + 0.001660539*Kcp_Kcp_Kou;
  Group_PhosphoT286 := 0.001660539*Kcp_Kcu_Kou + 0.001660539*Kcp_Kcu_Kcu + 0.001660539*Kcp_Kou_Kou + 0.001660539*Kcp_Kcu_Kou1 + 0.003321078*Kcp_Kcp_Kcu + 0.003321078*Kcp_Kcp_Kou + 0.004981616*Kcp_Kcp_Kcp;
  Group_ActiveCaMKII := 0.001660539*Kcu_Kou_Kou + 0.003321078*Kcu_Kcu_Kou + 0.004981616*Kcu_Kcu_Kcu + 0.003321078*Kcp_Kcu_Kou + 0.004981616*Kcp_Kcu_Kcu + 0.001660539*Kcp_Kou_Kou + 0.003321078*Kcp_Kcu_Kou1 + 0.004981616*Kcp_Kcp_Kcu + 0.003321078*Kcp_Kcp_Kou + 0.004981616*Kcp_Kcp_Kcp;
  Group_AllCaM := 0.001660539*C + 0.001660539*Kcu_Kou_Kou + 0.003321078*Kcu_Kcu_Kou + 0.004981616*Kcu_Kcu_Kcu + 0.003321078*Kcp_Kcu_Kou + 0.004981616*Kcp_Kcu_Kcu + 0.001660539*Kcp_Kou_Kou + 0.003321078*Kcp_Kcu_Kou1 + 0.004981616*Kcp_Kcp_Kcu + 0.003321078*Kcp_Kcp_Kou + 0.004981616*Kcp_Kcp_Kcp;
  Group_AllCaMKII := 0.004981616*Kou_Kou_Kou + 0.004981616*Kcu_Kou_Kou + 0.004981616*Kcu_Kcu_Kou + 0.004981616*Kcu_Kcu_Kcu + 0.004981616*Kcp_Kcu_Kou + 0.004981616*Kcp_Kcu_Kcu + 0.004981616*Kcp_Kou_Kou + 0.004981616*Kcp_Kcu_Kou1 + 0.004981616*Kcp_Kcp_Kcu + 0.004981616*Kcp_Kcp_Kou + 0.004981616*Kcp_Kcp_Kcp;
  FracAutoInhibited := Group_AutoInhibitedCaMKII/CaMKIItot;
  FracPhosphoCaMKII := Group_PhosphoT286/CaMKIItot;
  FracActiveCaMKII := Group_ActiveCaMKII/CaMKIItot;

  // Reactions:
  R4: $C + Kcu_Kcu_Kou -> Kcu_Kcu_Kcu; (-(3*Kcu_Kcu_Kcu*koff) + 0.001660539*C*Kcu_Kcu_Kou*kon)*cell;
  R6: Kcu_Kcu_Kou -> Kcp_Kcu_Kou; Kcu_Kcu_Kou*rauto1*cell;
  R1: $C + Kou_Kou_Kou -> Kcu_Kou_Kou; (-(Kcu_Kou_Kou*koff) + 0.004981616*C*Kou_Kou_Kou*kon)*cell;
  R2: $C + Kcu_Kou_Kou -> Kcu_Kcu_Kou; (-(2*Kcu_Kcu_Kou*koff) + 0.003321078*C*Kcu_Kou_Kou*kon)*cell;
  R7: $C + Kcp_Kcu_Kou -> Kcp_Kcu_Kcu; (-(Kcp_Kcu_Kcu*koff) + 0.001660539*C*Kcp_Kcu_Kou*kon)*cell;
  R9: Kcp_Kcu_Kou -> $C + Kcp_Kou_Kou; (Kcp_Kcu_Kou*koff - 0.001660539*C*Kcp_Kou_Kou*kon)*cell;
  R10: Kcu_Kcu_Kcu -> Kcp_Kcu_Kcu; 3*Kcu_Kcu_Kcu*rauto1*cell;
  R11: $PP1 + Kcp_Kcu_Kou -> $PP1 + Kcu_Kcu_Kou; 0.001660539*Kcp_Kcu_Kou*PP1*kcat/(Group_PhosphoT286 + KmPP1)*cell;
  R13: $C + Kcp_Kou_Kou -> Kcp_Kcu_Kou1; (-(Kcp_Kcu_Kou1*koff) + 0.001660539*C*Kcp_Kou_Kou*kon)*cell;
  R15: Kcp_Kcu_Kcu -> $C + Kcp_Kcu_Kou1; (Kcp_Kcu_Kcu*koff - 0.001660539*C*Kcp_Kcu_Kou1*kon)*cell;
  R16: Kcp_Kcu_Kcu -> Kcp_Kcp_Kcu; Kcp_Kcu_Kcu*rauto1*cell;
  R17: Kcp_Kcu_Kcu -> Kcp_Kcp_Kcu; Kcp_Kcu_Kcu*rauto2*cell;
  R18: $PP1 + Kcp_Kcu_Kcu -> $PP1 + Kcu_Kcu_Kcu; 0.001660539*Kcp_Kcu_Kcu*PP1*kcat/(Group_PhosphoT286 + KmPP1)*cell;
  R19: $PP1 + Kcp_Kou_Kou -> $PP1 + Kcu_Kou_Kou; 0.001660539*Kcp_Kou_Kou*PP1*kcat/(Group_PhosphoT286 + KmPP1)*cell;
  R22: Kcp_Kcp_Kcu -> $C + Kcp_Kcp_Kou; (Kcp_Kcp_Kcu*koff - 0.001660539*C*Kcp_Kcp_Kou*kon)*cell;
  R23: Kcp_Kcu_Kou1 -> Kcp_Kcp_Kou; Kcp_Kcu_Kou1*rauto2*cell;
  R24: Kcp_Kcp_Kcu -> Kcp_Kcp_Kcp; Kcp_Kcp_Kcu*rauto2*cell;
  R25: $PP1 + Kcp_Kcu_Kou1 -> $PP1 + Kcu_Kcu_Kou; 0.001660539*Kcp_Kcu_Kou1*PP1*kcat/(Group_PhosphoT286 + KmPP1)*cell;
  R26: $PP1 + Kcp_Kcp_Kcu -> $PP1 + Kcp_Kcu_Kcu; 0.003321078*Kcp_Kcp_Kcu*PP1*kcat/(Group_PhosphoT286 + KmPP1)*cell;
  R28: $PP1 + Kcp_Kcp_Kou -> $PP1 + Kcp_Kcu_Kou1; 0.001660539*Kcp_Kcp_Kou*PP1*kcat/(Group_PhosphoT286 + KmPP1)*cell;
  R29: $PP1 + Kcp_Kcp_Kou -> $PP1 + Kcp_Kcu_Kou; 0.001660539*Kcp_Kcp_Kou*PP1*kcat/(Group_PhosphoT286 + KmPP1)*cell;
  R30: $PP1 + Kcp_Kcp_Kcp -> $PP1 + Kcp_Kcp_Kcu; 0.004981616*Kcp_Kcp_Kcp*PP1*kcat/(Group_PhosphoT286 + KmPP1)*cell;

  // Unit definitions:
  unit molecules = item;
  unit um3 = (1e-6 metre)^3;
  unit um2 = (1e-6 metre)^2;
  unit um = 1e-6 metre;
  unit s = second;
  unit uM_1_s_1 = litre / (1e-6 mole * second);
  unit s_1 = 1 / second;
  unit uM = 1e-6 mole / litre;
  unit _one_ = dimensionless;
  unit K = kelvin;
  unit C_mol_1 = coulomb / mole;
  unit C_nmol_1 = coulomb / (1e-9 mole);
  unit molecules_pmol_1 = item / (1e-12 mole);
  unit _one_000000000 = 1e9 dimensionless;
  unit mV_C_K_1_mol_1 = 1e-3 volt * coulomb / (kelvin * mole);
  unit mV_V_1 = dimensionless;
  unit uM_um3_molecules_1 = 1e-6 mole * (1e-6 metre)^3 / (litre * item);
end
