// SBML level 3 version 1
// Exported by VCell 7.3

model Sakata_JP2011_PHDGFP_VSP_PHD_GHF()
  // Sakata_JP2011-PHDGFP_VSP_PHD_GHF
  // model units - substance: molecules, time: s, volume: um3, area: um2, length: um, extent: molecules

  // Compartments:
  compartment Ex = 1e13 um3;
  compartment Cytosol = 523333333 um3;
  compartment M = 3140000 um2;  // 2-D

  // Species:
  substanceOnly species $PI5Phos_M in M = 125600;
  substanceOnly species PIP2_M in M = 7.06814e9;
  substanceOnly species $VSP_M in M = 3.14e11;
  substanceOnly species PHD_GFP_Cytosol in Cytosol = 9.454763e11;
  substanceOnly species $PI5K_M in M = 62800;
  substanceOnly species PHD_GFP_PIP2_M in M = 1.059122e10;
  substanceOnly species PIP_M in M = 1.413e10;

  // Parameters:
  N = 0 s_1;
  _T_ = 300 K;
  _PI_ = 3.141593 _one_;
  _F_ = 9.64853321e4 C_mol_1;
  _F_nmol_ = 9.64853321e-5 C_nmol_1;
  _N_pmol_ = 6.02214179e11 molecules_pmol_1;
  _K_GHK_ = 1e-9 _one_000000000;
  _R_ = 8314.463 mV_C_K_1_mol_1;
  K_millivolts_per_volt = 1000 mV_V_1;
  KMOLE = 0.001660539 uM_um3_molecules_1;
  Kf_dephos5P = 0 s_1;
  Kr_dephos5P = 0 s_1;
  Km_VSP_activity = 36 molecules_um_2;
  N_VSP_activity = 1 s_1;
  Vmax_VSP_activity has molecules_um_2_s_1;
  Kf_PHD_PIP2_binding = 0.001660539 um3_s_1_molecules_1;
  Kr_PHD_PIP2_binding = 2 s_1;

  // Assignment rules:
  Vmax_VSP_activity := 0.185*VSP_M*((t > 2) && (t < 7))*N_VSP_activity;

  // Reactions:
  dephos5P: PIP2_M -> PIP_M; (Kf_dephos5P*PIP2_M - Kr_dephos5P*PIP_M)*M;
    dephos5P_I = 0 pA_um_2; dephos5P_netValence = 1 _one_;
  VSP_activity: PIP2_M -> PIP_M; PIP2_M*Vmax_VSP_activity/(Km_VSP_activity + PIP2_M)*M;  // modifiers: VSP_M
    VSP_activity_I = 0 pA_um_2; VSP_activity_netValence = 1 _one_;
  PI5K_activity: PIP_M -> PIP2_M; PI5K_M*PIP_M*M;  // modifiers: PI5K_M
    PI5K_activity_I = 0 pA_um_2; PI5K_activity_netValence = 1 _one_;
  PHD_PIP2_binding: PHD_GFP_Cytosol + PIP2_M -> PHD_GFP_PIP2_M; (-(PHD_GFP_PIP2_M*Kr_PHD_PIP2_binding) + Kf_PHD_PIP2_binding*PHD_GFP_Cytosol*PIP2_M)*M;
    PHD_PIP2_binding_I = 0 pA_um_2; PHD_PIP2_binding_netValence = 1 _one_;

  // Unit definitions:
  unit molecules = item;
  unit um3 = (1e-6 metre)^3;
  unit um2 = (1e-6 metre)^2;
  unit um = 1e-6 metre;
  unit s = second;
  unit s_1 = 1 / second;
  unit K = kelvin;
  unit _one_ = dimensionless;
  unit C_mol_1 = coulomb / mole;
  unit C_nmol_1 = coulomb / (1e-9 mole);
  unit molecules_pmol_1 = item / (1e-12 mole);
  unit _one_000000000 = 1e9 dimensionless;
  unit mV_C_K_1_mol_1 = 1e-3 volt * coulomb / (kelvin * mole);
  unit mV_V_1 = dimensionless;
  unit uM_um3_molecules_1 = 1e-6 mole * (1e-6 metre)^3 / (litre * item);
  unit pA_um_2 = 1e-12 ampere / (1e-6 metre)^2;
  unit molecules_um_2 = item / (1e-6 metre)^2;
  unit molecules_um_2_s_1 = item / ((1e-6 metre)^2 * second);
  unit um3_s_1_molecules_1 = (1e-6 metre)^3 / (second * item);
end
