// SBML level 3 version 1
// Exported by VCell 7.3

model Greenwald_MIMB_2012___Fit_1_Application0()
  // Greenwald MIMB 2012 - Fit 1_Application0
  // model units - substance: molecules, time: s, volume: um3, area: um2, length: um, extent: molecules

  // Compartments:
  compartment Extra_Cellular = 50000 um3;
  compartment cytosol = 5000 um3;
  compartment Membrane = 1414 um2;  // 2-D

  // Species:
  substanceOnly species cAMP in cytosol = 0;
  substanceOnly species AKAR in cytosol = 3763839;
  substanceOnly species AC in cytosol = 150553.5;
  substanceOnly species RC in cytosol = 3011071;
  substanceOnly species A2R in cytosol = 0;
  substanceOnly species PDE in cytosol = 42154.99;
  substanceOnly species ARC in cytosol = 0;
  substanceOnly species ICUE_cAMP in cytosol = 0;
  substanceOnly species A2RC in cytosol = 0;
  substanceOnly species AKARp in cytosol = 0;
  substanceOnly species ICUE in cytosol = 451660.6;
  substanceOnly species PKAC in cytosol = 0;

  // Parameters:
  ICUE_ratio has _one_;
  AKAR_ratio has _one_;
  _T_ = 300 K;
  _PI_ = 3.141593 _one_;
  _F_ = 9.64853321e4 C_mol_1;
  _F_nmol_ = 9.64853321e-5 C_nmol_1;
  _N_pmol_ = 6.02214179e11 molecules_pmol_1;
  _K_GHK_ = 1e-9 _one_000000000;
  _R_ = 8314.463 mV_C_K_1_mol_1;
  K_millivolts_per_volt = 1000 mV_V_1;
  KMOLE = 0.001660539 uM_um3_molecules_1;
  Km_cAMP_synth = 860 uM;
  ATP_cAMP_synth = 5000 uM;
  Km_Iso_cAMP_synth = 315 uM;
  kcat_iso_cAMP_synth = 0.200273 s_1;
  Kd_iso_cAMP_synth = 0.1 uM;
  kfsk_cAMP_synth = 25.0451 s_1;
  Iso_stim_cAMP_synth = 1 uM;
  t_iso_cAMP_synth = 200 s;
  Kd_fsk_cAMP_synth = 860 uM;
  FSK_stim_cAMP_synth = 50 uM;
  t_FSK_cAMP_synth = 600 s;
  Vmax_cAMP_synth has uM_s_1;
  Vmax_Iso_cAMP_synth has uM_s_1;
  AC_iso_cAMP_synth has uM;
  Iso_cAMP_synth has uM;
  AC_fsk_cAMP_synth has uM;
  Fsk_cAMP_synth has uM;
  Kf_PKA_act = 4375 s_1;
  Kr_PKA_act = 1.660539 um3_s_1_molecules_1;
  Km_cAMP_deg = 785.8895 molecules_um_3;
  kcat_cAMP_deg = 5 s_1;
  Ki_cAMP_deg = 30 uM;
  t_IBMX_cAMP_deg = 600 s;
  IBMX_stim_cAMP_deg = 100 uM;
  Vmax_cAMP_deg has molecules_um_3_s_1;
  PDE_avail_cAMP_deg has uM;
  IBMX_cAMP_deg has uM;
  Kf_PKA_bind1 = 1.660539 um3_s_1_molecules_1;
  Kr_PKA_bind1 = 9140 s_1;
  kcat_AKAR_dephos = 8.5 uM_1_s_1;
  PPase_AKAR_dephos = 2.14 uM;
  Kf_PKA_bind2 = 1.660539 um3_s_1_molecules_1;
  Kr_PKA_bind2 = 1640 s_1;
  Kf_ICUE_bind = 0.05680587 um3_s_1_molecules_1;
  Kr_ICUE_bind = 10 s_1;
  Km_AKAR_phos = 12646.5 molecules_um_3;
  kcat_AKAR_phos = 54 s_1;
  Vmax_AKAR_phos has molecules_um_3_s_1;

  // Assignment rules:
  ICUE_ratio := 0.001660539*ICUE_cAMP/(0.001660539*ICUE + 0.001660539*ICUE_cAMP);
  AKAR_ratio := 0.001660539*AKARp/(0.001660539*AKAR + 0.001660539*AKARp);
  Vmax_cAMP_synth := kfsk_cAMP_synth*AC_fsk_cAMP_synth;
  Vmax_Iso_cAMP_synth := kcat_iso_cAMP_synth*AC_iso_cAMP_synth;
  AC_iso_cAMP_synth := 0.001660539*AC*Iso_cAMP_synth/(Kd_iso_cAMP_synth + Iso_cAMP_synth);
  Iso_cAMP_synth := Iso_stim_cAMP_synth*(t > t_iso_cAMP_synth);
  AC_fsk_cAMP_synth := 0.001660539*AC*Fsk_cAMP_synth/(Kd_fsk_cAMP_synth + Fsk_cAMP_synth);
  Fsk_cAMP_synth := FSK_stim_cAMP_synth*(t > t_FSK_cAMP_synth);
  Vmax_cAMP_deg := 602.214179*kcat_cAMP_deg*PDE_avail_cAMP_deg;
  PDE_avail_cAMP_deg := 0.001660539*PDE*Ki_cAMP_deg/(Ki_cAMP_deg + IBMX_cAMP_deg);
  IBMX_cAMP_deg := IBMX_stim_cAMP_deg*(t > t_IBMX_cAMP_deg);
  Vmax_AKAR_phos := kcat_AKAR_phos*PKAC;

  // Reactions:
  cAMP_synth: -> cAMP; (602.214179*ATP_cAMP_synth^2*Vmax_cAMP_synth + 602.214179*ATP_cAMP_synth*Km_Iso_cAMP_synth*Vmax_cAMP_synth + 602.214179*ATP_cAMP_synth^2*Vmax_Iso_cAMP_synth + 602.214179*ATP_cAMP_synth*Km_cAMP_synth*Vmax_Iso_cAMP_synth)/(ATP_cAMP_synth^2 + ATP_cAMP_synth*Km_cAMP_synth + ATP_cAMP_synth*Km_Iso_cAMP_synth + Km_cAMP_synth*Km_Iso_cAMP_synth)*cytosol;  // modifiers: AC
  PKA_act: A2RC -> A2R + PKAC; (A2RC*Kf_PKA_act - A2R*Kr_PKA_act*PKAC)*cytosol;
  cAMP_deg: cAMP -> ; 0.001660539*Vmax_cAMP_deg*cAMP/(0.001660539*Km_cAMP_deg + 0.001660539*cAMP)*cytosol;  // modifiers: PDE
  PKA_bind1: RC + cAMP -> ARC; (-(ARC*Kr_PKA_bind1) + Kf_PKA_bind1*RC*cAMP)*cytosol;
  AKAR_dephos: AKARp -> AKAR; AKARp*PPase_AKAR_dephos*kcat_AKAR_dephos*cytosol;
  PKA_bind2: ARC + cAMP -> A2RC; (-(A2RC*Kr_PKA_bind2) + ARC*Kf_PKA_bind2*cAMP)*cytosol;
  ICUE_bind: ICUE + cAMP -> ICUE_cAMP; (-(ICUE_cAMP*Kr_ICUE_bind) + ICUE*Kf_ICUE_bind*cAMP)*cytosol;
  AKAR_phos: AKAR -> AKARp; 0.001660539*AKAR*Vmax_AKAR_phos/(0.001660539*AKAR + 0.001660539*Km_AKAR_phos)*cytosol;  // modifiers: PKAC

  // Unit definitions:
  unit molecules = item;
  unit um3 = (1e-6 metre)^3;
  unit um2 = (1e-6 metre)^2;
  unit um = 1e-6 metre;
  unit s = second;
  unit _one_ = dimensionless;
  unit K = kelvin;
  unit C_mol_1 = coulomb / mole;
  unit C_nmol_1 = coulomb / (1e-9 mole);
  unit molecules_pmol_1 = item / (1e-12 mole);
  unit _one_000000000 = 1e9 dimensionless;
  unit mV_C_K_1_mol_1 = 1e-3 volt * coulomb / (kelvin * mole);
  unit mV_V_1 = dimensionless;
  unit uM_um3_molecules_1 = 1e-6 mole * (1e-6 metre)^3 / (litre * item);
  unit uM = 1e-6 mole / litre;
  unit s_1 = 1 / second;
  unit uM_s_1 = 1e-6 mole / (litre * second);
  unit um3_s_1_molecules_1 = (1e-6 metre)^3 / (second * item);
  unit molecules_um_3 = item / (1e-6 metre)^3;
  unit molecules_um_3_s_1 = item / ((1e-6 metre)^3 * second);
  unit uM_1_s_1 = litre / (1e-6 mole * second);
end
