// SBML level 3 version 1
// Exported by VCell 7.3

model PDGF_Src_March_2012_compartmental()
  // cloned from 'PDGF curvature paper' owned by user susana Cell (2008)
  // model units - substance: molecules, time: s, volume: um3, area: um2, length: um, extent: molecules

  // Compartments:
  compartment extra = 1 um3;
  compartment cyto = 9 um3;
  compartment cyto_mem = 1.8 um2;  // 2-D

  // Species:
  substanceOnly species PDGFR_cyto_mem in cyto_mem = 450;
  substanceOnly species PDGF_extra in extra = 602.214179;
  substanceOnly species PTP in cyto = 541.9928;
  substanceOnly species Csk_cyto_active in cyto = 0;
  substanceOnly species PDGF_PDGFR_Srccyto_mem in cyto_mem = 0;
  substanceOnly species Src_active_cyto in cyto = 0;
  substanceOnly species csk_cyto_inactive in cyto = 541.9928;
  substanceOnly species Src_cyto in cyto = 5419.928;
  substanceOnly species PDGF_PDGFR in cyto_mem = 0;

  // Parameters:
  n = 900 molecules_um_2_uM_1;
  _T_ = 300 K;
  _PI_ = 3.141593 _one_;
  _F_ = 9.64853321e4 C_mol_1;
  _F_nmol_ = 9.64853321e-5 C_nmol_1;
  _N_pmol_ = 6.02214179e11 molecules_pmol_1;
  _K_GHK_ = 1e-9 _one_000000000;
  _R_ = 8314.463 mV_C_K_1_mol_1;
  K_millivolts_per_volt = 1000 mV_V_1;
  KMOLE = 0.001660539 uM_um3_molecules_1;
  Kf_PDGF_binds_PDGFR = 0.001660539 um3_s_1_molecules_1;
  Kr_PDGF_binds_PDGFR = 0.01 s_1;
  Km_Src_activation = 0.1 molecules_um_2;
  Vmax_Src_activation has molecules_um_2_s_1;
  kcat_Src_activation has molecules_um_2_uM_1_s_1;
  Km_Src_dephosphorylation_in_cyto = 903.3213 molecules_um_3;
  Vmax_Src_dephosphorylation_in_cyto has molecules_um_3_s_1;
  Kf_r0 = 0.001 s_1;
  Kr_r0 = 0 s_1;
  Kf_Src_association_with_receptor = 0.001660539 um3_s_1_molecules_1;
  Kr_Src_association_with_receptor = 0.1 s_1;

  // Assignment rules:
  Vmax_Src_activation := 0.001660539*kcat_Src_activation*PTP;
  kcat_Src_activation := 0.01*n;
  Vmax_Src_dephosphorylation_in_cyto := 0.3*Csk_cyto_active;

  // Reactions:
  PDGF_binds_PDGFR: PDGFR_cyto_mem + PDGF_extra -> PDGF_PDGFR; (-(PDGF_PDGFR*Kr_PDGF_binds_PDGFR) + Kf_PDGF_binds_PDGFR*PDGFR_cyto_mem*PDGF_extra)*cyto_mem;
    PDGF_binds_PDGFR_I = 0 pA_um_2; PDGF_binds_PDGFR_netValence = 1 _one_;
  Src_activation: PDGF_PDGFR_Srccyto_mem -> Src_active_cyto; PDGF_PDGFR_Srccyto_mem*Vmax_Src_activation/(Km_Src_activation + PDGF_PDGFR_Srccyto_mem)*cyto_mem;  // modifiers: PTP
    Src_activation_I = 0 pA_um_2; Src_activation_netValence = 1 _one_;
  Src_dephosphorylation_in_cyto: Src_active_cyto -> Src_cyto; 0.001660539*Src_active_cyto*Vmax_Src_dephosphorylation_in_cyto/(0.001660539*Km_Src_dephosphorylation_in_cyto + 0.001660539*Src_active_cyto)*cyto;  // modifiers: Csk_cyto_active
  r0: csk_cyto_inactive -> Csk_cyto_active; (-(Csk_cyto_active*Kr_r0) + Kf_r0*csk_cyto_inactive)*cyto;
  Src_association_with_receptor: PDGF_PDGFR + Src_cyto -> PDGF_PDGFR_Srccyto_mem; (-(PDGF_PDGFR_Srccyto_mem*Kr_Src_association_with_receptor) + Kf_Src_association_with_receptor*PDGF_PDGFR*Src_cyto)*cyto_mem;
    Src_association_with_receptor_I = 0 pA_um_2; Src_association_with_receptor_netValence = 1 _one_;

  // Unit definitions:
  unit molecules = item;
  unit um3 = (1e-6 metre)^3;
  unit um2 = (1e-6 metre)^2;
  unit um = 1e-6 metre;
  unit s = second;
  unit molecules_um_2_uM_1 = item * litre / ((1e-6 metre)^2 * 1e-6 mole);
  unit K = kelvin;
  unit _one_ = dimensionless;
  unit C_mol_1 = coulomb / mole;
  unit C_nmol_1 = coulomb / (1e-9 mole);
  unit molecules_pmol_1 = item / (1e-12 mole);
  unit _one_000000000 = 1e9 dimensionless;
  unit mV_C_K_1_mol_1 = 1e-3 volt * coulomb / (kelvin * mole);
  unit mV_V_1 = dimensionless;
  unit uM_um3_molecules_1 = 1e-6 mole * (1e-6 metre)^3 / (litre * item);
  unit pA_um_2 = 1e-12 ampere / (1e-6 metre)^2;
  unit um3_s_1_molecules_1 = (1e-6 metre)^3 / (second * item);
  unit s_1 = 1 / second;
  unit molecules_um_2 = item / (1e-6 metre)^2;
  unit molecules_um_2_s_1 = item / ((1e-6 metre)^2 * second);
  unit molecules_um_2_uM_1_s_1 = item * litre / ((1e-6 metre)^2 * 1e-6 mole * second);
  unit molecules_um_3 = item / (1e-6 metre)^3;
  unit molecules_um_3_s_1 = item / ((1e-6 metre)^3 * second);
end
