// SBML level 3 version 1
// Exported by VCell 7.3

model PAGFP_Diffusion_COMPARTMENTAL_4Cell_01_Basic_1_2_3_4_system___PA5_006_2_()
  // PAGFP Diffusion COMPARTMENTAL_4Cell_01_Basic 1-2-3-4 system (PA5_006-2)
  // model units - substance: molecules, time: s, volume: um3, area: um2, length: um, extent: molecules

  // Compartments:
  compartment Cytoplasm = 1000 um3;

  // Species:
  substanceOnly species GFP_3_Cytoplasm in Cytoplasm = 0;
  substanceOnly species GFP_4_Cytoplasm in Cytoplasm = 0;
  substanceOnly species GFP_1_Cytoplasm in Cytoplasm = 602214.2;
  substanceOnly species GFP_2_Cytoplasm in Cytoplasm = 0;

  // Parameters:
  deff = 25;
  pi = 3.1415927;
  l = 0.46;
  _T_ = 300 K;
  _PI_ = 3.141593 _one_;
  _F_ = 9.64853321e4 C_mol_1;
  _F_nmol_ = 9.64853321e-5 C_nmol_1;
  _N_pmol_ = 6.02214179e11 molecules_pmol_1;
  _K_GHK_ = 1e-9 _one_000000000;
  _R_ = 8314.463 mV_C_K_1_mol_1;
  K_millivolts_per_volt = 1000 mV_V_1;
  KMOLE = 0.001660539 uM_um3_molecules_1;
  r_RC1 = 0.1;
  perm_RC1 has um_s_1;
  r_RC2 = 0.1;
  perm_RC2 has um_s_1;
  r_RC3 = 0.1;
  perm_RC3 has um_s_1;

  // Assignment rules:
  corr_RC1 := 0.9016 - 0.1378*ln(perm_RC1);
  perm_RC1 := deff*pi*r_RC1^2/l;
  corr_RC2 := 0.9016 - 0.1378*ln(perm_RC2);
  perm_RC2 := deff*pi*r_RC2^2/l;
  corr_RC3 := 0.9016 - 0.1378*ln(perm_RC3);
  perm_RC3 := deff*pi*r_RC3^2/l;

  // Reactions:
  RC1: GFP_1_Cytoplasm -> GFP_2_Cytoplasm; perm_RC1*corr_RC1*(0.001660539*GFP_1_Cytoplasm - 0.001660539*GFP_2_Cytoplasm)/KMOLE;
  RC2: GFP_2_Cytoplasm -> GFP_3_Cytoplasm; perm_RC2*corr_RC2*(0.001660539*GFP_2_Cytoplasm - 0.001660539*GFP_3_Cytoplasm)/KMOLE;
  RC3: GFP_3_Cytoplasm -> GFP_4_Cytoplasm; perm_RC3*corr_RC3*(0.001660539*GFP_3_Cytoplasm - 0.001660539*GFP_4_Cytoplasm)/KMOLE;

  // Unit definitions:
  unit molecules = item;
  unit um3 = (1e-6 metre)^3;
  unit um2 = (1e-6 metre)^2;
  unit um = 1e-6 metre;
  unit s = second;
  unit K = kelvin;
  unit _one_ = dimensionless;
  unit C_mol_1 = coulomb / mole;
  unit C_nmol_1 = coulomb / (1e-9 mole);
  unit molecules_pmol_1 = item / (1e-12 mole);
  unit _one_000000000 = 1e9 dimensionless;
  unit mV_C_K_1_mol_1 = 1e-3 volt * coulomb / (kelvin * mole);
  unit mV_V_1 = dimensionless;
  unit uM_um3_molecules_1 = 1e-6 mole * (1e-6 metre)^3 / (litre * item);
  unit um_s_1 = 1e-6 metre / second;
end
