// SBML level 3 version 1
// Exported by VCell 7.3

model Song_PNAS_2013_Application0()
  // model units - substance: molecules, time: s, volume: um3, area: um2, length: um, extent: molecules

  // Compartments:
  compartment IC = 7000 um3;
  compartment EC = 7100 um3;
  compartment ER = 500 um3;
  compartment PM = 21000 um2;  // 2-D
  compartment ER_Membrane = 1500 um2;  // 2-D

  // Species:
  substanceOnly species BDNF in EC = 0;
  substanceOnly species CaM_Ca4 in IC = 0;
  substanceOnly species PDE2_IBMX in IC = 0;
  substanceOnly species Gap in IC = 42154.99;
  substanceOnly species R2C2_cAMP3 in IC = 0;
  substanceOnly species SoS_Pi_Grb2 in IC = 0;
  substanceOnly species PDE4_ERK_PKA in IC = 0;
  substanceOnly species Gby in PM = 0;
  substanceOnly species R2C2_cAMP in IC = 0;
  substanceOnly species AC5_Ga in PM = 0;
  substanceOnly species D1LR_Gqby in PM = 0;
  substanceOnly species PP1 in IC = 1053875;
  substanceOnly species DARPP32_Pi_PP1 in IC = 0;
  substanceOnly species I1_Pi_PP1 in IC = 0;
  substanceOnly species PDE4_ERK in IC = 0;
  substanceOnly species $AMPAR_Bulk in IC = 46838.41;
  substanceOnly species GluR1_Membrane in PM = 0;
  substanceOnly species Gqby in PM = 420000;
  substanceOnly species PLC in PM = 420000;
  substanceOnly species PLC_Ca in PM = 0;
  substanceOnly species PLC_Ca_Gq in PM = 0;
  substanceOnly species IP3_degraded in IC = 0;
  substanceOnly species IP3_14 in IC = 0;
  substanceOnly species IP3R in ER_Membrane = 150000;
  substanceOnly species AC_basal in PM = 247800;
  substanceOnly species G_by in PM = 0;
  substanceOnly species Gq_GDP in PM = 0;
  substanceOnly species PKC_active in IC = 210775;
  substanceOnly species PP2A in IC = 843099.9;
  substanceOnly species Da_D5R in PM = 0;
  substanceOnly species PP1_PDE in IC = 421549.9;
  substanceOnly species cAMP in IC = 0;
  substanceOnly species Gaby in PM = 2100000;
  substanceOnly species U0126 in IC = 0;
  substanceOnly species DARPP32 in IC = 2107750;
  substanceOnly species Rolipram in IC = 0;
  substanceOnly species Da_D5R_Gaby in PM = 0;
  substanceOnly species AC5 in PM = 945000;
  substanceOnly species R2C_cAMP4 in IC = 0;
  substanceOnly species PDE3_IBMX in IC = 0;
  substanceOnly species R2_cAMP4 in IC = 0;
  substanceOnly species BDNF_TrkB in PM = 0;
  substanceOnly species AC5_Fsk in PM = 0;
  substanceOnly species STEP_PKA in IC = 0;
  substanceOnly species BRaf_Pi in IC = 0;
  substanceOnly species D1R_Gaby in PM = 0;
  substanceOnly species Gq_GTP in PM = 0;
  substanceOnly species PDE1_CaM_Ca4 in IC = 0;
  substanceOnly species GluR1_845_818 in IC = 0;
  substanceOnly species Raf in IC = 1.26465e7;
  substanceOnly species IBMX in IC = 0;
  substanceOnly species PDEbg in IC = 1.26465e7;
  substanceOnly species PKA_active in IC = 0;
  substanceOnly species PDE1_IBMX in IC = 0;
  substanceOnly species TrkB in PM = 4200000;
  substanceOnly species GluR1_degraded in IC = 0;
  substanceOnly species GluR1 in IC = 0;
  substanceOnly species MEK_Ser in IC = 0;
  substanceOnly species IP3R_open in ER_Membrane = 0;
  substanceOnly species ERK_Tyr in IC = 0;
  substanceOnly species D1LR in PM = 420000;
  substanceOnly species Da in EC = 0;
  substanceOnly species SERCA in ER_Membrane = 375000;
  substanceOnly species SERCA_active in ER_Membrane = 0;
  substanceOnly species IP3_5pase1 in IC = 5.058599e7;
  substanceOnly species PLC_Gq in PM = 0;
  substanceOnly species PDE4_PKA in IC = 0;
  substanceOnly species MEK in IC = 758789.9;
  substanceOnly species Ga_GDP in PM = 0;
  substanceOnly species CaM in IC = 8430999;
  substanceOnly species Fsk in EC = 0;
  substanceOnly species Four1N in IC = 42154.99;
  substanceOnly species PDE4_IBMX in IC = 0;
  substanceOnly species D5R_Gaby in PM = 0;
  substanceOnly species BDNF_TrkB2 in PM = 0;
  substanceOnly species I1_Pi in IC = 0;
  substanceOnly species ERK in IC = 1517580;
  substanceOnly species Ga_GTP in PM = 0;
  substanceOnly species PDE4_Rolipram in IC = 0;
  substanceOnly species PKA_Inhibitor in IC = 1053875;
  substanceOnly species CaMKII_286_CaM in IC = 0;
  substanceOnly species Ras_GDP in IC = 1.26465e7;
  substanceOnly species MEK_inhibited in IC = 0;
  substanceOnly species R2C2_cAMP4 in IC = 0;
  substanceOnly species Ras_Raf_active in IC = 0;
  substanceOnly species Da_D1R_Gaby in PM = 0;
  substanceOnly species SoS_Grb2 in IC = 0;
  substanceOnly species $ATP in IC = 8.430999e9;
  substanceOnly species GluR1_845 in IC = 0;
  substanceOnly species IP3_5Pase2 in IC = 1951776;
  substanceOnly species Shc in IC = 4215499;
  substanceOnly species Ras_GTP in IC = 0;
  substanceOnly species R2C2 in IC = 2107750;
  substanceOnly species D1R in PM = 2100000;
  substanceOnly species $PIP2 in PM = 2100000;
  substanceOnly species Da_D1LR_Gqby in PM = 0;
  substanceOnly species Int_TrkB2 in PM = 0;
  substanceOnly species CaMKII in IC = 8430999;
  substanceOnly species BRaf in IC = 758789.9;
  substanceOnly species R2C2_cAMP2 in IC = 0;
  substanceOnly species PDE1 in IC = 4215499;
  substanceOnly species CaM_Ca2 in IC = 0;
  substanceOnly species PDE2 in IC = 4215499;
  substanceOnly species BDNF_TrkB2_Pi in IC = 0;
  substanceOnly species ERK_active in IC = 0;
  substanceOnly species Shc_Pi in IC = 0;
  substanceOnly species DAG in PM = 0;
  substanceOnly species IP3_145 in IC = 0;
  substanceOnly species MEK_active in IC = 0;
  substanceOnly species AMP in IC = 0;
  substanceOnly species Grb2 in IC = 4215499;
  substanceOnly species STEP in IC = 843099.9;
  substanceOnly species PDE3 in IC = 21077.5;
  substanceOnly species Calcium in IC = 337239.9;
  substanceOnly species CaMKII_CaM in IC = 0;
  substanceOnly species SoS in IC = 4215499;
  substanceOnly species PDE4 in IC = 1686200;
  substanceOnly species CaMKII_286 in IC = 0;
  substanceOnly species Da_D1R in PM = 0;
  substanceOnly species SoS_Pi in IC = 0;
  substanceOnly species D5R in PM = 210000;
  substanceOnly species PKA_inhibited in IC = 0;
  substanceOnly species CaM_Ca3 in IC = 0;
  substanceOnly species $Calcium_ER in ER = 2.709964e8;
  substanceOnly species GluR1_Membrane_dephosphorylated1 in PM = 0;
  substanceOnly species I1 in IC = 2866539;
  substanceOnly species Da_D1LR in PM = 0;
  substanceOnly species DARPP32_Pi in IC = 0;
  substanceOnly species Shc_Pi_SoS_Grb2 in IC = 0;
  substanceOnly species PP2A_DI in IC = 468384.1;

  // Parameters:
  _T_ = 300 K;
  _PI_ = 3.141593 _one_;
  _F_ = 9.64853321e4 C_mol_1;
  _F_nmol_ = 9.64853321e-5 C_nmol_1;
  _N_pmol_ = 6.02214179e11 molecules_pmol_1;
  _K_GHK_ = 1e-9 _one_000000000;
  _R_ = 8314.463 mV_C_K_1_mol_1;
  K_millivolts_per_volt = 1000 mV_V_1;
  KMOLE = 0.001660539 uM_um3_molecules_1;
  Kf_091 = 0.0007721505 um3_s_1_molecules_1;
  Kr_091 = 10 s_1;
  Kf_005 = 0.001 s_1;
  Kr_005 = 0.001 s_1;
  Kcat_r44 = 10 s_1;
  Kf_r19 = 0.01328431 um3_s_1_molecules_1;
  Kr_r19 = 0.8 s_1;
  Kf_r20 = 0.005529594 um3_s_1_molecules_1;
  Kr_r20 = 10 s_1;
  Km_r40 = 10839.86 molecules_um_3;
  Kcat_r40 = 10.667 s_1;
  Vmax_r40 has molecules_um_3_s_1;
  Km_057 = 222.8192 molecules_um_3;
  Kcat_057 = 6.7 s_1;
  Vmax_057 has molecules_um_3_s_1;
  Kf_r28 = 20 s_1;
  Kr_r28 = 0 um4_s_1_molecules_2;
  Kf_087 = 60 s_1;
  Kr_087 = 0.0298897 um3_s_1_molecules_1;
  Kf_r10 = 0.001660539 um3_s_1_molecules_1;
  Kr_r10 = 0.019 s_1;
  Kf_r7 = 4.317401e-5 um3_s_1_molecules_1;
  Kr_r7 = 1 s_1;
  Kf_r21 = 0.01328431 um3_s_1_molecules_1;
  Kr_r21 = 0.8 s_1;
  Km_096 = 3071.292 molecules_um_3;
  Kcat_096 = 0.35 s_1;
  Vmax_096 has molecules_um_3_s_1;
  Km_056 = 1445.314 molecules_um_3;
  Kcat_056 = 2.7 s_1;
  Vmax_056 has molecules_um_3_s_1;
  Km_036 = 27.88011 molecules_um_3;
  Kcat_036 = 0.15 s_1;
  Vmax_036 has molecules_um_3_s_1;
  Kf_064 = 0.001843198 um3_s_1_molecules_1;
  Kr_064 = 10 s_1;
  Km_r52 = 54199.28 molecules_um_3;
  Kcat_r52 = 20 s_1;
  Vmax_r52 has molecules_um_3_s_1;
  Km_078 = 1083.986 molecules_um_3;
  Kcat_078 = 8 s_1;
  Vmax_078 has molecules_um_3_s_1;
  Kf_103 = 2.97798e-8 um4_s_1_molecules_1;
  Kr_103 = 0.008 s_1;
  Kf_073 = 100 um2_s_1_molecules_1;
  Kr_073 = 0 s_1;
  Kf_r38 = 2.5 s_1;
  Kr_r38 = 0 s_1;
  Km_r12 = 180.6643 molecules_um_3;
  Kcat_r12 = 30 s_1;
  Vmax_r12 has molecules_um_3_s_1;
  Kf_r6 = 0.01328431 um3_s_1_molecules_1;
  Kr_r6 = 0.8 s_1;
  Kf_100 = 0.018 s_1;
  Kr_100 = 1 s_1;
  Kf_r0 = 20 s_1;
  Kr_r0 = 0 um4_s_1_molecules_2;
  Kf_r11 = 0.001660539 um3_s_1_molecules_1;
  Kr_r11 = 0.019 s_1;
  Km_r3 = 12113.48 molecules_um_3;
  Kcat_r3 = 7 s_1;
  Vmax_r3 has molecules_um_2_s_1;
  Km_r55 = 4817.713 molecules_um_3;
  Kcat_r55 = 1 s_1;
  Vmax_r55 has molecules_um_3_s_1;
  Km_011 = 501.8311 molecules_um_3;
  Vmax_011 has molecules_um_3_s_1;
  Km_012 = 15441.37 molecules_um_3;
  Vmax_012 has molecules_um_3_s_1;
  Km_097 = 3071.292 molecules_um_3;
  Kcat_097 = 0.35 s_1;
  Vmax_097 has molecules_um_3_s_1;
  Kf_071 = 0.6 um2_s_1_molecules_1;
  Kr_071 = 0.001 s_1;
  Kf_002 = 1 um2_s_1_molecules_1;
  Kr_002 = 0.02 s_1;
  Kf_r35 = 0.001660539 um3_s_1_molecules_1;
  Kr_r35 = 1 s_1;
  Km_023 = 608.4772 molecules_um_3;
  Vmax_023 has molecules_um_3_s_1;
  Kf_001 = 0.001660539 um3_s_1_molecules_1;
  Kr_001 = 0.05 s_1;
  Kf_r36 = 0.094 s_1;
  Kr_r36 = 0 um2_s_1_molecules_1;
  Kf_084 = 0.1245404 um3_s_1_molecules_1;
  Kr_084 = 110 s_1;
  Kf_098 = 0.0001660539 um3_s_1_molecules_1;
  Kr_098 = 1 s_1;
  Kf_r26 = 0.001843198 um3_s_1_molecules_1;
  Kr_r26 = 10 s_1;
  Km_081 = 23897.67 molecules_um_3;
  Kcat_081 = 10 s_1;
  Vmax_081 has molecules_um_3_s_1;
  Kf_104 = 0.0008 s_1;
  Kr_104 = 0 um4_s_1_molecules_1;
  Km_077 = 1083.986 molecules_um_3;
  Kcat_077 = 10 s_1;
  Vmax_077 has molecules_um_3_s_1;
  Km_032 = 9428.867 molecules_um_3;
  Kcat_032 = 6 s_1;
  Vmax_032 has molecules_um_3_s_1;
  Kf_008 = 4.151347e-5 um3_s_1_molecules_1;
  Kr_008 = 0.0168 s_1;
  Kf_006 = 0.0001 s_1;
  Kr_006 = 0 s_1;
  Kf_r27 = 0.6 um2_s_1_molecules_1;
  Kr_r27 = 0.001 s_1;
  Km_046 = 4817.713 molecules_um_3;
  Kcat_046 = 5 s_1;
  Vmax_046 has molecules_um_3_s_1;
  Km_060 = 4516.606 molecules_um_3;
  Kcat_060 = 6 s_1;
  Vmax_060 has molecules_um_3_s_1;
  Km_018 = 304.1483 molecules_um_3;
  Vmax_018 has molecules_um_3_s_1;
  Km_r48 = 1083.986 molecules_um_3;
  Kcat_r48 = 0.01 s_1;
  Vmax_r48 has molecules_um_3_s_1;
  Km_045 = 4516.606 molecules_um_3;
  Kcat_045 = 3 s_1;
  Vmax_045 has molecules_um_3_s_1;
  Kf_075 = 38.5 um2_s_1_molecules_1;
  Kr_075 = 50 s_1;
  Kf_009 = 0.001 s_1;
  Kr_009 = 0 s_1;
  Km_r50 = 18066.43 molecules_um_3;
  Kcat_r50 = 12 s_1;
  Vmax_r50 has molecules_um_3_s_1;
  Kf_004 = 1.660539e-7 um_s_1;
  Kr_004 = 0 s_1;
  Km_r56 = 585.021 molecules_um_3;
  Kcat_r56 = 0.17 s_1;
  Vmax_r56 has molecules_um_3_s_1;
  Kf_r37 = 0.04981616 um3_s_1_molecules_1;
  Kr_r37 = 1 s_1;
  Km_r32 = 5 molecules_um_2;
  Kcat_r32 = 48 s_1;
  Vmax_r32 has molecules_um_2_s_1;
  Kf_007 = 0.0008302694 um3_s_1_molecules_1;
  Kr_007 = 0.1 s_1;
  Km_106 = 4516.727 molecules_um_3;
  Kcat_106 = 6 s_1;
  Vmax_106 has molecules_um_3_s_1;
  Kf_r29 = 100 um2_s_1_molecules_1;
  Kr_r29 = 0 s_1;
  Kf_067 = 0.005529594 um3_s_1_molecules_1;
  Kr_067 = 10 s_1;
  Kf_088 = 0.09963233 um3_s_1_molecules_1;
  Kr_088 = 1 s_1;
  Kf_r24 = 0.01328431 um3_s_1_molecules_1;
  Kr_r24 = 0.8 s_1;
  Km_r31 = 5 molecules_um_2;
  Kcat_r31 = 75 s_1;
  Vmax_r31 has molecules_um_2_s_1;
  Kf_r22 = 0.01328431 um3_s_1_molecules_1;
  Kr_r22 = 0.8 s_1;
  Kf_r34 = 0.25 um2_s_1_molecules_1;
  Kr_r34 = 0.003 s_1;
  Kf_010 = 4.151347e-5 um3_s_1_molecules_1;
  Kr_010 = 0.0168 s_1;
  Kf_r18 = 0.1660539 um3_s_1_molecules_1;
  Kr_r18 = 0.2 s_1;
  Km_r1 = 189697.5 molecules_um_3;
  Kcat_r1 = 8.5 s_1;
  Vmax_r1 has molecules_um_2_s_1;
  Km_r49 = 463.7049 molecules_um_3;
  Kcat_r49 = 0.636 s_1;
  Vmax_r49 has molecules_um_3_s_1;
  Kf_105 = 3.6e-5 s_1;
  Kr_105 = 0 um_s_1;
  Km_034 = 95.80625 molecules_um_3;
  Kcat_034 = 0.18 s_1;
  Vmax_034 has molecules_um_3_s_1;
  Km_063 = 9428.867 molecules_um_3;
  Kcat_063 = 6 s_1;
  Vmax_063 has molecules_um_3_s_1;
  Kf_r47 = 10 s_1;
  Kr_r47 = 0 um3_s_1_molecules_1;
  Km_095 = 68411.53 molecules_um_3;
  Kcat_095 = 0.5 s_1;
  Vmax_095 has molecules_um_3_s_1;
  Kf_065 = 0.06 um2_s_1_molecules_1;
  Kr_065 = 0.0003 s_1;
  Kf_r51 = 0.01328431 um3_s_1_molecules_1;
  Kr_r51 = 0.8 s_1;
  Km_029 = 95.80625 molecules_um_3;
  Vmax_029 has molecules_um_3_s_1;
  Kf_089 = 0.000198532 um6_s_1_molecules_2;
  Kr_089 = 72 s_1;
  Kf_r43 = 8.867277e-7 um_s_1;
  Kr_r43 = 8.867277e-7 um_s_1;
  Kf_r53 = 0.2490808 um3_s_1_molecules_1;
  Kr_r53 = 0.1 s_1;
  Km_r33 = 19.8413 molecules_um_2;
  Kcat_r33 = 10 s_1;
  Vmax_r33 has molecules_um_2_s_1;
  Kf_082 = 0.08966909 um3_s_1_molecules_1;
  Kr_082 = 33 s_1;
  Km_040 = 15441.37 molecules_um_3;
  Kcat_040 = 1 s_1;
  Vmax_040 has molecules_um_3_s_1;
  Kf_r9 = 0.001660539 um3_s_1_molecules_1;
  Kr_r9 = 0.019 s_1;
  Km_052 = 4516.606 molecules_um_3;
  Kcat_052 = 0.1 s_1;
  Vmax_052 has molecules_um_3_s_1;
  Kf_070 = 0.005529594 um3_s_1_molecules_1;
  Kr_070 = 1 s_1;
  Kf_r30 = 10 s_1;
  Kr_r30 = 0 s_1;
  Kf_069 = 0.06 um2_s_1_molecules_1;
  Kr_069 = 0.0003 s_1;
  Km_079 = 1083.986 molecules_um_3;
  Kcat_079 = 27 s_1;
  Vmax_079 has molecules_um_3_s_1;
  Km_r4 = 620280.6 molecules_um_3;
  Kcat_r4 = 0.2 s_1;
  Vmax_r4 has molecules_um_2_s_1;
  Km_037 = 27.88011 molecules_um_3;
  Kcat_037 = 0.15 s_1;
  Vmax_037 has molecules_um_3_s_1;
  Kf_016 = 0.009963233 um3_s_1_molecules_1;
  Kr_016 = 1 s_1;
  Kf_074 = 10 s_1;
  Kr_074 = 0 s_1;
  Kf_093 = 1.660539 um3_s_1_molecules_1;
  Kr_093 = 0.1 s_1;
  Kf_r54 = 1 s_1;
  Kr_r54 = 0 um3_s_1_molecules_1;
  Km_080 = 23907.9 molecules_um_3;
  Kcat_080 = 1.667 s_1;
  Vmax_080 has molecules_um_3_s_1;
  Kf_072 = 20 s_1;
  Kr_072 = 0 um4_s_1_molecules_2;
  Km_049 = 15441.37 molecules_um_3;
  Kcat_049 = 0.1 s_1;
  Vmax_049 has molecules_um_3_s_1;
  Kf_r16 = 0.001660539 um3_s_1_molecules_1;
  Kr_r16 = 0.03 s_1;
  Km_r39 = 1806.643 molecules_um_3;
  Kcat_r39 = 1.1 s_1;
  Vmax_r39 has molecules_um_3_s_1;
  Kf_068 = 0.001843198 um3_s_1_molecules_1;
  Kr_068 = 1 s_1;
  Km_047 = 283.0407 molecules_um_3;
  Kcat_047 = 10 s_1;
  Vmax_047 has molecules_um_3_s_1;
  Kf_r5 = 0.01328431 um3_s_1_molecules_1;
  Kr_r5 = 0.8 s_1;
  Km_044 = 5419.928 molecules_um_3;
  Kcat_044 = 0.1 s_1;
  Vmax_044 has molecules_um_3_s_1;
  Kf_083 = 0.08966909 um3_s_1_molecules_1;
  Kr_083 = 33 s_1;
  Kf_090 = 0.00597794 um3_s_1_molecules_1;
  Kr_090 = 10 s_1;
  J0_r45 = 0.8 uM_1_s_1;
  Kc_r45 = 4.69 uM;
  Km_028 = 95.80625 molecules_um_3;
  Vmax_028 has molecules_um_3_s_1;
  Kf_094 = 0.003 s_1;
  Kr_094 = 0 s_1;
  Kf_003 = 0.02 s_1;
  Kr_003 = 0 um_s_1;
  Km_035 = 95.80625 molecules_um_3;
  Kcat_035 = 0.18 s_1;
  Vmax_035 has molecules_um_3_s_1;
  Km_033 = 9428.867 molecules_um_3;
  Kcat_033 = 6 s_1;
  Vmax_033 has molecules_um_3_s_1;
  Kf_r14 = 0.001660539 um3_s_1_molecules_1;
  Kr_r14 = 0.03 s_1;
  Kf_r15 = 0.001660539 um3_s_1_molecules_1;
  Kr_r15 = 0.03 s_1;
  Km_108 = 585.021 molecules_um_3;
  Kcat_108 = 0.17 s_1;
  Vmax_108 has molecules_um_3_s_1;
  Km_r57 = 19873.07 molecules_um_3;
  Kcat_r57 = 4 s_1;
  Vmax_r57 has molecules_um_3_s_1;
  Kf_r8 = 0.001660539 um3_s_1_molecules_1;
  Kr_r8 = 0.019 s_1;
  Kf_r23 = 0.01328431 um3_s_1_molecules_1;
  Kr_r23 = 0.8 s_1;
  Kf_r13 = 0.06 um2_s_1_molecules_1;
  Kr_r13 = 0.0003 s_1;
  Km_061 = 9635.427 molecules_um_3;
  Kcat_061 = 2 s_1;
  Vmax_061 has molecules_um_3_s_1;
  Kf_066 = 0.6 um2_s_1_molecules_1;
  Kr_066 = 0.001 s_1;
  Kf_014 = 0.0001 s_1;
  Kr_014 = 0 s_1;
  Km_r17 = 0.97145 molecules_um_2;
  Kcat_r17 = 0.17 molecules_um_2_uM_1_s_1;
  Vmax_r17 has molecules_um_2_s_1;
  Km_062 = 4516.606 molecules_um_3;
  Kcat_062 = 3 s_1;
  Vmax_062 has molecules_um_3_s_1;
  Kf_099 = 0.1 s_1;
  Kr_099 = 0 s_1;
  Km_r25 = 189697.5 molecules_um_3;
  Kcat_r25 = 8.5 s_1;
  Vmax_r25 has molecules_um_2_s_1;
  Kf_086 = 60 s_1;
  Kr_086 = 0.0298897 um3_s_1_molecules_1;
  Kf_r41 = 4.578751e-9 um9_s_1_molecules_3;
  Kr_r41 = 2.7 s_1;
  Km_048 = 4817.713 molecules_um_3;
  Kcat_048 = 5 s_1;
  Vmax_048 has molecules_um_3_s_1;
  Km_043 = 277.0185 molecules_um_3;
  Kcat_043 = 1.06 s_1;
  Vmax_043 has molecules_um_3_s_1;
  Kf_085 = 0.1245404 um3_s_1_molecules_1;
  Kr_085 = 32.5 s_1;
  Kf_092 = 0.08302694 um3_s_1_molecules_1;
  Kr_092 = 5 s_1;
  Km_041 = 3613.285 molecules_um_3;
  Kcat_041 = 5 s_1;
  Vmax_041 has molecules_um_3_s_1;

  // Assignment rules:
  Vmax_r40 := Kcat_r40*IP3_5Pase2;
  Vmax_057 := Kcat_057*PP2A_DI;
  Vmax_096 := Kcat_096*PP1;
  Vmax_056 := Kcat_056*PKA_active;
  Vmax_036 := Kcat_036*MEK_active;
  Vmax_r52 := Kcat_r52*PDEbg;
  Vmax_078 := Kcat_078*PDE4_ERK_PKA;
  Vmax_r12 := Kcat_r12*PDE3;
  Vmax_r3 := Kcat_r3*AC_basal;
  Vmax_r55 := Kcat_r55*PP1_PDE;
  Vmax_011 := 0.3*BDNF_TrkB2_Pi;
  Vmax_012 := 10*ERK_active;
  Vmax_097 := Kcat_097*PP1;
  Vmax_023 := 10*Gap;
  Vmax_081 := Kcat_081*PDE1_CaM_Ca4;
  Vmax_077 := Kcat_077*PDE4;
  Vmax_032 := Kcat_032*PP2A;
  Vmax_046 := Kcat_046*PP1_PDE;
  Vmax_060 := Kcat_060*PKA_active;
  Vmax_018 := 0.2*Shc_Pi_SoS_Grb2;
  Vmax_r48 := Kcat_r48*PDE4_ERK;
  Vmax_045 := Kcat_045*PKA_active;
  Vmax_r50 := Kcat_r50*PDE2;
  Vmax_r56 := Kcat_r56*PP1;
  Vmax_r32 := Kcat_r32*PLC_Ca_Gq;
  Vmax_106 := Kcat_106*PKA_active;
  Vmax_r31 := Kcat_r31*PLC_Gq;
  Vmax_r1 := Kcat_r1*AC5_Ga;
  Vmax_r49 := Kcat_r49*PP2A;
  Vmax_034 := Kcat_034*BRaf_Pi;
  Vmax_063 := Kcat_063*PP2A;
  Vmax_095 := Kcat_095*CaMKII;
  Vmax_029 := 0.3*Ras_Raf_active;
  Vmax_r33 := Kcat_r33*PLC_Ca;
  Vmax_040 := Kcat_040*PKA_active;
  Vmax_052 := Kcat_052*PKA_active;
  Vmax_079 := Kcat_079*PDE4_PKA;
  Vmax_r4 := Kcat_r4*AC5;
  Vmax_037 := Kcat_037*MEK_active;
  Vmax_080 := Kcat_080*PDE1;
  Vmax_049 := Kcat_049*ERK_active;
  Vmax_r39 := Kcat_r39*IP3_5pase1;
  Vmax_047 := Kcat_047*ERK_active;
  Vmax_044 := Kcat_044*STEP_PKA;
  Vmax_028 := 0.3*Ras_Raf_active;
  Vmax_035 := Kcat_035*BRaf_Pi;
  Vmax_033 := Kcat_033*PP2A;
  Vmax_108 := Kcat_108*PP1;
  Vmax_r57 := Kcat_r57*PKC_active;
  Vmax_061 := Kcat_061*PP2A_DI;
  Vmax_r17 := 0.001660539*Kcat_r17*PP1;
  Vmax_062 := Kcat_062*PKA_active;
  Vmax_r25 := Kcat_r25*AC5_Fsk;
  Vmax_048 := Kcat_048*PP1_PDE;
  Vmax_043 := Kcat_043*STEP;
  Vmax_041 := Kcat_041*PP1;

  // Reactions:
  _zero_91: CaM_Ca3 + Calcium -> CaM_Ca4; (CaM_Ca3*Calcium*Kf_091 - CaM_Ca4*Kr_091)*IC; _zero_91 is "091";
  _zero_05: Int_TrkB2 -> TrkB; (Int_TrkB2*Kf_005 - Kr_005*TrkB)*PM; _zero_05 is "005";
    _zero_05_I = 0 pA_um_2; _zero_05_netValence = 1 _one_;
  r44: Calcium -> $Calcium_ER; 2.757389e-6*Calcium^2*Kcat_r44*SERCA_active/(0.0625 + 2.757389e-6*Calcium^2)*ER_Membrane;  // modifiers: SERCA_active
    r44_I = 0 pA_um_2; r44_netValence = 1 _one_;
  r19: PDE1 + IBMX -> PDE1_IBMX; (IBMX*Kf_r19*PDE1 - Kr_r19*PDE1_IBMX)*IC;
  r20: Da + D1LR_Gqby -> Da_D1LR_Gqby; (D1LR_Gqby*Da*Kf_r20 - Da_D1LR_Gqby*Kr_r20)*PM;
    r20_I = 0 pA_um_2; r20_netValence = 1 _one_;
  r40: IP3_145 -> IP3_14; 0.001660539*IP3_145*Vmax_r40/(0.001660539*IP3_145 + 0.001660539*Km_r40)*IC;  // modifiers: IP3_5Pase2
  _zero_57: DARPP32_Pi -> DARPP32; 0.001660539*DARPP32_Pi*Vmax_057/(0.001660539*DARPP32_Pi + 0.001660539*Km_057)*IC; _zero_57 is "057";  // modifiers: PP2A_DI
  r28: Da_D1LR_Gqby -> G_by + Da_D1LR + Gq_GTP; (Da_D1LR_Gqby*Kf_r28 - Da_D1LR*Gq_GTP*G_by*Kr_r28)*PM;
    r28_I = 0 pA_um_2; r28_netValence = 1 _one_;
  _zero_87: R2C_cAMP4 -> PKA_active + R2_cAMP4; (Kf_087*R2C_cAMP4 - Kr_087*PKA_active*R2_cAMP4)*IC; _zero_87 is "087";
  r10: Rolipram + PDE4_ERK_PKA -> PDE4_Rolipram; (-(Kr_r10*PDE4_Rolipram) + Kf_r10*PDE4_ERK_PKA*Rolipram)*IC;
  r7: AC5 + Fsk -> AC5_Fsk; (AC5*Fsk*Kf_r7 - AC5_Fsk*Kr_r7)*PM;
    r7_I = 0 pA_um_2; r7_netValence = 1 _one_;
  r21: IBMX + PDE4 -> PDE4_IBMX; (IBMX*Kf_r21*PDE4 - Kr_r21*PDE4_IBMX)*IC;
  _zero_96: CaMKII_286 -> CaMKII; 0.001660539*CaMKII_286*Vmax_096/(0.001660539*CaMKII_286 + 0.001660539*Km_096)*IC; _zero_96 is "096";  // modifiers: PP1
  _zero_56: DARPP32 -> DARPP32_Pi; 0.001660539*DARPP32*Vmax_056/(0.001660539*DARPP32 + 0.001660539*Km_056)*IC; _zero_56 is "056";  // modifiers: PKA_active
  _zero_36: ERK -> ERK_Tyr; 0.001660539*ERK*Vmax_036/(0.001660539*ERK + 0.001660539*Km_036)*IC; _zero_36 is "036";  // modifiers: MEK_active
  _zero_64: Da + D1R -> Da_D1R; (D1R*Da*Kf_064 - Da_D1R*Kr_064)*PM; _zero_64 is "064";
    _zero_64_I = 0 pA_um_2; _zero_64_netValence = 1 _one_;
  r52: cAMP -> AMP; 0.001660539*Vmax_r52*cAMP/(0.001660539*Km_r52 + 0.001660539*cAMP)*IC;  // modifiers: PDEbg
  _zero_78: cAMP -> AMP; 0.001660539*Vmax_078*cAMP/(0.001660539*Km_078 + 0.001660539*cAMP)*IC; _zero_78 is "078";  // modifiers: PDE4_ERK_PKA
  _one_03: Four1N + GluR1_845_818 -> GluR1_Membrane; (Four1N*GluR1_845_818*Kf_103 - GluR1_Membrane*Kr_103)*PM; _one_03 is "103";
    _one_03_I = 0 pA_um_2; _one_03_netValence = 1 _one_;
  _zero_73: Ga_GDP + Gby -> Gaby; (Ga_GDP*Gby*Kf_073 - Gaby*Kr_073)*PM; _zero_73 is "073";
    _zero_73_I = 0 pA_um_2; _zero_73_netValence = 1 _one_;
  r38: IP3_145 -> IP3_degraded; (IP3_145*Kf_r38 - IP3_degraded*Kr_r38)*IC;
  r12: cAMP -> AMP; 0.001660539*Vmax_r12*cAMP/(0.001660539*Km_r12 + 0.001660539*cAMP)*IC;  // modifiers: PDE3
  r6: PDE3 + IBMX -> PDE3_IBMX; (IBMX*Kf_r6*PDE3 - Kr_r6*PDE3_IBMX)*IC;
  _one_00: $AMPAR_Bulk -> GluR1; (AMPAR_Bulk*Kf_100 - GluR1*Kr_100)*IC; _one_00 is "100";
  r0: Da_D5R_Gaby -> Da_D5R + Gby + Ga_GTP; (Da_D5R_Gaby*Kf_r0 - Da_D5R*Ga_GTP*Gby*Kr_r0)*PM;
    r0_I = 0 pA_um_2; r0_netValence = 1 _one_;
  r11: Rolipram + PDE4_PKA -> PDE4_Rolipram; (-(Kr_r11*PDE4_Rolipram) + Kf_r11*PDE4_PKA*Rolipram)*IC;
  r3: $ATP -> cAMP; ATP*Vmax_r3/(ATP + Km_r3)*PM;  // modifiers: AC_basal
    r3_I = 0 pA_um_2; r3_netValence = 1 _one_;
  r55: PDE4_ERK_PKA -> PDE4; 0.001660539*PDE4_ERK_PKA*Vmax_r55/(0.001660539*Km_r55 + 0.001660539*PDE4_ERK_PKA)*IC;  // modifiers: PP1_PDE
  _zero_11: Shc -> Shc_Pi; 0.001660539*Shc*Vmax_011/(0.001660539*Km_011 + 0.001660539*Shc)*IC; _zero_11 is "011";  // modifiers: BDNF_TrkB2_Pi
  _zero_12: SoS -> SoS_Pi; 0.001660539*SoS*Vmax_012/(0.001660539*Km_012 + 0.001660539*SoS)*IC; _zero_12 is "012";  // modifiers: ERK_active
  _zero_97: CaMKII_286_CaM -> CaMKII_CaM; 0.001660539*CaMKII_286_CaM*Vmax_097/(0.001660539*CaMKII_286_CaM + 0.001660539*Km_097)*IC; _zero_97 is "097";  // modifiers: PP1
  _zero_71: Da_D5R + Gaby -> Da_D5R_Gaby; (Da_D5R*Gaby*Kf_071 - Da_D5R_Gaby*Kr_071)*PM; _zero_71 is "071";
    _zero_71_I = 0 pA_um_2; _zero_71_netValence = 1 _one_;
  _zero_02: TrkB + BDNF_TrkB -> BDNF_TrkB2; (-(Kr_002*BDNF_TrkB2) + BDNF_TrkB*Kf_002*TrkB)*PM; _zero_02 is "002";
    _zero_02_I = 0 pA_um_2; _zero_02_netValence = 1 _one_;
  r35: PLC + Calcium -> PLC_Ca; (Calcium*Kf_r35*PLC - Kr_r35*PLC_Ca)*PM;
    r35_I = 0 pA_um_2; r35_netValence = 1 _one_;
  _zero_23: Ras_GTP -> Ras_GDP; 0.001660539*Ras_GTP*Vmax_023/(0.001660539*Km_023 + 0.001660539*Ras_GTP)*IC; _zero_23 is "023";  // modifiers: Gap
  _zero_01: BDNF + TrkB -> BDNF_TrkB; (-(Kr_001*BDNF_TrkB) + BDNF*Kf_001*TrkB)*PM; _zero_01 is "001";
    _zero_01_I = 0 pA_um_2; _zero_01_netValence = 1 _one_;
  r36: PLC_Gq -> Gq_GDP + PLC; (-(Kr_r36*PLC*Gq_GDP) + Kf_r36*PLC_Gq)*PM;
    r36_I = 0 pA_um_2; r36_netValence = 1 _one_;
  _zero_84: R2C2_cAMP2 + cAMP -> R2C2_cAMP3; (-(Kr_084*R2C2_cAMP3) + Kf_084*R2C2_cAMP2*cAMP)*IC; _zero_84 is "084";
  _zero_98: PDE1 + CaM_Ca4 -> PDE1_CaM_Ca4; (CaM_Ca4*Kf_098*PDE1 - Kr_098*PDE1_CaM_Ca4)*IC; _zero_98 is "098";
  r26: Da + D1LR -> Da_D1LR; (D1LR*Da*Kf_r26 - Da_D1LR*Kr_r26)*PM;
    r26_I = 0 pA_um_2; r26_netValence = 1 _one_;
  _zero_81: cAMP -> AMP; 0.001660539*Vmax_081*cAMP/(0.001660539*Km_081 + 0.001660539*cAMP)*IC; _zero_81 is "081";  // modifiers: PDE1_CaM_Ca4
  _one_04: GluR1_Membrane_dephosphorylated1 -> GluR1 + Four1N; (GluR1_Membrane_dephosphorylated1*Kf_104 - Four1N*GluR1*Kr_104)*PM; _one_04 is "104";
    _one_04_I = 0 pA_um_2; _one_04_netValence = 1 _one_;
  _zero_77: cAMP -> AMP; 0.001660539*Vmax_077*cAMP/(0.001660539*Km_077 + 0.001660539*cAMP)*IC; _zero_77 is "077";  // modifiers: PDE4
  _zero_32: MEK_Ser -> MEK; 0.001660539*MEK_Ser*Vmax_032/(0.001660539*Km_032 + 0.001660539*MEK_Ser)*IC; _zero_32 is "032";  // modifiers: PP2A
  _zero_08: SoS_Pi + Grb2 -> SoS_Pi_Grb2; (Grb2*Kf_008*SoS_Pi - Kr_008*SoS_Pi_Grb2)*IC; _zero_08 is "008";
  _zero_06: Shc_Pi -> Shc; (-(Kr_006*Shc) + Kf_006*Shc_Pi)*IC; _zero_06 is "006";
  r27: Da_D1LR + Gqby -> Da_D1LR_Gqby; (Da_D1LR*Gqby*Kf_r27 - Da_D1LR_Gqby*Kr_r27)*PM;
    r27_I = 0 pA_um_2; r27_netValence = 1 _one_;
  _zero_46: PDE4_PKA -> PDE4; 0.001660539*PDE4_PKA*Vmax_046/(0.001660539*Km_046 + 0.001660539*PDE4_PKA)*IC; _zero_46 is "046";  // modifiers: PP1_PDE
  _zero_60: I1 -> I1_Pi; 0.001660539*I1*Vmax_060/(0.001660539*I1 + 0.001660539*Km_060)*IC; _zero_60 is "060";  // modifiers: PKA_active
  _zero_18: Ras_GDP -> Ras_GTP; 0.001660539*Ras_GDP*Vmax_018/(0.001660539*Km_018 + 0.001660539*Ras_GDP)*IC; _zero_18 is "018";  // modifiers: Shc_Pi_SoS_Grb2
  r48: cAMP -> AMP; 0.001660539*Vmax_r48*cAMP/(0.001660539*Km_r48 + 0.001660539*cAMP)*IC;  // modifiers: PDE4_ERK
  _zero_45: PDE4 -> PDE4_PKA; 0.001660539*PDE4*Vmax_045/(0.001660539*Km_045 + 0.001660539*PDE4)*IC; _zero_45 is "045";  // modifiers: PKA_active
  _zero_75: Ga_GTP + AC5 -> AC5_Ga; (AC5*Ga_GTP*Kf_075 - AC5_Ga*Kr_075)*PM; _zero_75 is "075";
    _zero_75_I = 0 pA_um_2; _zero_75_netValence = 1 _one_;
  _zero_09: SoS_Pi -> SoS; (-(Kr_009*SoS) + Kf_009*SoS_Pi)*IC; _zero_09 is "009";
  r50: cAMP -> AMP; 0.001660539*Vmax_r50*cAMP/(0.001660539*Km_r50 + 0.001660539*cAMP)*IC;  // modifiers: PDE2
  _zero_04: BDNF_TrkB2_Pi -> Int_TrkB2; (BDNF_TrkB2_Pi*Kf_004 - Int_TrkB2*Kr_004)*PM; _zero_04 is "004";
    _zero_04_I = 0 pA_um_2; _zero_04_netValence = 1 _one_;
  r56: GluR1_845_818 -> GluR1_845; 0.001660539*GluR1_845_818*Vmax_r56/(0.001660539*GluR1_845_818 + 0.001660539*Km_r56)*IC;  // modifiers: PP1
  r37: PLC_Gq + Calcium -> PLC_Ca_Gq; (-(PLC_Ca_Gq*Kr_r37) + Calcium*Kf_r37*PLC_Gq)*PM;
    r37_I = 0 pA_um_2; r37_netValence = 1 _one_;
  r32: $PIP2 -> DAG + IP3_145; PIP2*Vmax_r32/(Km_r32 + PIP2)*PM;  // modifiers: PLC_Ca_Gq
    r32_I = 0 pA_um_2; r32_netValence = 1 _one_;
  _zero_07: SoS_Grb2 + Shc_Pi -> Shc_Pi_SoS_Grb2; (-(Kr_007*Shc_Pi_SoS_Grb2) + Kf_007*Shc_Pi*SoS_Grb2)*IC; _zero_07 is "007";
  _one_06: GluR1 -> GluR1_845; 0.001660539*GluR1*Vmax_106/(0.001660539*GluR1 + 0.001660539*Km_106)*IC; _one_06 is "106";  // modifiers: PKA_active
  r29: Gq_GDP + G_by -> Gqby; (Gq_GDP*G_by*Kf_r29 - Gqby*Kr_r29)*PM;
    r29_I = 0 pA_um_2; r29_netValence = 1 _one_;
  _zero_67: D1R_Gaby + Da -> Da_D1R_Gaby; (D1R_Gaby*Da*Kf_067 - Da_D1R_Gaby*Kr_067)*PM; _zero_67 is "067";
    _zero_67_I = 0 pA_um_2; _zero_67_netValence = 1 _one_;
  _zero_88: PKA_active + PKA_Inhibitor -> PKA_inhibited; (Kf_088*PKA_Inhibitor*PKA_active - Kr_088*PKA_inhibited)*IC; _zero_88 is "088";
  r24: PDE4_ERK + IBMX -> PDE4_IBMX; (IBMX*Kf_r24*PDE4_ERK - Kr_r24*PDE4_IBMX)*IC;
  r31: $PIP2 -> IP3_145 + DAG; PIP2*Vmax_r31/(Km_r31 + PIP2)*PM;  // modifiers: PLC_Gq
    r31_I = 0 pA_um_2; r31_netValence = 1 _one_;
  r22: PDE4_PKA + IBMX -> PDE4_IBMX; (-(Kr_r22*PDE4_IBMX) + IBMX*Kf_r22*PDE4_PKA)*IC;
  r34: PLC + Gq_GTP -> PLC_Gq; (Gq_GTP*Kf_r34*PLC - Kr_r34*PLC_Gq)*PM;
    r34_I = 0 pA_um_2; r34_netValence = 1 _one_;
  _zero_10: Grb2 + SoS -> SoS_Grb2; (Grb2*Kf_010*SoS - Kr_010*SoS_Grb2)*IC; _zero_10 is "010";
  r18: DARPP32_Pi + PP1 -> DARPP32_Pi_PP1; (-(DARPP32_Pi_PP1*Kr_r18) + DARPP32_Pi*Kf_r18*PP1)*IC;
  r1: $ATP -> cAMP; ATP*Vmax_r1/(ATP + Km_r1)*PM;  // modifiers: AC5_Ga
    r1_I = 0 pA_um_2; r1_netValence = 1 _one_;
  r49: ERK_active -> ERK_Tyr; 0.001660539*ERK_active*Vmax_r49/(0.001660539*ERK_active + 0.001660539*Km_r49)*IC;  // modifiers: PP2A
  _one_05: GluR1_Membrane -> GluR1_degraded; (GluR1_Membrane*Kf_105 - GluR1_degraded*Kr_105)*PM; _one_05 is "105";
    _one_05_I = 0 pA_um_2; _one_05_netValence = 1 _one_;
  _zero_34: MEK -> MEK_Ser; 0.001660539*MEK*Vmax_034/(0.001660539*Km_034 + 0.001660539*MEK)*IC; _zero_34 is "034";  // modifiers: BRaf_Pi
  _zero_63: BRaf_Pi -> BRaf; 0.001660539*BRaf_Pi*Vmax_063/(0.001660539*BRaf_Pi + 0.001660539*Km_063)*IC; _zero_63 is "063";  // modifiers: PP2A
  r47: DARPP32_Pi_PP1 -> PP1 + DARPP32; (DARPP32_Pi_PP1*Kf_r47 - DARPP32*Kr_r47*PP1)*IC;
  _zero_95: CaMKII_CaM -> CaMKII_286_CaM; 0.001660539*CaMKII_CaM*Vmax_095/(0.001660539*CaMKII_CaM + 0.001660539*Km_095)*IC; _zero_95 is "095";  // modifiers: CaMKII
  _zero_65: Gaby + D1R -> D1R_Gaby; (D1R*Gaby*Kf_065 - D1R_Gaby*Kr_065)*PM; _zero_65 is "065";
    _zero_65_I = 0 pA_um_2; _zero_65_netValence = 1 _one_;
  r51: PDE2 + IBMX -> PDE2_IBMX; (IBMX*Kf_r51*PDE2 - Kr_r51*PDE2_IBMX)*IC;
  _zero_29: MEK_Ser -> MEK_active; 0.001660539*MEK_Ser*Vmax_029/(0.001660539*Km_029 + 0.001660539*MEK_Ser)*IC; _zero_29 is "029";  // modifiers: Ras_Raf_active
  _zero_89: CaM + 2 Calcium -> CaM_Ca2; (-(CaM_Ca2*Kr_089) + 362661.9*CaM*Kf_089*(0.001660539*Calcium)^2)*IC; _zero_89 is "089";
  r43: $Calcium_ER -> Calcium; (Calcium_ER*Kf_r43 - Calcium*Kr_r43)*ER_Membrane;
    r43_I = 0 pA_um_2; r43_netValence = 1 _one_;
  r53: I1_Pi + PP1 -> I1_Pi_PP1; (-(I1_Pi_PP1*Kr_r53) + I1_Pi*Kf_r53*PP1)*IC;
  r33: $PIP2 -> DAG + IP3_145; PIP2*Vmax_r33/(Km_r33 + PIP2)*PM;  // modifiers: PLC_Ca
    r33_I = 0 pA_um_2; r33_netValence = 1 _one_;
  _zero_82: R2C2 + cAMP -> R2C2_cAMP; (-(Kr_082*R2C2_cAMP) + Kf_082*R2C2*cAMP)*IC; _zero_82 is "082";
  _zero_40: STEP -> STEP_PKA; 0.001660539*STEP*Vmax_040/(0.001660539*Km_040 + 0.001660539*STEP)*IC; _zero_40 is "040";  // modifiers: PKA_active
  r9: PDE4 + Rolipram -> PDE4_Rolipram; (-(Kr_r9*PDE4_Rolipram) + Kf_r9*PDE4*Rolipram)*IC;
  _zero_52: PDE4_ERK -> PDE4_ERK_PKA; 0.001660539*PDE4_ERK*Vmax_052/(0.001660539*Km_052 + 0.001660539*PDE4_ERK)*IC; _zero_52 is "052";  // modifiers: PKA_active
  _zero_70: Da + D5R_Gaby -> Da_D5R_Gaby; (D5R_Gaby*Da*Kf_070 - Da_D5R_Gaby*Kr_070)*PM; _zero_70 is "070";
    _zero_70_I = 0 pA_um_2; _zero_70_netValence = 1 _one_;
  r30: Gq_GTP -> Gq_GDP; (Gq_GTP*Kf_r30 - Gq_GDP*Kr_r30)*PM;
    r30_I = 0 pA_um_2; r30_netValence = 1 _one_;
  _zero_69: Gaby + D5R -> D5R_Gaby; (D5R*Gaby*Kf_069 - D5R_Gaby*Kr_069)*PM; _zero_69 is "069";
    _zero_69_I = 0 pA_um_2; _zero_69_netValence = 1 _one_;
  _zero_79: cAMP -> AMP; 0.001660539*Vmax_079*cAMP/(0.001660539*Km_079 + 0.001660539*cAMP)*IC; _zero_79 is "079";  // modifiers: PDE4_PKA
  r4: $ATP -> cAMP; ATP*Vmax_r4/(ATP + Km_r4)*PM;  // modifiers: AC5
    r4_I = 0 pA_um_2; r4_netValence = 1 _one_;
  _zero_37: ERK_Tyr -> ERK_active; 0.001660539*ERK_Tyr*Vmax_037/(0.001660539*ERK_Tyr + 0.001660539*Km_037)*IC; _zero_37 is "037";  // modifiers: MEK_active
  _zero_16: Ras_GTP + Raf -> Ras_Raf_active; (Kf_016*Raf*Ras_GTP - Kr_016*Ras_Raf_active)*IC; _zero_16 is "016";
  _zero_74: Ga_GTP -> Ga_GDP; (Ga_GTP*Kf_074 - Ga_GDP*Kr_074)*PM; _zero_74 is "074";
    _zero_74_I = 0 pA_um_2; _zero_74_netValence = 1 _one_;
  _zero_93: CaMKII_286 + CaM_Ca4 -> CaMKII_286_CaM; (CaMKII_286*CaM_Ca4*Kf_093 - CaMKII_286_CaM*Kr_093)*IC; _zero_93 is "093";
  r54: I1_Pi_PP1 -> PP1 + I1; (I1_Pi_PP1*Kf_r54 - I1*Kr_r54*PP1)*IC;
  _zero_80: cAMP -> AMP; 0.001660539*Vmax_080*cAMP/(0.001660539*Km_080 + 0.001660539*cAMP)*IC; _zero_80 is "080";  // modifiers: PDE1
  _zero_72: Da_D1R_Gaby -> Gby + Ga_GTP + Da_D1R; (Da_D1R_Gaby*Kf_072 - Da_D1R*Ga_GTP*Gby*Kr_072)*PM; _zero_72 is "072";
    _zero_72_I = 0 pA_um_2; _zero_72_netValence = 1 _one_;
  _zero_49: PDE4_PKA -> PDE4_ERK_PKA; 0.001660539*PDE4_PKA*Vmax_049/(0.001660539*Km_049 + 0.001660539*PDE4_PKA)*IC; _zero_49 is "049";  // modifiers: ERK_active
  r16: MEK + U0126 -> MEK_inhibited; (-(Kr_r16*MEK_inhibited) + Kf_r16*MEK*U0126)*IC;
  r39: IP3_145 -> IP3_14; 0.001660539*IP3_145*Vmax_r39/(0.001660539*IP3_145 + 0.001660539*Km_r39)*IC;  // modifiers: IP3_5pase1
  _zero_68: D5R + Da -> Da_D5R; (D5R*Da*Kf_068 - Da_D5R*Kr_068)*PM; _zero_68 is "068";
    _zero_68_I = 0 pA_um_2; _zero_68_netValence = 1 _one_;
  _zero_47: PDE4 -> PDE4_ERK; 0.001660539*PDE4*Vmax_047/(0.001660539*Km_047 + 0.001660539*PDE4)*IC; _zero_47 is "047";  // modifiers: ERK_active
  r5: PDE1_CaM_Ca4 + IBMX -> PDE1_IBMX; (IBMX*Kf_r5*PDE1_CaM_Ca4 - Kr_r5*PDE1_IBMX)*IC;
  _zero_44: ERK_Tyr -> ERK; 0.001660539*ERK_Tyr*Vmax_044/(0.001660539*ERK_Tyr + 0.001660539*Km_044)*IC; _zero_44 is "044";  // modifiers: STEP_PKA
  _zero_83: cAMP + R2C2_cAMP -> R2C2_cAMP2; (-(Kr_083*R2C2_cAMP2) + Kf_083*R2C2_cAMP*cAMP)*IC; _zero_83 is "083";
  _zero_90: CaM_Ca2 + Calcium -> CaM_Ca3; (CaM_Ca2*Calcium*Kf_090 - CaM_Ca3*Kr_090)*IC; _zero_90 is "090";
  r45: $Calcium_ER -> Calcium; -((0.001660539*Calcium*IP3R_open*J0_r45*Kc_r45 - 0.001660539*Calcium_ER*IP3R_open*J0_r45*Kc_r45)/(0.001660539*Calcium + Kc_r45))*ER_Membrane;  // modifiers: IP3R_open
    r45_I = 0 pA_um_2; r45_netValence = 1 _one_;
  _zero_28: MEK -> MEK_Ser; 0.001660539*MEK*Vmax_028/(0.001660539*Km_028 + 0.001660539*MEK)*IC; _zero_28 is "028";  // modifiers: Ras_Raf_active
  _zero_94: CaMKII -> CaMKII_286; (CaMKII*Kf_094 - CaMKII_286*Kr_094)*IC; _zero_94 is "094";
  _zero_03: BDNF_TrkB2 -> BDNF_TrkB2_Pi; (BDNF_TrkB2*Kf_003 - BDNF_TrkB2_Pi*Kr_003)*PM; _zero_03 is "003";
    _zero_03_I = 0 pA_um_2; _zero_03_netValence = 1 _one_;
  _zero_35: MEK_Ser -> MEK_active; 0.001660539*MEK_Ser*Vmax_035/(0.001660539*Km_035 + 0.001660539*MEK_Ser)*IC; _zero_35 is "035";  // modifiers: BRaf_Pi
  _zero_33: MEK_active -> MEK_Ser; 0.001660539*MEK_active*Vmax_033/(0.001660539*Km_033 + 0.001660539*MEK_active)*IC; _zero_33 is "033";  // modifiers: PP2A
  r14: MEK_Ser + U0126 -> MEK_inhibited; (-(Kr_r14*MEK_inhibited) + Kf_r14*MEK_Ser*U0126)*IC;
  r15: MEK_active + U0126 -> MEK_inhibited; (-(Kr_r15*MEK_inhibited) + Kf_r15*MEK_active*U0126)*IC;
  _one_08: GluR1_845 -> GluR1; 0.001660539*GluR1_845*Vmax_108/(0.001660539*GluR1_845 + 0.001660539*Km_108)*IC; _one_08 is "108";  // modifiers: PP1
  r57: GluR1_845 -> GluR1_845_818; 0.001660539*GluR1_845*Vmax_r57/(0.001660539*GluR1_845 + 0.001660539*Km_r57)*IC;  // modifiers: PKC_active
  r8: Rolipram + PDE4_ERK -> PDE4_Rolipram; (-(Kr_r8*PDE4_Rolipram) + Kf_r8*PDE4_ERK*Rolipram)*IC;
  r23: PDE4_ERK_PKA + IBMX -> PDE4_IBMX; (IBMX*Kf_r23*PDE4_ERK_PKA - Kr_r23*PDE4_IBMX)*IC;
  r13: Gqby + D1LR -> D1LR_Gqby; (D1LR*Gqby*Kf_r13 - D1LR_Gqby*Kr_r13)*PM;
    r13_I = 0 pA_um_2; r13_netValence = 1 _one_;
  _zero_61: I1_Pi -> I1; 0.001660539*I1_Pi*Vmax_061/(0.001660539*I1_Pi + 0.001660539*Km_061)*IC; _zero_61 is "061";  // modifiers: PP2A_DI
  _zero_66: Gaby + Da_D1R -> Da_D1R_Gaby; (Da_D1R*Gaby*Kf_066 - Da_D1R_Gaby*Kr_066)*PM; _zero_66 is "066";
    _zero_66_I = 0 pA_um_2; _zero_66_netValence = 1 _one_;
  _zero_14: Ras_GTP -> Ras_GDP; (-(Kr_014*Ras_GDP) + Kf_014*Ras_GTP)*IC; _zero_14 is "014";
  r17: GluR1_Membrane -> GluR1_Membrane_dephosphorylated1; GluR1_Membrane*Vmax_r17/(GluR1_Membrane + Km_r17)*PM;  // modifiers: PP1
    r17_I = 0 pA_um_2; r17_netValence = 1 _one_;
  _zero_62: BRaf -> BRaf_Pi; 0.001660539*BRaf*Vmax_062/(0.001660539*BRaf + 0.001660539*Km_062)*IC; _zero_62 is "062";  // modifiers: PKA_active
  r42: SERCA + Calcium -> SERCA_active; 4.578751e-9*Calcium^2*SERCA/(0.004151347 + 6.893473e-7*Calcium + 4.578751e-9*Calcium^2)*ER_Membrane;
    r42_I = 0 pA_um_2; r42_netValence = 1 _one_;
  _zero_99: PDE1_CaM_Ca4 -> PDE1; (-(Kr_099*PDE1) + Kf_099*PDE1_CaM_Ca4)*IC; _zero_99 is "099";
  r25: $ATP -> cAMP; ATP*Vmax_r25/(ATP + Km_r25)*PM;  // modifiers: AC5_Fsk
    r25_I = 0 pA_um_2; r25_netValence = 1 _one_;
  _zero_86: R2C2_cAMP4 -> PKA_active + R2C_cAMP4; (Kf_086*R2C2_cAMP4 - Kr_086*PKA_active*R2C_cAMP4)*IC; _zero_86 is "086";
  r41: IP3R + 3 IP3_145 -> IP3R_open; (-(Kr_r41*IP3R_open) + 2.184001e8*IP3R*Kf_r41*(0.001660539*IP3_145)^3)*ER_Membrane;
    r41_I = 0 pA_um_2; r41_netValence = 1 _one_;
  _zero_48: PDE4_ERK -> PDE4; 0.001660539*PDE4_ERK*Vmax_048/(0.001660539*Km_048 + 0.001660539*PDE4_ERK)*IC; _zero_48 is "048";  // modifiers: PP1_PDE
  _zero_43: ERK_Tyr -> ERK; 0.001660539*ERK_Tyr*Vmax_043/(0.001660539*ERK_Tyr + 0.001660539*Km_043)*IC; _zero_43 is "043";  // modifiers: STEP
  _zero_85: R2C2_cAMP3 + cAMP -> R2C2_cAMP4; (-(Kr_085*R2C2_cAMP4) + Kf_085*R2C2_cAMP3*cAMP)*IC; _zero_85 is "085";
  _zero_92: CaM_Ca4 + CaMKII -> CaMKII_CaM; (CaMKII*CaM_Ca4*Kf_092 - CaMKII_CaM*Kr_092)*IC; _zero_92 is "092";
  _zero_41: STEP_PKA -> STEP; 0.001660539*STEP_PKA*Vmax_041/(0.001660539*Km_041 + 0.001660539*STEP_PKA)*IC; _zero_41 is "041";  // modifiers: PP1

  // Events:
  t3600: at (3600) after (0 != 3600), t0=false: Da = 60.2214179, U0126 = 0, Rolipram = 0, BDNF = 0;
  t5400: at (5400) after (0 != 5400), t0=false: IBMX = 6022.14179, Fsk = 6022.14179;

  // Unit definitions:
  unit molecules = item;
  unit um3 = (1e-6 metre)^3;
  unit um2 = (1e-6 metre)^2;
  unit um = 1e-6 metre;
  unit s = second;
  unit K = kelvin;
  unit _one_ = dimensionless;
  unit C_mol_1 = coulomb / mole;
  unit C_nmol_1 = coulomb / (1e-9 mole);
  unit molecules_pmol_1 = item / (1e-12 mole);
  unit _one_000000000 = 1e9 dimensionless;
  unit mV_C_K_1_mol_1 = 1e-3 volt * coulomb / (kelvin * mole);
  unit mV_V_1 = dimensionless;
  unit uM_um3_molecules_1 = 1e-6 mole * (1e-6 metre)^3 / (litre * item);
  unit um3_s_1_molecules_1 = (1e-6 metre)^3 / (second * item);
  unit s_1 = 1 / second;
  unit pA_um_2 = 1e-12 ampere / (1e-6 metre)^2;
  unit molecules_um_3 = item / (1e-6 metre)^3;
  unit molecules_um_3_s_1 = item / ((1e-6 metre)^3 * second);
  unit um4_s_1_molecules_2 = (1e-6 metre)^4 / (second * item^2);
  unit um4_s_1_molecules_1 = (1e-6 metre)^4 / (second * item);
  unit um2_s_1_molecules_1 = (1e-6 metre)^2 / (second * item);
  unit molecules_um_2_s_1 = item / ((1e-6 metre)^2 * second);
  unit um_s_1 = 1e-6 metre / second;
  unit molecules_um_2 = item / (1e-6 metre)^2;
  unit um6_s_1_molecules_2 = (1e-6 metre)^6 / (second * item^2);
  unit uM_1_s_1 = litre / (1e-6 mole * second);
  unit uM = 1e-6 mole / litre;
  unit molecules_um_2_uM_1_s_1 = item * litre / ((1e-6 metre)^2 * 1e-6 mole * second);
  unit um9_s_1_molecules_3 = (1e-6 metre)^9 / (second * item^3);
end
