// SBML level 3 version 1
// Exported by VCell 7.3

model Terasaki_MPF1_comp()
  // model units - substance: molecules, time: s, volume: um3, area: um2, length: um, extent: molecules

  // Compartments:
  compartment in = 1 um3;
  compartment nuc = 0.1570513 um3;
  compartment out = 4.628205 um3;
  compartment ne = 0.008974359 um2;  // 2-D
  compartment pm = 0.02435897 um2;  // 2-D

  // Species:
  // MPF_active
  substanceOnly species MP in in = 6.862627;
  // Wee1_Myt1
  substanceOnly species W in in = 564.5117;
  // Akt
  substanceOnly species A in in = 0;
  // Receptor
  substanceOnly species $R_pm in pm = 0.02435897*(t > 5)*(t < 6);
  // Wee1_Myt1_P
  substanceOnly species WP in in = 37.70249;
  // Cdc25C
  substanceOnly species C in in = 596.7771;
  // Cdc25C_P
  substanceOnly species CP in in = 5.437113;
  // MPF
  substanceOnly species M in in = 595.3516;

  // Parameters:
  _T_ = 300 K;
  _PI_ = 3.141593 _one_;
  _F_ = 9.64853321e4 C_mol_1;
  _F_nmol_ = 9.64853321e-5 C_nmol_1;
  _N_pmol_ = 6.02214179e11 molecules_pmol_1;
  _K_GHK_ = 1e-9 _one_000000000;
  _R_ = 8314.463 mV_C_K_1_mol_1;
  K_millivolts_per_volt = 1000 mV_V_1;
  KMOLE = 0.001660539 uM_um3_molecules_1;
  ka_c_activation = 1 s_1;
  Ka_c_activation = 0.1 uM;
  kb_c_activation = 0.125 uM_s_1;
  Kb_c_activation = 0.1 uM;
  ke_w_inactivation = 2 s_1;
  Ke_w_inactivation = 0.3 uM;
  k_w_inactivation = 1 uM_1_s_1;
  kf_w_inactivation = 0.1 uM_s_1;
  Kf_w_inactivation = 0.3 uM;
  poff_m_activation = 0.1 uM_1_s_1;
  pon_m_activation = 10 uM_1_s_1;
  koff_m_activation = 0.1 uM_1_s_1;
  kon_m_activation = 1 uM_1_s_1;
  kwee_m_activation has s_1;
  k25_m_activation has s_1;
  Kf_a_degradation = 1 s_1;
  Jm_A_flux = 10000 s_1;

  // Assignment rules:
  kwee_m_activation := 0.001660539*pon_m_activation*W + 0.001660539*poff_m_activation*WP;
  k25_m_activation := 0.001660539*kon_m_activation*CP + 0.001660539*koff_m_activation*C;

  // Reactions:
  c_activation: C -> CP; (2.757389e-6*C*CP*MP*ka_c_activation + 0.001660539*C*Kb_c_activation*MP*ka_c_activation - 0.001660539*C*CP*kb_c_activation - CP*Ka_c_activation*kb_c_activation)/(2.757389e-6*C*CP + 0.001660539*CP*Ka_c_activation + 0.001660539*C*Kb_c_activation + Ka_c_activation*Kb_c_activation)*in;  // modifiers: MP
  w_inactivation: W -> WP; (0.001660539*A*Ke_w_inactivation*Kf_w_inactivation*W*k_w_inactivation + 2.757389e-6*A*Kf_w_inactivation*W^2*k_w_inactivation + 2.757389e-6*A*Ke_w_inactivation*W*WP*k_w_inactivation + 4.578751e-9*A*W^2*WP*k_w_inactivation + 0.001660539*Kf_w_inactivation*MP*W*ke_w_inactivation + 2.757389e-6*MP*W*WP*ke_w_inactivation - Ke_w_inactivation*WP*kf_w_inactivation - 0.001660539*W*WP*kf_w_inactivation)/(Ke_w_inactivation*Kf_w_inactivation + 0.001660539*Kf_w_inactivation*W + 0.001660539*Ke_w_inactivation*WP + 2.757389e-6*W*WP)*in;  // modifiers: A, MP
  m_activation: M -> MP; (M*k25_m_activation - MP*kwee_m_activation)*in;  // modifiers: W, WP, CP, C
  a_degradation: A -> ; A*Kf_a_degradation*in;
    Kr = 0 molecules_um_3_s_1;
  A_flux: -> A; Jm_A_flux*R_pm*pm;  // modifiers: R_pm
    I = 0 pA_um_2; netValence = 1 _one_;

  // Unit definitions:
  unit molecules = item;
  unit um3 = (1e-6 metre)^3;
  unit um2 = (1e-6 metre)^2;
  unit um = 1e-6 metre;
  unit s = second;
  unit K = kelvin;
  unit _one_ = dimensionless;
  unit C_mol_1 = coulomb / mole;
  unit C_nmol_1 = coulomb / (1e-9 mole);
  unit molecules_pmol_1 = item / (1e-12 mole);
  unit _one_000000000 = 1e9 dimensionless;
  unit mV_C_K_1_mol_1 = 1e-3 volt * coulomb / (kelvin * mole);
  unit mV_V_1 = dimensionless;
  unit uM_um3_molecules_1 = 1e-6 mole * (1e-6 metre)^3 / (litre * item);
  unit s_1 = 1 / second;
  unit uM = 1e-6 mole / litre;
  unit uM_s_1 = 1e-6 mole / (litre * second);
  unit uM_1_s_1 = litre / (1e-6 mole * second);
  unit molecules_um_3_s_1 = item / ((1e-6 metre)^3 * second);
  unit pA_um_2 = 1e-12 ampere / (1e-6 metre)^2;
end
