// SBML level 3 version 1
// Exported by VCell 7.3

model Baik___Rosania_2013_JPP___03_Transcellular_model_with_lysosome_Imported_Zhang_et_al_2006_Mol_Pharm()
  // Baik & Rosania 2013 JPP - 03 Transcellular model with lysosome_Imported Zhang et al 2006 Mol Pharm
  // model units - substance: molecules, time: s, volume: um3, area: um2, length: um, extent: molecules

  // Compartments:
  compartment m = 100 um3;
  compartment a = 120000 um3;
  compartment c = 1000 um3;
  compartment b = 200000 um3;
  compartment l = 100 um3;
  compartment aMem = 2000 um2;  // 2-D
  compartment bMem = 100 um2;  // 2-D
  compartment mMem = 600 um2;  // 2-D
  compartment LMem = 600 um2;  // 2-D

  // Species:
  substanceOnly species Mt_m in m = 0;
  substanceOnly species Mt_b in b = 0;
  substanceOnly species $Mt_a in a = 7.22657e10;
  substanceOnly species Mt_c in c = 0;
  substanceOnly species Mt_l in l = 0;

  // Parameters:
  _T_ = 300 K;
  _PI_ = 3.141593 _one_;
  _F_ = 9.64853321e4 C_mol_1;
  _F_nmol_ = 9.64853321e-5 C_nmol_1;
  _N_pmol_ = 6.02214179e11 molecules_pmol_1;
  _K_GHK_ = 1e-9 _one_000000000;
  _R_ = 8314.463 mV_C_K_1_mol_1;
  K_millivolts_per_volt = 1000 mV_V_1;
  KMOLE = 0.001660539 uM_um3_molecules_1;
  pKa_flux_ac = 9.6 _one_;
  pHc_flux_ac = 7 _one_;
  pHa_flux_ac = 6.8 _one_;
  gamma_da_flux_ac = 1 _one_;
  gamma_na_flux_ac = 1 _one_;
  La_flux_ac = 0 _one_;
  gamma_dc_flux_ac = 0.73799822 _one_;
  gamma_nc_flux_ac = 1.23026877 _one_;
  Lc_flux_ac = 0.05 _one_;
  logKow_n_flux_ac = 3.1 _one_;
  c_flux_ac = 1 _one_;
  fc_a_flux_ac has _one_;
  Pc_flux_ac has um_s_1;
  Na_flux_ac has _one_;
  fn_a_flux_ac has _one_;
  fn_c_flux_ac has _one_;
  Pn_flux_ac has um_s_1;
  fc_c_flux_ac has _one_;
  i_flux_ac has _one_;
  logP_n_flux_ac has _one_;
  logP_c_flux_ac has _one_;
  Kn_a_flux_ac has _one_;
  Kd_a_flux_ac has _one_;
  Wa_flux_ac has _one_;
  Kn_c_flux_ac has _one_;
  Wc_flux_ac has _one_;
  Kd_c_flux_ac has _one_;
  logKow_c_flux_ac has _one_;
  pKa_flux_cb = 9.6 _one_;
  pHb_flux_cb = 7.4 _one_;
  pHc_flux_cb = 7 _one_;
  gamma_db_flux_cb = 0.73799822 _one_;
  gamma_nb_flux_cb = 1.23026877 _one_;
  Lb_flux_cb = 0 _one_;
  gamma_dc_flux_cb = 0.73799822 _one_;
  gamma_nc_flux_cb = 1.23026877 _one_;
  Lc_flux_cb = 0.05 _one_;
  logKow_n_flux_cb = 3.1 _one_;
  c_flux_cb = 1 _one_;
  Pc_flux_cb has um_s_1;
  Nb_flux_cb has _one_;
  fn_b_flux_cb has _one_;
  fn_c_flux_cb has _one_;
  Pn_flux_cb has um_s_1;
  fc_c_flux_cb has _one_;
  fc_b_flux_cb has _one_;
  i_flux_cb has _one_;
  logP_n_flux_cb has _one_;
  logP_c_flux_cb has _one_;
  Kn_b_flux_cb has _one_;
  Wb_flux_cb has _one_;
  Kd_b_flux_cb has _one_;
  Kn_c_flux_cb has _one_;
  Wc_flux_cb has _one_;
  Kd_c_flux_cb has _one_;
  logKow_c_flux_cb has _one_;
  pKa_flux_cm = 9.6 _one_;
  pHc_flux_cm = 7 _one_;
  pHm_flux_cm = 8 _one_;
  gamma_dm_flux_cm = 0.73799822 _one_;
  gamma_nm_flux_cm = 1.23026877 _one_;
  Lm_flux_cm = 0 _one_;
  gamma_dc_flux_cm = 0.73799822 _one_;
  gamma_nc_flux_cm = 1.23026877 _one_;
  Lc_flux_cm = 0.05 _one_;
  logKow_n_flux_cm = 3.1 _one_;
  c_flux_cm = 1 _one_;
  Pc_flux_cm has um_s_1;
  fc_m_flux_cm has _one_;
  fn_m_flux_cm has _one_;
  fn_c_flux_cm has _one_;
  Pn_flux_cm has um_s_1;
  fc_c_flux_cm has _one_;
  Nm_flux_cm has _one_;
  i_flux_cm has _one_;
  logP_n_flux_cm has _one_;
  Kn_m_flux_cm has _one_;
  Kd_m_flux_cm has _one_;
  Wm_flux_cm has _one_;
  logP_c_flux_cm has _one_;
  Kn_c_flux_cm has _one_;
  Wc_flux_cm has _one_;
  Kd_c_flux_cm has _one_;
  logKow_c_flux_cm has _one_;
  pKa_flux_cl = 9.6 _one_;
  pHc_flux_cl = 7 _one_;
  pHl_flux_cl = 5.5 _one_;
  gamma_dl_flux_cl = 0.73799822 _one_;
  gamma_nl_flux_cl = 1.23026877 _one_;
  Ll_flux_cl = 0 _one_;
  gamma_dc_flux_cl = 0.73799822 _one_;
  gamma_nc_flux_cl = 1.23026877 _one_;
  Lc_flux_cl = 0.05 _one_;
  logKow_n_flux_cl = 3.1 _one_;
  c_flux_cl = 1 _one_;
  Pc_flux_cl has um_s_1;
  fn_l_flux_cl has _one_;
  fc_l_flux_cl has _one_;
  fn_c_flux_cl has _one_;
  Pn_flux_cl has um_s_1;
  Nl_flux_cl has _one_;
  fc_c_flux_cl has _one_;
  i_flux_cl has _one_;
  logP_n_flux_cl has _one_;
  Kn_l_flux_cl has _one_;
  Kd_l_flux_cl has _one_;
  Wb_flux_cl has _one_;
  logP_c_flux_cl has _one_;
  Kn_c_flux_cl has _one_;
  Wc_flux_cl has _one_;
  Kd_c_flux_cl has _one_;
  logKow_c_flux_cl has _one_;

  // Assignment rules:
  fc_a_flux_ac := fn_a_flux_ac*10^(i_flux_ac*(pHa_flux_ac - pKa_flux_ac));
  Pc_flux_ac := 10^(-0.7 + logP_c_flux_ac);
  Na_flux_ac := c_flux_ac*Eam*(4.56 + _F_)/_R_/(10.15 + _T_);
  fn_a_flux_ac := 1/(Wa_flux_ac/gamma_na_flux_ac + Kn_a_flux_ac/gamma_na_flux_ac + Wa_flux_ac*10^(i_flux_ac*(pHa_flux_ac - pKa_flux_ac))/gamma_da_flux_ac + Kd_a_flux_ac*10^(i_flux_ac*(pHa_flux_ac - pKa_flux_ac))/gamma_da_flux_ac);
  fn_c_flux_ac := 1/(Wc_flux_ac/gamma_nc_flux_ac + Kn_c_flux_ac/gamma_nc_flux_ac + Wc_flux_ac*10^(i_flux_ac*(pHc_flux_ac - pKa_flux_ac))/gamma_dc_flux_ac + Kd_c_flux_ac*10^(i_flux_ac*(pHc_flux_ac - pKa_flux_ac))/gamma_dc_flux_ac);
  Pn_flux_ac := 10^(-0.7 + logP_n_flux_ac);
  fc_c_flux_ac := fn_c_flux_ac*10^(i_flux_ac*(pHc_flux_ac - pKa_flux_ac));
  i_flux_ac := floor(-c_flux_ac);
  logP_n_flux_ac := (2.2 + 0.33*logKow_n_flux_ac)*((c_flux_ac > 0) && (c_flux_ac < 0.001)) + (2.2 + 0.33*logKow_n_flux_ac)*(c_flux_ac > 0.1) + (2.2 + 0.37*logKow_n_flux_ac)*(c_flux_ac < 0);
  logP_c_flux_ac := (2.2 + 0.33*logKow_c_flux_ac)*((c_flux_ac > 0) && (c_flux_ac < 0.001)) + (2 + 0.37*logKow_c_flux_ac)*(c_flux_ac > 0.1) + (2.6 + 0.33*logKow_c_flux_ac)*(c_flux_ac < 0);
  Kn_a_flux_ac := 1.22*La_flux_ac*10^logP_n_flux_ac;
  Kd_a_flux_ac := 1.22*La_flux_ac*10^logP_c_flux_ac;
  Wa_flux_ac := 1 - La_flux_ac;
  Kn_c_flux_ac := 1.22*Lc_flux_ac*10^logP_n_flux_ac;
  Wc_flux_ac := 1 - Lc_flux_ac;
  Kd_c_flux_ac := 1.22*Lc_flux_ac*10^logP_c_flux_ac;
  logKow_c_flux_ac := -3.7 + logKow_n_flux_ac;
  Pc_flux_cb := 10^(-0.7 + logP_c_flux_cb);
  Nb_flux_cb := -(c_flux_cb*(4.56 + _F_)*Ebm/_R_/(10.15 + _T_));
  fn_b_flux_cb := 1/(Wb_flux_cb/gamma_nb_flux_cb + Kn_b_flux_cb/gamma_nb_flux_cb + Wb_flux_cb*10^(i_flux_cb*(pHb_flux_cb - pKa_flux_cb))/gamma_db_flux_cb + Kd_b_flux_cb*10^(i_flux_cb*(pHb_flux_cb - pKa_flux_cb))/gamma_db_flux_cb);
  fn_c_flux_cb := 1/(Wc_flux_cb/gamma_nc_flux_cb + Kn_c_flux_cb/gamma_nc_flux_cb + Wc_flux_cb*10^(i_flux_cb*(pHc_flux_cb - pKa_flux_cb))/gamma_dc_flux_cb + Kd_c_flux_cb*10^(i_flux_cb*(pHc_flux_cb - pKa_flux_cb))/gamma_dc_flux_cb);
  Pn_flux_cb := 10^(-0.7 + logP_n_flux_cb);
  fc_c_flux_cb := fn_c_flux_cb*10^(i_flux_cb*(pHc_flux_cb - pKa_flux_cb));
  fc_b_flux_cb := fn_b_flux_cb*10^(i_flux_cb*(pHb_flux_cb - pKa_flux_cb));
  i_flux_cb := floor(-c_flux_cb);
  logP_n_flux_cb := (2.2 + 0.33*logKow_n_flux_cb)*((c_flux_cb > 0) && (c_flux_cb < 0.001)) + (2.2 + 0.33*logKow_n_flux_cb)*(c_flux_cb > 0.1) + (2.2 + 0.37*logKow_n_flux_cb)*(c_flux_cb < 0);
  logP_c_flux_cb := (2.2 + 0.33*logKow_c_flux_cb)*((c_flux_cb > 0) && (c_flux_cb < 0.001)) + (2 + 0.37*logKow_c_flux_cb)*(c_flux_cb > 0.1) + (2.6 + 0.33*logKow_c_flux_cb)*(c_flux_cb < 0);
  Kn_b_flux_cb := 1.22*Lb_flux_cb*10^logP_n_flux_cb;
  Wb_flux_cb := 1 - Lb_flux_cb;
  Kd_b_flux_cb := 1.22*Lb_flux_cb*10^logP_c_flux_cb;
  Kn_c_flux_cb := 1.22*Lc_flux_cb*10^logP_n_flux_cb;
  Wc_flux_cb := 1 - Lc_flux_cb;
  Kd_c_flux_cb := 1.22*Lc_flux_cb*10^logP_c_flux_cb;
  logKow_c_flux_cb := -3.7 + logKow_n_flux_cb;
  Pc_flux_cm := 10^(-0.7 + logP_c_flux_cm);
  fc_m_flux_cm := fn_m_flux_cm*10^(i_flux_cm*(pHm_flux_cm - pKa_flux_cm));
  fn_m_flux_cm := 1/(Wm_flux_cm/gamma_nm_flux_cm + Kn_m_flux_cm/gamma_nm_flux_cm + Wm_flux_cm*10^(i_flux_cm*(pHm_flux_cm - pKa_flux_cm))/gamma_dm_flux_cm + Kd_m_flux_cm*10^(i_flux_cm*(pHm_flux_cm - pKa_flux_cm))/gamma_dm_flux_cm);
  fn_c_flux_cm := 1/(Wc_flux_cm/gamma_nc_flux_cm + Kn_c_flux_cm/gamma_nc_flux_cm + Wc_flux_cm*10^(i_flux_cm*(pHc_flux_cm - pKa_flux_cm))/gamma_dc_flux_cm + Kd_c_flux_cm*10^(i_flux_cm*(pHc_flux_cm - pKa_flux_cm))/gamma_dc_flux_cm);
  Pn_flux_cm := 10^(-0.7 + logP_n_flux_cm);
  fc_c_flux_cm := fn_c_flux_cm*10^(i_flux_cm*(pHc_flux_cm - pKa_flux_cm));
  Nm_flux_cm := c_flux_cm*Emm*(4.56 + _F_)/_R_/(10.15 + _T_);
  i_flux_cm := floor(-c_flux_cm);
  logP_n_flux_cm := (2.2 + 0.33*logKow_n_flux_cm)*((c_flux_cm > 0) && (c_flux_cm < 0.001)) + (2.2 + 0.33*logKow_n_flux_cm)*(c_flux_cm > 0.1) + (2.2 + 0.37*logKow_n_flux_cm)*(c_flux_cm < 0);
  Kn_m_flux_cm := 1.22*Lm_flux_cm*10^logP_n_flux_cm;
  Kd_m_flux_cm := 1.22*Lm_flux_cm*10^logP_c_flux_cm;
  Wm_flux_cm := 1 - Lm_flux_cm;
  logP_c_flux_cm := (2.2 + 0.33*logKow_c_flux_cm)*((c_flux_cm > 0) && (c_flux_cm < 0.001)) + (2 + 0.37*logKow_c_flux_cm)*(c_flux_cm > 0.1) + (2.6 + 0.33*logKow_c_flux_cm)*(c_flux_cm < 0);
  Kn_c_flux_cm := 1.22*Lc_flux_cm*10^logP_n_flux_cm;
  Wc_flux_cm := 1 - Lc_flux_cm;
  Kd_c_flux_cm := 1.22*Lc_flux_cm*10^logP_c_flux_cm;
  logKow_c_flux_cm := -3.7 + logKow_n_flux_cm;
  Pc_flux_cl := 10^(-0.7 + logP_c_flux_cl);
  fn_l_flux_cl := 1/(Wb_flux_cl/gamma_nl_flux_cl + Kn_l_flux_cl/gamma_nl_flux_cl + Wb_flux_cl*10^(i_flux_cl*(pHl_flux_cl - pKa_flux_cl))/gamma_dl_flux_cl + Kd_l_flux_cl*10^(i_flux_cl*(pHl_flux_cl - pKa_flux_cl))/gamma_dl_flux_cl);
  fc_l_flux_cl := fn_l_flux_cl*10^(i_flux_cl*(pHl_flux_cl - pKa_flux_cl));
  fn_c_flux_cl := 1/(Wc_flux_cl/gamma_nc_flux_cl + Kn_c_flux_cl/gamma_nc_flux_cl + Wc_flux_cl*10^(i_flux_cl*(pHc_flux_cl - pKa_flux_cl))/gamma_dc_flux_cl + Kd_c_flux_cl*10^(i_flux_cl*(pHc_flux_cl - pKa_flux_cl))/gamma_dc_flux_cl);
  Pn_flux_cl := 10^(-0.7 + logP_n_flux_cl);
  Nl_flux_cl := -(c_flux_cl*(4.56 + _F_)*Elm/_R_/(10.15 + _T_));
  fc_c_flux_cl := fn_c_flux_cl*10^(i_flux_cl*(pHc_flux_cl - pKa_flux_cl));
  i_flux_cl := floor(-c_flux_cl);
  logP_n_flux_cl := (2.2 + 0.33*logKow_n_flux_cl)*((c_flux_cl > 0) && (c_flux_cl < 0.001)) + (2.2 + 0.33*logKow_n_flux_cl)*(c_flux_cl > 0.1) + (2.2 + 0.37*logKow_n_flux_cl)*(c_flux_cl < 0);
  Kn_l_flux_cl := 1.22*Ll_flux_cl*10^logP_n_flux_cl;
  Kd_l_flux_cl := 1.22*Ll_flux_cl*10^logP_c_flux_cl;
  Wb_flux_cl := 1 - Ll_flux_cl;
  logP_c_flux_cl := (2.2 + 0.33*logKow_c_flux_cl)*((c_flux_cl > 0) && (c_flux_cl < 0.001)) + (2 + 0.37*logKow_c_flux_cl)*(c_flux_cl > 0.1) + (2.6 + 0.33*logKow_c_flux_cl)*(c_flux_cl < 0);
  Kn_c_flux_cl := 1.22*Lc_flux_cl*10^logP_n_flux_cl;
  Wc_flux_cl := 1 - Lc_flux_cl;
  Kd_c_flux_cl := 1.22*Lc_flux_cl*10^logP_c_flux_cl;
  logKow_c_flux_cl := -3.7 + logKow_n_flux_cl;

  // Reactions:
  flux_ac: $Mt_a -> Mt_c; -((Mt_a*Na_flux_ac*Pc_flux_ac*fc_a_flux_ac - Mt_a*Pn_flux_ac*fn_a_flux_ac + Mt_c*Pn_flux_ac*fn_c_flux_ac - Mt_c*Na_flux_ac*Pc_flux_ac*fc_c_flux_ac*exp(Na_flux_ac) + Mt_a*Pn_flux_ac*fn_a_flux_ac*exp(Na_flux_ac) - Mt_c*Pn_flux_ac*fn_c_flux_ac*exp(Na_flux_ac))/(1 - exp(Na_flux_ac)))*aMem;
    flux_ac_I = 0 pA_um_2; flux_ac_netValence = 1 _one_;
  flux_cb: Mt_c -> Mt_b; -((Mt_c*Nb_flux_cb*Pc_flux_cb*fc_c_flux_cb + Mt_b*Pn_flux_cb*fn_b_flux_cb - Mt_c*Pn_flux_cb*fn_c_flux_cb - Mt_b*Nb_flux_cb*Pc_flux_cb*fc_b_flux_cb*exp(Nb_flux_cb) - Mt_b*Pn_flux_cb*fn_b_flux_cb*exp(Nb_flux_cb) + Mt_c*Pn_flux_cb*fn_c_flux_cb*exp(Nb_flux_cb))/(1 - exp(Nb_flux_cb)))*bMem;
    flux_cb_I = 0 pA_um_2; flux_cb_netValence = 1 _one_;
  flux_cm: Mt_c -> Mt_m; -((Mt_c*Nm_flux_cm*Pc_flux_cm*fc_c_flux_cm - Mt_c*Pn_flux_cm*fn_c_flux_cm + Mt_m*Pn_flux_cm*fn_m_flux_cm - Mt_m*Nm_flux_cm*Pc_flux_cm*fc_m_flux_cm*exp(Nm_flux_cm) + Mt_c*Pn_flux_cm*fn_c_flux_cm*exp(Nm_flux_cm) - Mt_m*Pn_flux_cm*fn_m_flux_cm*exp(Nm_flux_cm))/(1 - exp(Nm_flux_cm)))*mMem;
    flux_cm_I = 0 pA_um_2; flux_cm_netValence = 1 _one_;
  flux_cl: Mt_c -> Mt_l; -((Mt_c*Nl_flux_cl*Pc_flux_cl*fc_c_flux_cl - Mt_c*Pn_flux_cl*fn_c_flux_cl + Mt_l*Pn_flux_cl*fn_l_flux_cl - Mt_l*Nl_flux_cl*Pc_flux_cl*fc_l_flux_cl*exp(Nl_flux_cl) + Mt_c*Pn_flux_cl*fn_c_flux_cl*exp(Nl_flux_cl) - Mt_l*Pn_flux_cl*fn_l_flux_cl*exp(Nl_flux_cl))/(1 - exp(Nl_flux_cl)))*LMem;
    flux_cl_I = 0 pA_um_2; flux_cl_netValence = 1 _one_;

  // Unit definitions:
  unit molecules = item;
  unit um3 = (1e-6 metre)^3;
  unit um2 = (1e-6 metre)^2;
  unit um = 1e-6 metre;
  unit s = second;
  unit K = kelvin;
  unit _one_ = dimensionless;
  unit C_mol_1 = coulomb / mole;
  unit C_nmol_1 = coulomb / (1e-9 mole);
  unit molecules_pmol_1 = item / (1e-12 mole);
  unit _one_000000000 = 1e9 dimensionless;
  unit mV_C_K_1_mol_1 = 1e-3 volt * coulomb / (kelvin * mole);
  unit mV_V_1 = dimensionless;
  unit uM_um3_molecules_1 = 1e-6 mole * (1e-6 metre)^3 / (litre * item);
  unit pA_um_2 = 1e-12 ampere / (1e-6 metre)^2;
  unit um_s_1 = 1e-6 metre / second;
end
