// SBML level 3 version 1
// Exported by VCell 7.3

model SH2_biosensor_Application0()
  // model units - substance: molecules, time: s, volume: um3, area: um2, length: um, extent: molecules

  // Compartments:
  compartment c0 = 50000 um3;

  // Species:
  substanceOnly species pEGFR in c0 = 0;
  substanceOnly species iEGFR in c0 = 0;
  substanceOnly species SH2 in c0 = 0;
  substanceOnly species pEGFRSH2 in c0 = 0;
  substanceOnly species EGFRSH2 in c0 = 0;
  substanceOnly species iEGFRSH2 in c0 = 0;
  substanceOnly species $EGF in c0 = 3.011071e7;
  substanceOnly species EGFR in c0 = 3.011071e9;

  // Parameters:
  kf = 0.1 s_1_uM_1;
  kr = 0.1 s_1;
  kdeg = 0.05 s_1;
  kon = 0.1 s_1_uM_1;
  koff = 1 s_1;
  _T_ = 300 K;
  _PI_ = 3.141593 _one_;
  _F_ = 9.64853321e4 C_mol_1;
  _F_nmol_ = 9.64853321e-5 C_nmol_1;
  _N_pmol_ = 6.02214179e11 molecules_pmol_1;
  _K_GHK_ = 1e-9 _one_000000000;
  _R_ = 8314.463 mV_C_K_1_mol_1;
  K_millivolts_per_volt = 1000 mV_V_1;
  KMOLE = 0.001660539 uM_um3_molecules_1;
  ke_r2 = 0.1 s_1;
  keSH2_r7 = 0.1 s_1;
  kt_r1 = 0.01 s_1;
  Vsyn_r1 = 1 uM_s_1;

  // Reactions:
  r4: pEGFR + SH2 -> pEGFRSH2; (0.001660539*SH2*kon*pEGFR - koff*pEGFRSH2)*c0;
  r5: EGFRSH2 -> EGFR + SH2; EGFRSH2*koff*c0;
  r2: pEGFR -> iEGFR; ke_r2*pEGFR*c0;
  r3: iEGFR -> ; iEGFR*kdeg*c0;
  r8: iEGFRSH2 -> SH2; iEGFRSH2*kdeg*c0;
  r9: iEGFR + SH2 -> iEGFRSH2; (-(iEGFRSH2*koff) + 0.001660539*SH2*iEGFR*kon)*c0;
  r6: $EGF + EGFRSH2 -> pEGFRSH2; (0.001660539*EGF*EGFRSH2*kf - kr*pEGFRSH2)*c0;
  r7: pEGFRSH2 -> iEGFRSH2; keSH2_r7*pEGFRSH2*c0;
  r1: -> EGFR; (602.214179*Vsyn_r1 - EGFR*kt_r1)*c0;
  r0: EGFR + $EGF -> pEGFR; (0.001660539*EGF*EGFR*kf - kr*pEGFR)*c0;

  // Unit definitions:
  unit molecules = item;
  unit um3 = (1e-6 metre)^3;
  unit um2 = (1e-6 metre)^2;
  unit um = 1e-6 metre;
  unit s = second;
  unit s_1_uM_1 = litre / (second * 1e-6 mole);
  unit s_1 = 1 / second;
  unit K = kelvin;
  unit _one_ = dimensionless;
  unit C_mol_1 = coulomb / mole;
  unit C_nmol_1 = coulomb / (1e-9 mole);
  unit molecules_pmol_1 = item / (1e-12 mole);
  unit _one_000000000 = 1e9 dimensionless;
  unit mV_C_K_1_mol_1 = 1e-3 volt * coulomb / (kelvin * mole);
  unit mV_V_1 = dimensionless;
  unit uM_um3_molecules_1 = 1e-6 mole * (1e-6 metre)^3 / (litre * item);
  unit uM_s_1 = 1e-6 mole / (litre * second);
end
