// SBML level 3 version 1
// Exported by VCell 7.3

model AKAP7_PLB_Binding_2PKA_PLB_0_2uM()
  // AKAP7_PLB_Binding_2PKA_PLB 0.2uM
  // model units - substance: molecules, time: s, volume: um3, area: um2, length: um, extent: molecules

  // Compartments:
  compartment c0 = 50000 um3;

  // Species:
  substanceOnly species R2 in c0 = 5994401;
  substanceOnly species AC_baseline in c0 = 6.02214179e6;
  substanceOnly species C in c0 = 838549.8;
  substanceOnly species AKAP in c0 = 602214.2;
  substanceOnly species PDE in c0 = 6.02214179e6;
  substanceOnly species GsAC in c0 = 0;
  substanceOnly species AKAP_PLB in c0 = 30.11071;
  substanceOnly species PLB in c0 = 6.02214179e6;
  substanceOnly species AKAP_pPLB in c0 = 30.11071;
  substanceOnly species pPLB in c0 = 30.11071;
  substanceOnly species PP in c0 = 301107.1;
  substanceOnly species $ATP in c0 = 1.505535e11;
  substanceOnly species pGs in c0 = 0;
  substanceOnly species R2C1 in c0 = 1727864;
  substanceOnly species R2C2 in c0 = 1727864;
  substanceOnly species PDE4 in c0 = 6.02214179e6;
  substanceOnly species R2_cAMP in c0 = 3.217677e8;
  substanceOnly species cAMP in c0 = 1.48133e7;
  substanceOnly species AC in c0 = 1.505535e7;
  substanceOnly species Gs in c0 = 1.505535e7;

  // Parameters:
  AC_On = 0;
  kcat_AC = 1.4;
  PKA_AC_Fraction = 0.05;
  nR = 1;
  GsF = 0.5;
  _T_ = 300 K;
  _PI_ = 3.141593 _one_;
  _F_ = 9.64853321e4 C_mol_1;
  _F_nmol_ = 9.64853321e-5 C_nmol_1;
  _N_pmol_ = 6.02214179e11 molecules_pmol_1;
  _K_GHK_ = 1e-9 _one_000000000;
  _R_ = 8314.463 mV_C_K_1_mol_1;
  K_millivolts_per_volt = 1000 mV_V_1;
  KMOLE = 0.001660539 uM_um3_molecules_1;
  Km_PLB_phosphorylation = 7527.677 molecules_um_3;
  kcat_PKA_PLB_phosphorylation = 21 s_1;
  Vmax_PLB_phosphorylation has molecules_um_3_s_1;
  Km_R2_cAMP_unloading_PDE = 1204.428 molecules_um_3;
  kcat_R2_cAMP_unloading_PDE = 0.2 s_1;
  Vmax_R2_cAMP_unloading_PDE has molecules_um_3_s_1;
  Kr_R2_cAMP_unloading = 0.3 s_1_uM_1;
  Kf_R2_cAMP_unloading = 1e-5 s_1;
  Kf_AKAP_PLb_binding = 0.0002972364 um3_s_1_molecules_1;
  Kr_AKAP_PLb_binding = 0.0024 s_1;
  Km_cAMP_degradation = 782.8784 molecules_um_3;
  kcat_PDE_cAMP_degradation = 2 s_1;
  Vmax_cAMP_degradation has molecules_um_3_s_1;
  Kf_activate_AC has um3_s_1_molecules_1;
  Kr_activate_AC has s_1;
  Km_deactivate_AC = 6022.14179 molecules_um_3;
  kcat_PKA_deactivate_AC = 21 s_1;
  Vmax_deactivate_AC has molecules_um_3_s_1;
  Kr_PKA_holoenzyme_formation = 0.000186 s_1;
  Kf_PKA_holoenzyme_formation = 0.799 s_1_uM_1;
  Km_produce_cAMP = 189697.5 molecules_um_3;
  Vmax_produce_cAMP has molecules_um_3_s_1;
  Kd_cAMP_C1_Release = 2.9;
  h_C1_Release = 1.4;
  Km_dephosphorylate_PLB = 1625.978 molecules_um_3;
  Vmax_dephosphorylate_PLB has molecules_um_3_s_1;
  Kd_cAMP_C2_Release = 2.9;
  h_C2_Release = 1.4;
  Kf_AKAP_pPLB_dissociation = 0.0002972364 um3_s_1_molecules_1;
  Kr_AKAP_pPLB_dissociation has s_1;

  // Assignment rules:
  Vmax_PLB_phosphorylation := 0.003321078*AKAP_PLB*C*kcat_PKA_PLB_phosphorylation/(0.003321078*R2C2 + 0.001660539*R2C1 + 0.001660539*C);
  Vmax_R2_cAMP_unloading_PDE := kcat_R2_cAMP_unloading_PDE*PDE;
  Vmax_cAMP_degradation := kcat_PDE_cAMP_degradation*PDE4;
  Kf_activate_AC := 0.001660539*GsF*AC_On;
  Kr_activate_AC := 0.005*AC_On;
  Vmax_deactivate_AC := kcat_PKA_deactivate_AC*C*PKA_AC_Fraction;
  Vmax_produce_cAMP := 602.214179*(0.001660539*kcat_AC*GsAC + 0.001660539*kcat_AC*AC_baseline);
  Vmax_dephosphorylate_PLB := 2.5*PP;
  Kr_AKAP_pPLB_dissociation := 0.0024*nR;

  // Reactions:
  PLB_phosphorylation: AKAP_PLB -> AKAP_pPLB; 0.001660539*AKAP_PLB*Vmax_PLB_phosphorylation/(0.001660539*AKAP_PLB + 0.001660539*Km_PLB_phosphorylation)*c0;  // modifiers: C, R2C2, R2C1
  R2_cAMP_unloading_PDE: R2_cAMP -> R2; 0.001660539*R2_cAMP*Vmax_R2_cAMP_unloading_PDE/(0.001660539*Km_R2_cAMP_unloading_PDE + 0.001660539*R2_cAMP)*c0;  // modifiers: PDE
  R2_cAMP_unloading: R2_cAMP -> R2 + 4 cAMP; (Kf_R2_cAMP_unloading*R2_cAMP - 0.001660539*Kr_R2_cAMP_unloading*R2*cAMP)*c0;
  AKAP_PLb_binding: AKAP + PLB -> AKAP_PLB; (-(AKAP_PLB*Kr_AKAP_PLb_binding) + AKAP*Kf_AKAP_PLb_binding*PLB)*c0;
  cAMP_degradation: cAMP -> ; 0.001660539*Vmax_cAMP_degradation*cAMP/(0.001660539*Km_cAMP_degradation + 0.001660539*cAMP)*c0;  // modifiers: PDE4
  activate_AC: AC + Gs -> GsAC; (AC*Gs*Kf_activate_AC - GsAC*Kr_activate_AC)*c0;
  deactivate_AC: GsAC -> AC + pGs; 0.001660539*GsAC*Vmax_deactivate_AC/(0.001660539*GsAC + 0.001660539*Km_deactivate_AC)*c0;  // modifiers: C
  PKA_holoenzyme_formation: 2 C + R2 -> R2C2; (0.001660539*C*Kf_PKA_holoenzyme_formation*R2 - Kr_PKA_holoenzyme_formation*R2C2)*c0;
  produce_cAMP: $ATP -> cAMP; 0.001660539*ATP*Vmax_produce_cAMP/(0.001660539*ATP + 0.001660539*Km_produce_cAMP)*c0;  // modifiers: GsAC, AC_baseline
  C1_Release: 2 cAMP + R2C2 -> R2C1 + C; R2C2*(0.001660539*cAMP)^h_C1_Release/(Kd_cAMP_C1_Release^h_C1_Release + (0.001660539*cAMP)^h_C1_Release)*c0;
  dephosphorylate_PLB: pPLB -> PLB; 0.001660539*Vmax_dephosphorylate_PLB*pPLB/(0.001660539*Km_dephosphorylate_PLB + 0.001660539*pPLB)*c0;  // modifiers: PP
  C2_Release: 2 cAMP + R2C1 -> R2_cAMP + C; R2C1*(0.001660539*cAMP)^h_C2_Release/(Kd_cAMP_C2_Release^h_C2_Release + (0.001660539*cAMP)^h_C2_Release)*c0;
  AKAP_pPLB_dissociation: AKAP + pPLB -> AKAP_pPLB; (-(AKAP_pPLB*Kr_AKAP_pPLB_dissociation) + AKAP*Kf_AKAP_pPLB_dissociation*pPLB)*c0; AKAP_pPLB_dissociation is "AKAP-pPLB_dissociation";

  // Events:
  AC_Stimulation: at (time > 5000), t0=false: AC_On = 1;

  // Unit definitions:
  unit molecules = item;
  unit um3 = (1e-6 metre)^3;
  unit um2 = (1e-6 metre)^2;
  unit um = 1e-6 metre;
  unit s = second;
  unit K = kelvin;
  unit _one_ = dimensionless;
  unit C_mol_1 = coulomb / mole;
  unit C_nmol_1 = coulomb / (1e-9 mole);
  unit molecules_pmol_1 = item / (1e-12 mole);
  unit _one_000000000 = 1e9 dimensionless;
  unit mV_C_K_1_mol_1 = 1e-3 volt * coulomb / (kelvin * mole);
  unit mV_V_1 = dimensionless;
  unit uM_um3_molecules_1 = 1e-6 mole * (1e-6 metre)^3 / (litre * item);
  unit molecules_um_3 = item / (1e-6 metre)^3;
  unit s_1 = 1 / second;
  unit molecules_um_3_s_1 = item / ((1e-6 metre)^3 * second);
  unit s_1_uM_1 = litre / (second * 1e-6 mole);
  unit um3_s_1_molecules_1 = (1e-6 metre)^3 / (second * item);
end
