// SBML level 3 version 1
// Exported by VCell 7.3

model Boras_Diffusional_Study_10xPDEtest5_ode()
  // Boras-Diffusional Study-10xPDEtest5_ode
  // model units - substance: molecules, time: s, volume: um3, area: um2, length: um, extent: molecules

  // Compartments:
  compartment SR = 50000 um3;
  compartment Unnamed_compartment = 50000 um3;
  compartment ttube = 50000 um3;
  compartment mito2 = 50000 um3;
  compartment ttube2 = 50000 um3;
  compartment Cyto = 0.2878215 um3;
  compartment mito = 50000 um3;
  compartment bests = 6563 um2;  // 2-D
  compartment tttt = 6563 um2;  // 2-D
  compartment Membrane0 = 6563 um2;  // 2-D
  compartment Membrane1 = 6563 um2;  // 2-D
  compartment Membrane2 = 6563 um2;  // 2-D
  compartment Membrane3 = 6563 um2;  // 2-D

  // Species:
  substanceOnly species PDE_cAMP in Cyto = 0;
  substanceOnly species PDE_Cyto in Cyto = 1213.311;
  substanceOnly species cAMP_best in Cyto = 173.3302;
  substanceOnly species s0 in Cyto = 0;

  // Parameters:
  g0 = 0;
  C_kr = 2.3 s_1;
  C_kd = 0.00038 uM;
  B_factor = 5;
  F_B_binding = 3.175 s_1;
  B_kd = 0.013;
  A_kd = 0.03;
  spots = 2;
  F_A_binding = 0.3 s_1;
  A_factor = 23;
  _T_ = 300 K;
  _PI_ = 3.141593 _one_;
  _F_ = 9.64853321e4 C_mol_1;
  _F_nmol_ = 9.64853321e-5 C_nmol_1;
  _N_pmol_ = 6.02214179e11 molecules_pmol_1;
  _K_GHK_ = 1e-9 _one_000000000;
  _R_ = 8314.463 mV_C_K_1_mol_1;
  K_millivolts_per_volt = 1000 mV_V_1;
  KMOLE = 0.001660539 uM_um3_molecules_1;
  Kf_r0 = 0.01992647 um3_s_1_molecules_1;
  Kr_r0 = 58.82 s_1;
  Kf_r1 = 14.7 s_1;
  Kr_r1 = 0 s_1;
  Kr_r2 = 0 s_1;
  Kf_r2 has s_1;

  // Assignment rules:
  Kf_r2 := 1 - (0.5 + 0.3184713*atan(0.1660539*cAMP_best));

  // Reactions:
  r0: cAMP_best + PDE_Cyto -> PDE_cAMP; (-(Kr_r0*PDE_cAMP) + Kf_r0*PDE_Cyto*cAMP_best)*Cyto;
  r1: PDE_cAMP -> PDE_Cyto; (-(Kr_r1*PDE_Cyto) + Kf_r1*PDE_cAMP)*Cyto;
  r2: s0 -> cAMP_best; (-(Kr_r2*cAMP_best) + Kf_r2*s0)*Cyto;

  // Unit definitions:
  unit molecules = item;
  unit um3 = (1e-6 metre)^3;
  unit um2 = (1e-6 metre)^2;
  unit um = 1e-6 metre;
  unit s = second;
  unit s_1 = 1 / second;
  unit uM = 1e-6 mole / litre;
  unit K = kelvin;
  unit _one_ = dimensionless;
  unit C_mol_1 = coulomb / mole;
  unit C_nmol_1 = coulomb / (1e-9 mole);
  unit molecules_pmol_1 = item / (1e-12 mole);
  unit _one_000000000 = 1e9 dimensionless;
  unit mV_C_K_1_mol_1 = 1e-3 volt * coulomb / (kelvin * mole);
  unit mV_V_1 = dimensionless;
  unit uM_um3_molecules_1 = 1e-6 mole * (1e-6 metre)^3 / (litre * item);
  unit um3_s_1_molecules_1 = (1e-6 metre)^3 / (second * item);
end
